# OpenSim document version 40500
Model UpperLowerBodyModel:
  gravity: 0 -9.80665 0
  length_units: meters
  force_units: N
  credits:
    Menegolo Andrea IMPORTANT NOTE: The geometry files included in the ULB_Project.zip file have similar names but different reference frames from the ones included in the OpenSim distribution. Please, include the Geometry directory from this model in the front of your GeometryPath.
  publications:
    Delp, S.L., Loan, J.P., Hoy, M.G., Zajac, F.E., Topp E.L., Rosen, J.M.: An interactive graphics-based model of the lower extremity to study orthopaedic surgical procedures, IEEE Transactions on Biomedical Engineering, vol. 37, pp. 757-767, 1990. Yamaguchi G.T., Zajac F.E.: A planar model of the knee joint to characterize the knee extensor mechanism." J . Biomecl7. vol. 21. pp. 1-10. 1989. Anderson F.C., Pandy M.G.: A dynamic optimization solution for vertical jumping in three dimensions. Computer Methods in Biomechanics and Biomedical Engineering 2:201-231, 1999. Anderson F.C., Pandy M.G.: Dynamic optimization of human walking. Journal of Biomechanical Engineering 123:381-390, 2001. Delp SL, Anderson FC, Arnold AS, Loan P, Habib A, John CT, Guendelman E, Thelen DG (in press). OpenSim: Open-source Software to Create and Analyze Dynamic Simulations of Movement. IEEE Transactions on Biomedical Engineering. (2007) Holzbaur KR, Murray WM, Delp SL.: A model of the upper extremity for simulating musculoskeletal surgery and analyzing neuromuscular control., Ann Biomed Eng. 2005 Jun;33(6):829-40. (2005)
  Ground: meshes=(/Users/rebeccatam/Downloads/MASL Project/ULB_Project/Geometry/treadmill.vtp)
  BodySet:
    Body pelvis: mass=11.777 [kg] mass_center=(-0.0707 0 0) inertia=(0.1028 0.0871 0.0579 0 0 0)
        meshes=(/Users/rebeccatam/Downloads/MASL Project/ULB_Project/Geometry/sacrum.vtp /Users/rebeccatam/Downloads/MASL Project/ULB_Project/Geometry/pelvis_r.vtp /Users/rebeccatam/Downloads/MASL Project/ULB_Project/Geometry/pelvis_l.vtp)
    Body thorax: mass=0 mass_center=(0 0 0) inertia=(0 0 0 0 0 0)
        meshes=(/Users/rebeccatam/Downloads/MASL Project/ULB_Project/Geometry/thorax.vtp /Users/rebeccatam/Downloads/MASL Project/ULB_Project/Geometry/hat_skull.vtp /Users/rebeccatam/Downloads/MASL Project/ULB_Project/Geometry/hat_jaw.vtp /Users/rebeccatam/Downloads/MASL Project/ULB_Project/Geometry/hat_spine.vtp)
      WrapEllipsoid Thorax: xyz_body_rotation=(0.0434587 -0.331962 0.189892) translation=(-0.0386 -0.1273 0.0709)
          quadrant=all dimensions=(0.1 0.135 0.08)
      WrapEllipsoid Thorax_l: xyz_body_rotation=(-0.0434587 0.331962 0.189892) translation=(-0.0386 -0.1273 -0.0709)
          quadrant=all dimensions=(0.1 0.135 0.08)
    Body femur_r: mass=9.3014 mass_center=(0 -0.17 0) inertia=(0.1339 0.0351 0.1412 0 0 0)
        meshes=(/Users/rebeccatam/Downloads/MASL Project/ULB_Project/Geometry/femur_r.vtp)
    Body tibia_r: mass=3.7075 mass_center=(0 -0.1867 0) inertia=(0.0504 0.0051 0.0511 0 0 0)
        meshes=(/Users/rebeccatam/Downloads/MASL Project/ULB_Project/Geometry/tibia_r.vtp /Users/rebeccatam/Downloads/MASL Project/ULB_Project/Geometry/fibula_r.vtp)
    Body talus_r: mass=0.1 mass_center=(0 0 0) inertia=(0.001 0.001 0.001 0 0 0)
        meshes=(/Users/rebeccatam/Downloads/MASL Project/ULB_Project/Geometry/talus_r.vtp)
    Body calcn_r: mass=1.25 mass_center=(0.1 0.03 0) inertia=(0.0014 0.0039 0.0041 0 0 0)
        meshes=(/Users/rebeccatam/Downloads/MASL Project/ULB_Project/Geometry/foot_r.vtp)
    Body toes_r: mass=0.2166 mass_center=(0.0346 0.006 -0.0175) inertia=(0.0001 0.0002 0.001 0 0 0)
        meshes=(/Users/rebeccatam/Downloads/MASL Project/ULB_Project/Geometry/bofoot_r.vtp)
    Body femur_l: mass=9.3014 mass_center=(0 -0.17 0) inertia=(0.1339 0.0351 0.1412 0 0 0)
        meshes=(/Users/rebeccatam/Downloads/MASL Project/ULB_Project/Geometry/femur_l.vtp)
    Body tibia_l: mass=3.7075 mass_center=(0 -0.1867 0) inertia=(0.0504 0.0051 0.0511 0 0 0)
        meshes=(/Users/rebeccatam/Downloads/MASL Project/ULB_Project/Geometry/tibia_l.vtp /Users/rebeccatam/Downloads/MASL Project/ULB_Project/Geometry/fibula_l.vtp)
    Body talus_l: mass=0.1 mass_center=(0 0 0) inertia=(0.001 0.001 0.001 0 0 0)
        meshes=(/Users/rebeccatam/Downloads/MASL Project/ULB_Project/Geometry/talus_l.vtp)
    Body calcn_l: mass=1.25 mass_center=(0.1 0.03 0) inertia=(0.0014 0.0039 0.0041 0 0 0)
        meshes=(/Users/rebeccatam/Downloads/MASL Project/ULB_Project/Geometry/foot_l.vtp)
    Body toes_l: mass=0.2166 mass_center=(0.0346 0.006 -0.0175) inertia=(0.0001 0.0002 0.001 0 0 0)
        meshes=(/Users/rebeccatam/Downloads/MASL Project/ULB_Project/Geometry/bofoot_l.vtp)
    Body clavicle: mass=0 mass_center=(0 0 0) inertia=(0 0 0 0 0 0)
        meshes=(/Users/rebeccatam/Downloads/MASL Project/ULB_Project/Geometry/clavicle.vtp)
    Body clavphant: mass=0 mass_center=(0 0 0) inertia=(0 0 0 0 0 0)
    Body scapula: mass=0 mass_center=(0 0 0) inertia=(0 0 0 0 0 0)
        meshes=(/Users/rebeccatam/Downloads/MASL Project/ULB_Project/Geometry/scapula.vtp)
      WrapEllipsoid Deltoid2: active=false xyz_body_rotation=(3.13042 -1.54881 -1.31423)
          translation=(-0.0058 -0.0378 0.0096) quadrant=-y dimensions=(0.03 0.04 0.035)
      WrapTorus Delt3: active=false xyz_body_rotation=(0.620988 0.32882 -0.560774) translation=(-0.0973 -0.0428 -0.037)
          quadrant=all inner_radius=0.04 outer_radius=0.06
      WrapTorus INFSP: xyz_body_rotation=(0.0253073 0.58835 0.151844) translation=(-0.0561 -0.0199 -0.0112)
          quadrant=all inner_radius=0.008 outer_radius=0.019
      WrapEllipsoid TMIN: xyz_body_rotation=(-2.09754 -0.280823 -1.76348) translation=(-0.0418 -0.0519 -0.0359)
          quadrant=x dimensions=(0.03 0.03 0.05)
      WrapCylinder TRIlongglen: xyz_body_rotation=(1.37532 -0.294612 2.43596) translation=(-0.0359 -0.0309 -0.0132)
          quadrant=x radius=0.003 length=0.03
    Body scapphant: mass=0 mass_center=(0 0 0) inertia=(0 0 0 0 0 0)
    Body humphant: mass=0 mass_center=(0 0 0) inertia=(0 0 0 0 0 0)
    Body humphant1: mass=0 mass_center=(0 0 0) inertia=(0 0 0 0 0 0)
    Body humerus: mass=0 mass_center=(0 0 0) inertia=(0 0 0 0 0 0)
        meshes=(/Users/rebeccatam/Downloads/MASL Project/ULB_Project/Geometry/humerus.vtp)
      WrapEllipsoid DELT1hh: xyz_body_rotation=(0.0584685 1.00461 0.570374) translation=(-0.0139 -0.0127 -0.0262)
          quadrant=z dimensions=(0.03 0.1 0.05)
      WrapCylinder delt2hum: xyz_body_rotation=(1.68093 -0.0249582 0.0516617) translation=(0.0017 -0.0958 0.0011)
          quadrant=all radius=0.0094 length=0.05
      WrapEllipsoid delt3hum: xyz_body_rotation=(1.72735 0.0759218 -2.74313) translation=(0.0019 -0.0592 0.0011)
          quadrant=x dimensions=(0.01 0.01 0.05)
      WrapEllipsoid SUPSP: xyz_body_rotation=(0.0380482 0.00855211 -1.30673) translation=(0.0002 0.0077 0.0043)
          quadrant=all dimensions=(0.02 0.02 0.02)
      WrapEllipsoid INFSP_and_TMIN_hum_head: xyz_body_rotation=(-0.286583 -0.00907571 -0.0684169)
          translation=(-0.0003 0.0026 0.0038) quadrant=all dimensions=(0.02 0.025 0.02)
      WrapEllipsoid SUBSCAP: xyz_body_rotation=(-0.924501 0.288852 0.381529) translation=(-0.0025 0.0007 -0.0045)
          quadrant=all dimensions=(0.02 0.017 0.028)
      WrapCylinder TMINhum: xyz_body_rotation=(1.75353 0.0692896 2.74628) translation=(-0.0014 -0.0455 0) quadrant=x
          radius=0.007 length=0.07
      WrapSphere TMAJ_LAT_PEC_CORBhh: translation=(0.0007 0 0.006) quadrant=all radius=0.03
      WrapCylinder TMAJ_LAThum: xyz_body_rotation=(1.53641 -0.0637045 1.41424) translation=(0.0007 -0.0443 -0.0055)
          quadrant=-x radius=0.007 length=0.04
      WrapEllipsoid PEC1hh: xyz_body_rotation=(-0.620465 -0.310494 0.363727) translation=(-0.0037 0.0005 -0.0025)
          quadrant=-z dimensions=(0.03 0.02 0.02)
      WrapCylinder PEC12hum: xyz_body_rotation=(1.55928 -0.0774926 -0.925897) translation=(0.002 -0.0508 -0.0017)
          quadrant=x radius=0.009 length=0.07
      WrapSphere PEC23hh: translation=(-0.0086 0.0021 -0.0004) quadrant=all radius=0.02
      WrapCylinder PEC3hum: xyz_body_rotation=(1.44094 -0.0561996 1.75196) translation=(0.0009 -0.0551 -0.0004)
          quadrant=-x radius=0.008 length=0.07
      WrapCylinder LAT_TMAJhh: xyz_body_rotation=(-0.305084 -0.018326 -0.686613) translation=(-0.0224 0.0102 0.0094)
          quadrant=-y radius=0.007 length=0.045
      WrapSphere LAT_TMAJ2hh: xyz_body_rotation=(-0.127235 0.276111 0.0197222) translation=(-0.0016 0.0092 0.0052)
          quadrant=-z radius=0.03
      WrapCylinder CORBhum: xyz_body_rotation=(-1.60832 0.0959931 0.875283) translation=(0.0027 -0.1202 -0.0059)
          quadrant=x radius=0.008 length=0.05
      WrapEllipsoid TRIlonghh: xyz_body_rotation=(3.00162 -0.853466 2.57419) translation=(-0.0078 -0.0041 -0.0014)
          quadrant=z dimensions=(0.035 0.02 0.02)
      WrapCylinder TRI: xyz_body_rotation=(-0.14015 -0.00628319 0.154985) translation=(0.0028 -0.2919 -0.0119)
          quadrant=all radius=0.016 length=0.04
      WrapEllipsoid ANC: xyz_body_rotation=(0.00750492 -0.196699 1.04929) translation=(0.0134 -0.2861 -0.0008)
          quadrant=-x dimensions=(0.02 0.02 0.02)
      WrapEllipsoid BIClong: xyz_body_rotation=(-2.00434 -1.00164 0.975465) translation=(0.0033 0.0073 0.0003)
          quadrant=-y dimensions=(0.025 0.02 0.02)
      WrapEllipsoid Elbow_BIC_BRD: xyz_body_rotation=(-0.128631 0.137532 0.0307178) translation=(0.0019 -0.289 -0.014)
          quadrant=x dimensions=(0.015 0.015 0.1)
      WrapEllipsoid Elbow_PT_ECRL: xyz_body_rotation=(-0.161094 -0.110828 0.61453) translation=(0.003 -0.2872 -0.0069)
          quadrant=x dimensions=(0.018 0.025 0.035)
    Body ulna: mass=0 mass_center=(0 0 0) inertia=(0 0 0 0 0 0)
        meshes=(/Users/rebeccatam/Downloads/MASL Project/ULB_Project/Geometry/ulna.vtp)
      WrapCylinder PQ2: xyz_body_rotation=(1.39138 0.0689405 1.52245) translation=(-0.0012 -0.2092 0.0428) quadrant=all
          radius=0.007 length=0.01
    Body radius: mass=0 mass_center=(0 0 0) inertia=(0 0 0 0 0 0)
        meshes=(/Users/rebeccatam/Downloads/MASL Project/ULB_Project/Geometry/radius.vtp)
      WrapCylinder SUP: xyz_body_rotation=(1.44775 0.304036 -2.44102) translation=(0.0045 -0.0437 0.0059) quadrant=-x
          radius=0.008 length=0.04
      WrapTorus ECU: xyz_body_rotation=(-0.986635 -0.148877 0.222704) translation=(-0.0163 -0.2417 0.0349) quadrant=all
          inner_radius=0.006 outer_radius=0.009
      WrapCylinder PQ1: xyz_body_rotation=(-1.60762 -0.0127409 -2.69025) translation=(0.0281 -0.1986 0.0288)
          quadrant=all radius=0.01 length=0.01
    Body lunate: mass=0 mass_center=(0 0 0) inertia=(0 0 0 0 0 0)
        meshes=(/Users/rebeccatam/Downloads/MASL Project/ULB_Project/Geometry/lunate.vtp)
      WrapEllipsoid Extensor_ellipse: xyz_body_rotation=(-0.250804 0.285536 0.232827)
          translation=(0.0007 -0.0135 0.0047) quadrant=z dimensions=(0.05 0.02 0.013)
      WrapTorus ECRL: xyz_body_rotation=(1.53833 0.234398 0.731118) translation=(0.0222 -0.0096 0.0208) quadrant=all
          inner_radius=0.008 outer_radius=0.016
      WrapTorus ECRB: xyz_body_rotation=(1.31266 -0.11781 -0.116239) translation=(0.0126 -0.0095 0.0186) quadrant=all
          inner_radius=0.008 outer_radius=0.01
      WrapTorus FCR: xyz_body_rotation=(-1.55596 -0.15324 -0.100007) translation=(0.0032 -0.0045 -0.019) quadrant=all
          inner_radius=0.001 outer_radius=0.0025
      WrapTorus FCU: xyz_body_rotation=(-1.57376 -0.0797616 0.39235) translation=(-0.0123 -0.0124 -0.0171) quadrant=all
          inner_radius=0.0068 outer_radius=0.008
      WrapEllipsoid PL: xyz_body_rotation=(-0.0315905 0.0996583 0.0633554) translation=(0.0057 -0.018 -0.0041)
          quadrant=-z dimensions=(0.025 0.014 0.012)
      WrapEllipsoid FDS: xyz_body_rotation=(0.00837758 -0.0816814 -0.0171042) translation=(0.0012 -0.0057 -0.0003)
          quadrant=-z dimensions=(0.025 0.013 0.012)
      WrapEllipsoid FDP: xyz_body_rotation=(-1.46747 -0.194604 0.121824) translation=(-0.0022 -0.0069 0.0032)
          quadrant=y dimensions=(0.025 0.013 0.012)
      WrapTorus EDCL: xyz_body_rotation=(2.36318 0.193033 -0.26913) translation=(-0.0128 -0.0133 0.0148) quadrant=all
          inner_radius=0.008 outer_radius=0.012
      WrapTorus EDCR: xyz_body_rotation=(1.98392 0.100531 0.523075) translation=(-0.0098 -0.0137 0.0166) quadrant=all
          inner_radius=0.009 outer_radius=0.011
      WrapTorus EDCM: xyz_body_rotation=(1.99317 0.19792 0.368264) translation=(-0.0007 -0.0117 0.0191) quadrant=all
          inner_radius=0.009 outer_radius=0.012
      WrapTorus EDCI: xyz_body_rotation=(1.69768 0.0897099 0.00767945) translation=(0.009 -0.0149 0.0211) quadrant=all
          inner_radius=0.009 outer_radius=0.012
      WrapEllipsoid EDM: xyz_body_rotation=(2.9627 0.159349 0.117984) translation=(-0.0167 -0.0022 0.0048) quadrant=-z
          dimensions=(0.018 0.014 0.008)
      WrapEllipsoid FPL: xyz_body_rotation=(-0.16633 -0.082205 -0.0659735) translation=(0.017 -0.025 -0.0033)
          quadrant=-z dimensions=(0.016 0.01 0.01)
    Body scaphoid: mass=0 mass_center=(0 0 0) inertia=(0 0 0 0 0 0)
        meshes=(/Users/rebeccatam/Downloads/MASL Project/ULB_Project/Geometry/scaphoid.vtp)
    Body pisiform: mass=0 mass_center=(0 0 0) inertia=(0 0 0 0 0 0)
        meshes=(/Users/rebeccatam/Downloads/MASL Project/ULB_Project/Geometry/pisiform.vtp)
    Body triquetrum: mass=0 mass_center=(0 0 0) inertia=(0 0 0 0 0 0)
        meshes=(/Users/rebeccatam/Downloads/MASL Project/ULB_Project/Geometry/triquetrum.vtp)
    Body capitate: mass=0 mass_center=(0 0 0) inertia=(0 0 0 0 0 0)
        meshes=(/Users/rebeccatam/Downloads/MASL Project/ULB_Project/Geometry/capitate.vtp)
    Body trapezium: mass=0 mass_center=(0 0 0) inertia=(0 0 0 0 0 0)
        meshes=(/Users/rebeccatam/Downloads/MASL Project/ULB_Project/Geometry/trapezium.vtp)
    Body trapezoid: mass=0 mass_center=(0 0 0) inertia=(0 0 0 0 0 0)
        meshes=(/Users/rebeccatam/Downloads/MASL Project/ULB_Project/Geometry/trapezoid.vtp)
    Body hamate: mass=0 mass_center=(0 0 0) inertia=(0 0 0 0 0 0)
        meshes=(/Users/rebeccatam/Downloads/MASL Project/ULB_Project/Geometry/hamate.vtp)
    Body firstmc1: mass=0 mass_center=(0 0 0) inertia=(0 0 0 0 0 0)
      WrapTorus APL: active=false xyz_body_rotation=(-1.60989 0.247837 -0.0301942) translation=(0.0082 0.0023 -0.0101)
          quadrant=all inner_radius=0.004 outer_radius=0.008
    Body firstmc: mass=0 mass_center=(0 0 0) inertia=(0 0 0 0 0 0)
        meshes=(/Users/rebeccatam/Downloads/MASL Project/ULB_Project/Geometry/1mc.vtp)
      WrapCylinder MPthumb: xyz_body_rotation=(0.321315 0.11013 -0.834791) translation=(0.0177 -0.0305 -0.0143)
          quadrant=all radius=0.0085 length=0.02
    Body secondmc: mass=0 mass_center=(0 0 0) inertia=(0 0 0 0 0 0)
        meshes=(/Users/rebeccatam/Downloads/MASL Project/ULB_Project/Geometry/2mc.vtp)
      WrapEllipsoid 2ndmcp: xyz_body_rotation=(1.48667 -1.29661 2.43072) translation=(0.0059 -0.0304 -0.0006)
          quadrant=-x dimensions=(0.005 0.005 0.03)
    Body thirdmc: mass=0 mass_center=(0 0 0) inertia=(0 0 0 0 0 0)
        meshes=(/Users/rebeccatam/Downloads/MASL Project/ULB_Project/Geometry/3mc.vtp)
    Body fourthmc: mass=0 mass_center=(0 0 0) inertia=(0 0 0 0 0 0)
        meshes=(/Users/rebeccatam/Downloads/MASL Project/ULB_Project/Geometry/4mc.vtp)
    Body fifthmc: mass=0 mass_center=(0 0 0) inertia=(0 0 0 0 0 0)
        meshes=(/Users/rebeccatam/Downloads/MASL Project/ULB_Project/Geometry/5mc.vtp)
    Body proximal_thumb: mass=0 mass_center=(0 0 0) inertia=(0 0 0 0 0 0)
        meshes=(/Users/rebeccatam/Downloads/MASL Project/ULB_Project/Geometry/thumbprox.vtp)
      WrapCylinder IPthumb: xyz_body_rotation=(0.304734 0.0129154 0.0879646) translation=(0.0121 -0.0302 -0.0096)
          quadrant=-x radius=0.0045 length=0.01
    Body distal_thumb: mass=0 mass_center=(0 0 0) inertia=(0 0 0 0 0 0)
        meshes=(/Users/rebeccatam/Downloads/MASL Project/ULB_Project/Geometry/thumbdist.vtp)
    Body 2proxph: mass=0 mass_center=(0 0 0) inertia=(0 0 0 0 0 0)
        meshes=(/Users/rebeccatam/Downloads/MASL Project/ULB_Project/Geometry/2proxph.vtp)
      WrapCylinder Secondpm: xyz_body_rotation=(0.741939 -1.47393 0.709651) translation=(0.0075 -0.0407 0.0061)
          quadrant=all radius=0.004 length=0.01
    Body 2midph: mass=0 mass_center=(0 0 0) inertia=(0 0 0 0 0 0)
        meshes=(/Users/rebeccatam/Downloads/MASL Project/ULB_Project/Geometry/2midph.vtp)
      WrapCylinder Secondmd: xyz_body_rotation=(0.501782 -1.41302 0.647343) translation=(0.0036 -0.0243 0.0003)
          quadrant=x radius=0.003 length=0.01
    Body 2distph: mass=0 mass_center=(0 0 0) inertia=(0 0 0 0 0 0)
        meshes=(/Users/rebeccatam/Downloads/MASL Project/ULB_Project/Geometry/2distph.vtp)
    Body 3proxph: mass=0 mass_center=(0 0 0) inertia=(0 0 0 0 0 0)
        meshes=(/Users/rebeccatam/Downloads/MASL Project/ULB_Project/Geometry/3proxph.vtp)
    Body 3midph: mass=0 mass_center=(0 0 0) inertia=(0 0 0 0 0 0)
        meshes=(/Users/rebeccatam/Downloads/MASL Project/ULB_Project/Geometry/3midph.vtp)
    Body 3distph: mass=0 mass_center=(0 0 0) inertia=(0 0 0 0 0 0)
        meshes=(/Users/rebeccatam/Downloads/MASL Project/ULB_Project/Geometry/3distph.vtp)
    Body 4proxph: mass=0 mass_center=(0 0 0) inertia=(0 0 0 0 0 0)
        meshes=(/Users/rebeccatam/Downloads/MASL Project/ULB_Project/Geometry/4proxph.vtp)
    Body 4midph: mass=0 mass_center=(0 0 0) inertia=(0 0 0 0 0 0)
        meshes=(/Users/rebeccatam/Downloads/MASL Project/ULB_Project/Geometry/4midph.vtp)
    Body 4distph: mass=0 mass_center=(0 0 0) inertia=(0 0 0 0 0 0)
        meshes=(/Users/rebeccatam/Downloads/MASL Project/ULB_Project/Geometry/4distph.vtp)
    Body 5proxph: mass=0 mass_center=(0 0 0) inertia=(0 0 0 0 0 0)
        meshes=(/Users/rebeccatam/Downloads/MASL Project/ULB_Project/Geometry/5proxph.vtp)
    Body 5midph: mass=0 mass_center=(0 0 0) inertia=(0 0 0 0 0 0)
        meshes=(/Users/rebeccatam/Downloads/MASL Project/ULB_Project/Geometry/5midph.vtp)
    Body 5distph: mass=0 mass_center=(0 0 0) inertia=(0 0 0 0 0 0)
        meshes=(/Users/rebeccatam/Downloads/MASL Project/ULB_Project/Geometry/5distph.vtp)
    Body bicpt: mass=0 mass_center=(0 0 0) inertia=(0 0 0 0 0 0)
    Body bicpt2: mass=0 mass_center=(0 0 0) inertia=(0 0 0 0 0 0)
    Body ptpt: mass=0 mass_center=(0 0 0) inertia=(0 0 0 0 0 0)
    Body FCUpt: mass=0 mass_center=(0 0 0) inertia=(0 0 0 0 0 0)
    Body EDCpt: mass=0 mass_center=(0 0 0) inertia=(0 0 0 0 0 0)
    Body APLpt: mass=0 mass_center=(0 0 0) inertia=(0 0 0 0 0 0)
    Body FPLpt: mass=0 mass_center=(0 0 0) inertia=(0 0 0 0 0 0)
    Body FPLpt2: mass=0 mass_center=(0 0 0) inertia=(0 0 0 0 0 0)
    Body PEC1pt2: mass=0 mass_center=(0 0 0) inertia=(0 0 0 0 0 0)
    Body PEC1pt3: mass=0 mass_center=(0 0 0) inertia=(0 0 0 0 0 0)
    Body PEC2pt2: mass=0 mass_center=(0 0 0) inertia=(0 0 0 0 0 0)
    Body PEC2pt3: mass=0 mass_center=(0 0 0) inertia=(0 0 0 0 0 0)
    Body PEC3pt2: mass=0 mass_center=(0 0 0) inertia=(0 0 0 0 0 0)
    Body PEC3pt3: mass=0 mass_center=(0 0 0) inertia=(0 0 0 0 0 0)
    Body DELT2pt2a: mass=0 mass_center=(0 0 0) inertia=(0 0 0 0 0 0)
    Body DELT2pt2: mass=0 mass_center=(0 0 0) inertia=(0 0 0 0 0 0)
    Body LAT1pt2: mass=0 mass_center=(0 0 0) inertia=(0 0 0 0 0 0)
    Body LAT1pt3: mass=0 mass_center=(0 0 0) inertia=(0 0 0 0 0 0)
    Body LAT2pt2: mass=0 mass_center=(0 0 0) inertia=(0 0 0 0 0 0)
    Body LAT2pt3: mass=0 mass_center=(0 0 0) inertia=(0 0 0 0 0 0)
    Body LAT3pt2: mass=0 mass_center=(0 0 0) inertia=(0 0 0 0 0 0)
    Body LAT3pt3: mass=0 mass_center=(0 0 0) inertia=(0 0 0 0 0 0)
    Body clavicle_l: mass=0 mass_center=(0 0 0) inertia=(0 0 0 0 0 0)
        meshes=(/Users/rebeccatam/Downloads/MASL Project/ULB_Project/Geometry/clavicle_l.vtp)
    Body clavphant_l: mass=0 mass_center=(0 0 0) inertia=(0 0 0 0 0 0)
    Body scapula_l: mass=0 mass_center=(0 0 0) inertia=(0 0 0 0 0 0)
        meshes=(/Users/rebeccatam/Downloads/MASL Project/ULB_Project/Geometry/scapula_l.vtp)
      WrapEllipsoid Deltoid2_l: active=false xyz_body_rotation=(-3.13042 1.54881 -1.31423)
          translation=(-0.0058 -0.0378 -0.0096) quadrant=-y dimensions=(0.03 0.04 0.035)
      WrapTorus Delt3_l: active=false xyz_body_rotation=(-0.620988 -0.32882 -0.560774)
          translation=(-0.0973 -0.0428 0.037) quadrant=all inner_radius=0.04 outer_radius=0.06
      WrapTorus INFSP_l: xyz_body_rotation=(-0.0253073 -0.58835 0.151844) translation=(-0.0561 -0.0199 0.0112)
          quadrant=all inner_radius=0.008 outer_radius=0.019
      WrapEllipsoid TMIN_l: xyz_body_rotation=(2.09754 0.280823 -1.76348) translation=(-0.0418 -0.0519 0.0359)
          quadrant=x dimensions=(0.03 0.03 0.05)
      WrapCylinder TRIlongglen_l: xyz_body_rotation=(-1.37532 0.294612 2.43596) translation=(-0.0359 -0.0309 0.0132)
          quadrant=x radius=0.003 length=0.03
    Body scapphant_l: mass=0 mass_center=(0 0 0) inertia=(0 0 0 0 0 0)
    Body humphant_l: mass=0 mass_center=(0 0 0) inertia=(0 0 0 0 0 0)
    Body humphant1_l: mass=0 mass_center=(0 0 0) inertia=(0 0 0 0 0 0)
    Body humerus_l: mass=0 mass_center=(0 0 0) inertia=(0 0 0 0 0 0)
        meshes=(/Users/rebeccatam/Downloads/MASL Project/ULB_Project/Geometry/humerus_l.vtp)
      WrapEllipsoid DELT1hh_l: xyz_body_rotation=(-0.0584685 -1.00461 0.570374) translation=(-0.0139 -0.0127 0.0262)
          quadrant=-z dimensions=(0.03 0.1 0.05)
      WrapCylinder delt2hum_l: xyz_body_rotation=(-1.68093 0.0249582 0.0516617) translation=(0.0017 -0.0958 -0.0011)
          quadrant=all radius=0.0094 length=0.05
      WrapEllipsoid delt3hum_l: xyz_body_rotation=(-1.72735 -0.0759218 -2.74313) translation=(0.0019 -0.0592 -0.0011)
          quadrant=x dimensions=(0.01 0.01 0.05)
      WrapEllipsoid SUPSP_l: xyz_body_rotation=(-0.0380482 -0.00855211 -1.30673) translation=(0.0002 0.0077 -0.0043)
          quadrant=all dimensions=(0.02 0.02 0.02)
      WrapEllipsoid INFSP_and_TMIN_hum_head_l: xyz_body_rotation=(0.286583 0.00907571 -0.0684169)
          translation=(-0.0003 0.0026 -0.0038) quadrant=all dimensions=(0.02 0.025 0.02)
      WrapEllipsoid SUBSCAP_l: xyz_body_rotation=(0.924501 -0.288852 0.381529) translation=(-0.0025 0.0007 0.0045)
          quadrant=all dimensions=(0.02 0.017 0.028)
      WrapCylinder TMINhum_l: xyz_body_rotation=(-1.75353 -0.0692896 2.74628) translation=(-0.0014 -0.0455 0)
          quadrant=x radius=0.007 length=0.07
      WrapSphere TMAJ_LAT_PEC_CORBhh_l: translation=(0.0007 0 -0.006) quadrant=all radius=0.03
      WrapCylinder TMAJ_LAThum_l: xyz_body_rotation=(-1.53641 0.0637045 1.41424) translation=(0.0007 -0.0443 0.0055)
          quadrant=-x radius=0.007 length=0.04
      WrapEllipsoid PEC1hh_l: xyz_body_rotation=(0.620465 0.310494 0.363727) translation=(-0.0037 0.0005 0.0025)
          quadrant=z dimensions=(0.03 0.02 0.02)
      WrapCylinder PEC12hum_l: xyz_body_rotation=(-1.55928 0.0774926 -0.925897) translation=(0.002 -0.0508 0.0017)
          quadrant=x radius=0.009 length=0.07
      WrapSphere PEC23hh_l: translation=(-0.0086 0.0021 0.0004) quadrant=all radius=0.02
      WrapCylinder PEC3hum_l: xyz_body_rotation=(-1.44094 0.0561996 1.75196) translation=(0.0009 -0.0551 0.0004)
          quadrant=-x radius=0.008 length=0.07
      WrapCylinder LAT_TMAJhh_l: xyz_body_rotation=(0.305084 0.018326 -0.686613) translation=(-0.0224 0.0102 -0.0094)
          quadrant=-y radius=0.007 length=0.045
      WrapSphere LAT_TMAJ2hh_l: xyz_body_rotation=(0.127235 -0.276111 0.0197222) translation=(-0.0016 0.0092 -0.0052)
          quadrant=z radius=0.03
      WrapCylinder CORBhum_l: xyz_body_rotation=(1.60832 -0.0959931 0.875283) translation=(0.0027 -0.1202 0.0059)
          quadrant=x radius=0.008 length=0.05
      WrapEllipsoid TRIlonghh_l: xyz_body_rotation=(-3.00162 0.853466 2.57419) translation=(-0.0078 -0.0041 0.0014)
          quadrant=-z dimensions=(0.035 0.02 0.02)
      WrapCylinder TRI_l: xyz_body_rotation=(0.14015 0.00628319 0.154985) translation=(0.0028 -0.2919 0.0119)
          quadrant=all radius=0.016 length=0.04
      WrapEllipsoid ANC_l: xyz_body_rotation=(-0.00750492 0.196699 1.04929) translation=(0.0134 -0.2861 0.0008)
          quadrant=-x dimensions=(0.02 0.02 0.02)
      WrapEllipsoid BIClong_l: xyz_body_rotation=(2.00434 1.00164 0.975465) translation=(0.0033 0.0073 -0.0003)
          quadrant=-y dimensions=(0.025 0.02 0.02)
      WrapEllipsoid Elbow_BIC_BRD_l: xyz_body_rotation=(0.128631 -0.137532 0.0307178) translation=(0.0019 -0.289 0.014)
          quadrant=x dimensions=(0.015 0.015 0.1)
      WrapEllipsoid Elbow_PT_ECRL_l: xyz_body_rotation=(0.161094 0.110828 0.61453) translation=(0.003 -0.2872 0.0069)
          quadrant=x dimensions=(0.018 0.025 0.035)
    Body ulna_l: mass=0 mass_center=(0 0 0) inertia=(0 0 0 0 0 0)
        meshes=(/Users/rebeccatam/Downloads/MASL Project/ULB_Project/Geometry/ulna_l.vtp)
      WrapCylinder PQ2_l: xyz_body_rotation=(-1.39138 -0.0689405 1.52245) translation=(-0.0012 -0.2092 -0.0428)
          quadrant=all radius=0.007 length=0.01
    Body radius_l: mass=0 mass_center=(0 0 0) inertia=(0 0 0 0 0 0)
        meshes=(/Users/rebeccatam/Downloads/MASL Project/ULB_Project/Geometry/radius_l.vtp)
      WrapCylinder SUP_l: xyz_body_rotation=(-1.44775 -0.304036 -2.44102) translation=(0.0045 -0.0437 -0.0059)
          quadrant=-x radius=0.008 length=0.04
      WrapTorus ECU_l: xyz_body_rotation=(0.986635 0.148877 0.222704) translation=(-0.0163 -0.2417 -0.0349)
          quadrant=all inner_radius=0.006 outer_radius=0.009
      WrapCylinder PQ1_l: xyz_body_rotation=(1.60762 0.0127409 -2.69025) translation=(0.0281 -0.1986 -0.0288)
          quadrant=all radius=0.01 length=0.01
    Body lunate_l: mass=0 mass_center=(0 0 0) inertia=(0 0 0 0 0 0)
        meshes=(/Users/rebeccatam/Downloads/MASL Project/ULB_Project/Geometry/lunate_l.vtp)
      WrapEllipsoid Extensor_ellipse_l: xyz_body_rotation=(0.250804 -0.285536 0.232827)
          translation=(0.0007 -0.0135 -0.0047) quadrant=-z dimensions=(0.05 0.02 0.013)
      WrapTorus ECRL_l: xyz_body_rotation=(-1.53833 -0.234398 0.731118) translation=(0.0222 -0.0096 -0.0208)
          quadrant=all inner_radius=0.008 outer_radius=0.016
      WrapTorus ECRB_l: xyz_body_rotation=(-1.31266 0.11781 -0.116239) translation=(0.0126 -0.0095 -0.0186)
          quadrant=all inner_radius=0.008 outer_radius=0.01
      WrapTorus FCR_l: xyz_body_rotation=(1.55596 0.15324 -0.100007) translation=(0.0032 -0.0045 0.019) quadrant=all
          inner_radius=0.001 outer_radius=0.0025
      WrapTorus FCU_l: xyz_body_rotation=(1.57376 0.0797616 0.39235) translation=(-0.0123 -0.0124 0.0171) quadrant=all
          inner_radius=0.0068 outer_radius=0.008
      WrapEllipsoid PL_l: xyz_body_rotation=(0.0315905 -0.0996583 0.0633554) translation=(0.0057 -0.018 0.0041)
          quadrant=z dimensions=(0.025 0.014 0.012)
      WrapEllipsoid FDS_l: xyz_body_rotation=(-0.00837758 0.0816814 -0.0171042) translation=(0.0012 -0.0057 0.0003)
          quadrant=z dimensions=(0.025 0.013 0.012)
      WrapEllipsoid FDP_l: xyz_body_rotation=(1.46747 0.194604 0.121824) translation=(-0.0022 -0.0069 -0.0032)
          quadrant=y dimensions=(0.025 0.013 0.012)
      WrapTorus EDCL_l: xyz_body_rotation=(-2.36318 -0.193033 -0.26913) translation=(-0.0128 -0.0133 -0.0148)
          quadrant=all inner_radius=0.008 outer_radius=0.012
      WrapTorus EDCR_l: xyz_body_rotation=(-1.98392 -0.100531 0.523075) translation=(-0.0098 -0.0137 -0.0166)
          quadrant=all inner_radius=0.009 outer_radius=0.011
      WrapTorus EDCM_l: xyz_body_rotation=(-1.99317 -0.19792 0.368264) translation=(-0.0007 -0.0117 -0.0191)
          quadrant=all inner_radius=0.009 outer_radius=0.012
      WrapTorus EDCI_l: xyz_body_rotation=(-1.69768 -0.0897099 0.00767945) translation=(0.009 -0.0149 -0.0211)
          quadrant=all inner_radius=0.009 outer_radius=0.012
      WrapEllipsoid EDM_l: xyz_body_rotation=(-2.9627 -0.159349 0.117984) translation=(-0.0167 -0.0022 -0.0048)
          quadrant=z dimensions=(0.018 0.014 0.008)
      WrapEllipsoid FPL_l: xyz_body_rotation=(0.16633 0.082205 -0.0659735) translation=(0.017 -0.025 0.0033) quadrant=z
          dimensions=(0.016 0.01 0.01)
    Body scaphoid_l: mass=0 mass_center=(0 0 0) inertia=(0 0 0 0 0 0)
        meshes=(/Users/rebeccatam/Downloads/MASL Project/ULB_Project/Geometry/scaphoid_l.vtp)
    Body pisiform_l: mass=0 mass_center=(0 0 0) inertia=(0 0 0 0 0 0)
        meshes=(/Users/rebeccatam/Downloads/MASL Project/ULB_Project/Geometry/pisiform_l.vtp)
    Body triquetrum_l: mass=0 mass_center=(0 0 0) inertia=(0 0 0 0 0 0)
        meshes=(/Users/rebeccatam/Downloads/MASL Project/ULB_Project/Geometry/triquetrum_l.vtp)
    Body capitate_l: mass=0 mass_center=(0 0 0) inertia=(0 0 0 0 0 0)
        meshes=(/Users/rebeccatam/Downloads/MASL Project/ULB_Project/Geometry/capitate_l.vtp)
    Body trapezium_l: mass=0 mass_center=(0 0 0) inertia=(0 0 0 0 0 0)
        meshes=(/Users/rebeccatam/Downloads/MASL Project/ULB_Project/Geometry/trapezium_l.vtp)
    Body trapezoid_l: mass=0 mass_center=(0 0 0) inertia=(0 0 0 0 0 0)
        meshes=(/Users/rebeccatam/Downloads/MASL Project/ULB_Project/Geometry/trapezoid_l.vtp)
    Body hamate_l: mass=0 mass_center=(0 0 0) inertia=(0 0 0 0 0 0)
        meshes=(/Users/rebeccatam/Downloads/MASL Project/ULB_Project/Geometry/hamate_l.vtp)
    Body firstmc1_l: mass=0 mass_center=(0 0 0) inertia=(0 0 0 0 0 0)
      WrapTorus APL_l: active=false xyz_body_rotation=(1.60989 -0.247837 -0.0301942) translation=(0.0082 0.0023 0.0101)
          quadrant=all inner_radius=0.004 outer_radius=0.008
    Body firstmc_l: mass=0 mass_center=(0 0 0) inertia=(0 0 0 0 0 0)
        meshes=(/Users/rebeccatam/Downloads/MASL Project/ULB_Project/Geometry/1mc_l.vtp)
      WrapCylinder MPthumb_l: xyz_body_rotation=(-0.321315 -0.11013 -0.834791) translation=(0.0177 -0.0305 0.0143)
          quadrant=all radius=0.0085 length=0.02
    Body secondmc_l: mass=0 mass_center=(0 0 0) inertia=(0 0 0 0 0 0)
        meshes=(/Users/rebeccatam/Downloads/MASL Project/ULB_Project/Geometry/2mc_l.vtp)
      WrapEllipsoid 2ndmcp_l: xyz_body_rotation=(-1.48667 1.29661 2.43072) translation=(0.0059 -0.0304 0.0006)
          quadrant=-x dimensions=(0.005 0.005 0.03)
    Body thirdmc_l: mass=0 mass_center=(0 0 0) inertia=(0 0 0 0 0 0)
        meshes=(/Users/rebeccatam/Downloads/MASL Project/ULB_Project/Geometry/3mc_l.vtp)
    Body fourthmc_l: mass=0 mass_center=(0 0 0) inertia=(0 0 0 0 0 0)
        meshes=(/Users/rebeccatam/Downloads/MASL Project/ULB_Project/Geometry/4mc_l.vtp)
    Body fifthmc_l: mass=0 mass_center=(0 0 0) inertia=(0 0 0 0 0 0)
        meshes=(/Users/rebeccatam/Downloads/MASL Project/ULB_Project/Geometry/5mc_l.vtp)
    Body proximal_thumb_l: mass=0 mass_center=(0 0 0) inertia=(0 0 0 0 0 0)
        meshes=(/Users/rebeccatam/Downloads/MASL Project/ULB_Project/Geometry/thumbprox_l.vtp)
      WrapCylinder IPthumb_l: xyz_body_rotation=(-0.304734 -0.0129154 0.0879646) translation=(0.0121 -0.0302 0.0096)
          quadrant=-x radius=0.0045 length=0.01
    Body distal_thumb_l: mass=0 mass_center=(0 0 0) inertia=(0 0 0 0 0 0)
        meshes=(/Users/rebeccatam/Downloads/MASL Project/ULB_Project/Geometry/thumbdist_l.vtp)
    Body 2proxph_l: mass=0 mass_center=(0 0 0) inertia=(0 0 0 0 0 0)
        meshes=(/Users/rebeccatam/Downloads/MASL Project/ULB_Project/Geometry/2proxph_l.vtp)
      WrapCylinder Secondpm_l: xyz_body_rotation=(-0.741939 1.47393 0.709651) translation=(0.0075 -0.0407 -0.0061)
          quadrant=all radius=0.004 length=0.01
    Body 2midph_l: mass=0 mass_center=(0 0 0) inertia=(0 0 0 0 0 0)
        meshes=(/Users/rebeccatam/Downloads/MASL Project/ULB_Project/Geometry/2midph_l.vtp)
      WrapCylinder Secondmd_l: xyz_body_rotation=(-0.501782 1.41302 0.647343) translation=(0.0036 -0.0243 -0.0003)
          quadrant=x radius=0.003 length=0.01
    Body 2distph_l: mass=0 mass_center=(0 0 0) inertia=(0 0 0 0 0 0)
        meshes=(/Users/rebeccatam/Downloads/MASL Project/ULB_Project/Geometry/2distph_l.vtp)
    Body 3proxph_l: mass=0 mass_center=(0 0 0) inertia=(0 0 0 0 0 0)
        meshes=(/Users/rebeccatam/Downloads/MASL Project/ULB_Project/Geometry/3proxph_l.vtp)
    Body 3midph_l: mass=0 mass_center=(0 0 0) inertia=(0 0 0 0 0 0)
        meshes=(/Users/rebeccatam/Downloads/MASL Project/ULB_Project/Geometry/3midph_l.vtp)
    Body 3distph_l: mass=0 mass_center=(0 0 0) inertia=(0 0 0 0 0 0)
        meshes=(/Users/rebeccatam/Downloads/MASL Project/ULB_Project/Geometry/3distph_l.vtp)
    Body 4proxph_l: mass=0 mass_center=(0 0 0) inertia=(0 0 0 0 0 0)
        meshes=(/Users/rebeccatam/Downloads/MASL Project/ULB_Project/Geometry/4proxph_l.vtp)
    Body 4midph_l: mass=0 mass_center=(0 0 0) inertia=(0 0 0 0 0 0)
        meshes=(/Users/rebeccatam/Downloads/MASL Project/ULB_Project/Geometry/4midph_l.vtp)
    Body 4distph_l: mass=0 mass_center=(0 0 0) inertia=(0 0 0 0 0 0)
        meshes=(/Users/rebeccatam/Downloads/MASL Project/ULB_Project/Geometry/4distph_l.vtp)
    Body 5proxph_l: mass=0 mass_center=(0 0 0) inertia=(0 0 0 0 0 0)
        meshes=(/Users/rebeccatam/Downloads/MASL Project/ULB_Project/Geometry/5proxph_l.vtp)
    Body 5midph_l: mass=0 mass_center=(0 0 0) inertia=(0 0 0 0 0 0)
        meshes=(/Users/rebeccatam/Downloads/MASL Project/ULB_Project/Geometry/5midph_l.vtp)
    Body 5distph_l: mass=0 mass_center=(0 0 0) inertia=(0 0 0 0 0 0)
        meshes=(/Users/rebeccatam/Downloads/MASL Project/ULB_Project/Geometry/5distph_l.vtp)
    Body bicpt_l: mass=0 mass_center=(0 0 0) inertia=(0 0 0 0 0 0)
    Body bicpt2_l: mass=0 mass_center=(0 0 0) inertia=(0 0 0 0 0 0)
    Body ptpt_l: mass=0 mass_center=(0 0 0) inertia=(0 0 0 0 0 0)
    Body FCUpt_l: mass=0 mass_center=(0 0 0) inertia=(0 0 0 0 0 0)
    Body EDCpt_l: mass=0 mass_center=(0 0 0) inertia=(0 0 0 0 0 0)
    Body APLpt_l: mass=0 mass_center=(0 0 0) inertia=(0 0 0 0 0 0)
    Body FPLpt_l: mass=0 mass_center=(0 0 0) inertia=(0 0 0 0 0 0)
    Body FPLpt2_l: mass=0 mass_center=(0 0 0) inertia=(0 0 0 0 0 0)
    Body PEC1pt2_l: mass=0 mass_center=(0 0 0) inertia=(0 0 0 0 0 0)
    Body PEC1pt3_l: mass=0 mass_center=(0 0 0) inertia=(0 0 0 0 0 0)
    Body PEC2pt2_l: mass=0 mass_center=(0 0 0) inertia=(0 0 0 0 0 0)
    Body PEC2pt3_l: mass=0 mass_center=(0 0 0) inertia=(0 0 0 0 0 0)
    Body PEC3pt2_l: mass=0 mass_center=(0 0 0) inertia=(0 0 0 0 0 0)
    Body PEC3pt3_l: mass=0 mass_center=(0 0 0) inertia=(0 0 0 0 0 0)
    Body DELT2pt2a_l: mass=0 mass_center=(0 0 0) inertia=(0 0 0 0 0 0)
    Body DELT2pt2_l: mass=0 mass_center=(0 0 0) inertia=(0 0 0 0 0 0)
    Body LAT1pt2_l: mass=0 mass_center=(0 0 0) inertia=(0 0 0 0 0 0)
    Body LAT1pt3_l: mass=0 mass_center=(0 0 0) inertia=(0 0 0 0 0 0)
    Body LAT2pt2_l: mass=0 mass_center=(0 0 0) inertia=(0 0 0 0 0 0)
    Body LAT2pt3_l: mass=0 mass_center=(0 0 0) inertia=(0 0 0 0 0 0)
    Body LAT3pt2_l: mass=0 mass_center=(0 0 0) inertia=(0 0 0 0 0 0)
    Body LAT3pt3_l: mass=0 mass_center=(0 0 0) inertia=(0 0 0 0 0 0)
  JointSet:
    CustomJoint ground_pelvis: socket_parent_frame=ground_offset socket_child_frame=pelvis_offset
      Coordinate pelvis_tilt: default_value=0 range=(-1.570796 1.570796) clamped=true
      Coordinate pelvis_list: default_value=0 range=(-1.570796 1.570796) clamped=true
      Coordinate pelvis_rotation: default_value=0 range=(-1.570796 1.570796) clamped=true
      Coordinate pelvis_tx: default_value=0 range=(-5 5) clamped=true
      Coordinate pelvis_ty: default_value=0.93 range=(-1 2) clamped=true
      Coordinate pelvis_tz: default_value=0 range=(-3 3) clamped=true
      PhysicalOffsetFrame ground_offset: socket_parent=/ground translation=(0 0 0) [meters]
      PhysicalOffsetFrame pelvis_offset: socket_parent=/bodyset/pelvis translation=(0 0 0)
      SpatialTransform:
        TransformAxis rotation1: coordinates=pelvis_tilt axis=(1 0 0) LinearFunction(coefficients=1 0)
        TransformAxis rotation2: coordinates=pelvis_list axis=(0 1 0) LinearFunction(coefficients=1 0)
        TransformAxis rotation3: coordinates=pelvis_rotation axis=(0 0 1) LinearFunction(coefficients=1 0)
        TransformAxis translation1: coordinates=pelvis_tx axis=(1 0 0) LinearFunction(coefficients=1 0)
        TransformAxis translation2: coordinates=pelvis_ty axis=(0 1 0) LinearFunction(coefficients=1 0)
        TransformAxis translation3: coordinates=pelvis_tz axis=(0 0 1) LinearFunction(coefficients=1 0)
    CustomJoint back: socket_parent_frame=pelvis_offset socket_child_frame=thorax_offset
      Coordinate back_tilt: default_value=0 range=(-1.570796 1.570796) clamped=true
      Coordinate back_list: default_value=0 range=(-1.570796 1.570796) clamped=true
      Coordinate back_rotation: default_value=0 range=(-1.570796 1.570796) clamped=true
      PhysicalOffsetFrame pelvis_offset: socket_parent=/bodyset/pelvis translation=(-0.1007 0.0815 0)
      PhysicalOffsetFrame thorax_offset: socket_parent=/bodyset/thorax translation=(-0.0205 -0.3785 0)
      SpatialTransform: axes_held_at_zero=(translation1 translation2 translation3)
        TransformAxis rotation1: coordinates=back_tilt axis=(1 0 0) LinearFunction(coefficients=1 0)
        TransformAxis rotation2: coordinates=back_list axis=(0 1 0) LinearFunction(coefficients=1 0)
        TransformAxis rotation3: coordinates=back_rotation axis=(0 0 1) LinearFunction(coefficients=1 0)
    CustomJoint hip_r: socket_parent_frame=pelvis_offset socket_child_frame=femur_r_offset
      Coordinate hip_flexion_r: default_value=0 range=(-2.094395 2.094395) clamped=true
      Coordinate hip_adduction_r: default_value=0 range=(-2.094395 2.094395) clamped=true
      Coordinate hip_rotation_r: default_value=0 range=(-2.094395 2.094395) clamped=true
      PhysicalOffsetFrame pelvis_offset: socket_parent=/bodyset/pelvis translation=(-0.0707 -0.0661 0.0835)
      PhysicalOffsetFrame femur_r_offset: socket_parent=/bodyset/femur_r translation=(0 0 0)
      SpatialTransform: axes_held_at_zero=(translation1 translation2 translation3)
        TransformAxis rotation1: coordinates=hip_flexion_r axis=(0 0 1) LinearFunction(coefficients=1 0)
        TransformAxis rotation2: coordinates=hip_adduction_r axis=(1 0 0) LinearFunction(coefficients=1 0)
        TransformAxis rotation3: coordinates=hip_rotation_r axis=(0 1 0) LinearFunction(coefficients=1 0)
    CustomJoint knee_r: socket_parent_frame=femur_r_offset socket_child_frame=tibia_r_offset
      Coordinate knee_angle_r: default_value=0 range=(-2.094395 0.1745329) clamped=true
      PhysicalOffsetFrame femur_r_offset: socket_parent=/bodyset/femur_r translation=(0 0 0)
      PhysicalOffsetFrame tibia_r_offset: socket_parent=/bodyset/tibia_r translation=(0 0 0)
      SpatialTransform: axes_held_at_zero=(rotation2 rotation3 translation3)
        TransformAxis rotation1: coordinates=knee_angle_r axis=(0 0 1) LinearFunction(coefficients=1 0)
        TransformAxis translation1: coordinates=knee_angle_r axis=(1 0 0)
          SimmSpline: x=(-2.0944 -1.74533 -1.39626 -1.0472 -0.698132 -0.349066 -0.174533 0.197344 0.337395 0.490178 1.52146 2.0944)
              y=(-0.0032 0.00179 0.00411 0.0041 0.00212 -0.001 -0.0031 -0.005227 -0.005435 -0.005574 -0.005435 -0.00525)
        TransformAxis translation2: coordinates=knee_angle_r axis=(0 1 0)
          SimmSpline: x=(-2.0944 -1.22173 -0.523599 -0.349066 -0.174533 0.159149 2.0944)
              y=(-0.4226 -0.4082 -0.399 -0.3976 -0.3966 -0.395264 -0.396)
    CustomJoint ankle_r: socket_parent_frame=tibia_r_offset socket_child_frame=talus_r_offset
      Coordinate ankle_angle_r: default_value=0 range=(-1.570796 1.570796) clamped=true
      PhysicalOffsetFrame tibia_r_offset: socket_parent=/bodyset/tibia_r translation=(0 -0.43 0)
      PhysicalOffsetFrame talus_r_offset: socket_parent=/bodyset/talus_r translation=(0 0 0)
      SpatialTransform: axes_held_at_zero=(rotation2 rotation3 translation1 translation2 translation3)
        TransformAxis rotation1: coordinates=ankle_angle_r axis=(0 0 1) LinearFunction(coefficients=1 0)
    CustomJoint subtalar_r: socket_parent_frame=talus_r_offset socket_child_frame=calcn_r_offset
      Coordinate subtalar_angle_r: default_value=0 range=(-1.570796 1.570796) clamped=true
      PhysicalOffsetFrame talus_r_offset: socket_parent=/bodyset/talus_r translation=(-0.04877 -0.04195 0.00792)
      PhysicalOffsetFrame calcn_r_offset: socket_parent=/bodyset/calcn_r translation=(0 0 0)
      SpatialTransform: axes_held_at_zero=(rotation2 rotation3 translation1 translation2 translation3)
        TransformAxis rotation1: coordinates=subtalar_angle_r axis=(0.7871796 0.6047475 -0.1209495)
            LinearFunction(coefficients=1 0)
    CustomJoint mtp_r: socket_parent_frame=calcn_r_offset socket_child_frame=toes_r_offset
      Coordinate mtp_angle_r: default_value=0 range=(-1.570796 1.570796) clamped=true
      PhysicalOffsetFrame calcn_r_offset: socket_parent=/bodyset/calcn_r translation=(0.1788 -0.002 0.00108)
      PhysicalOffsetFrame toes_r_offset: socket_parent=/bodyset/toes_r translation=(0 0 0)
      SpatialTransform: axes_held_at_zero=(rotation2 rotation3 translation1 translation2 translation3)
        TransformAxis rotation1: coordinates=mtp_angle_r axis=(-0.5809544 0 0.8139361) LinearFunction(coefficients=1 0)
    CustomJoint hip_l: socket_parent_frame=pelvis_offset socket_child_frame=femur_l_offset
      Coordinate hip_flexion_l: default_value=0 range=(-2.094395 2.094395) clamped=true
      Coordinate hip_adduction_l: default_value=0 range=(-2.094395 2.094395) clamped=true
      Coordinate hip_rotation_l: default_value=0 range=(-2.094395 2.094395) clamped=true
      PhysicalOffsetFrame pelvis_offset: socket_parent=/bodyset/pelvis translation=(-0.0707 -0.0661 -0.0835)
      PhysicalOffsetFrame femur_l_offset: socket_parent=/bodyset/femur_l translation=(0 0 0)
      SpatialTransform: axes_held_at_zero=(translation1 translation2 translation3)
        TransformAxis rotation1: coordinates=hip_flexion_l axis=(0 0 1) LinearFunction(coefficients=1 0)
        TransformAxis rotation2: coordinates=hip_adduction_l axis=(-1 0 0) LinearFunction(coefficients=1 0)
        TransformAxis rotation3: coordinates=hip_rotation_l axis=(0 -1 0) LinearFunction(coefficients=1 0)
    CustomJoint knee_l: socket_parent_frame=femur_l_offset socket_child_frame=tibia_l_offset
      Coordinate knee_angle_l: default_value=0 range=(-2.094395 0.1745329) clamped=true
      PhysicalOffsetFrame femur_l_offset: socket_parent=/bodyset/femur_l translation=(0 0 0)
      PhysicalOffsetFrame tibia_l_offset: socket_parent=/bodyset/tibia_l translation=(0 0 0)
      SpatialTransform: axes_held_at_zero=(rotation2 rotation3 translation3)
        TransformAxis rotation1: coordinates=knee_angle_l axis=(0 0 1) LinearFunction(coefficients=1 0)
        TransformAxis translation1: coordinates=knee_angle_l axis=(1 0 0)
          SimmSpline: x=(-2.0944 -1.74533 -1.39626 -1.0472 -0.698132 -0.349066 -0.174533 0.197344 0.337395 0.490178 1.52146 2.0944)
              y=(-0.0032 0.00179 0.00411 0.0041 0.00212 -0.001 -0.0031 -0.005227 -0.005435 -0.005574 -0.005435 -0.00525)
        TransformAxis translation2: coordinates=knee_angle_l axis=(0 1 0)
          SimmSpline: x=(-2.0944 -1.22173 -0.523599 -0.349066 -0.174533 0.159149 2.0944)
              y=(-0.4226 -0.4082 -0.399 -0.3976 -0.3966 -0.395264 -0.396)
    CustomJoint ankle_l: socket_parent_frame=tibia_l_offset socket_child_frame=talus_l_offset
      Coordinate ankle_angle_l: default_value=0 range=(-1.570796 1.570796) clamped=true
      PhysicalOffsetFrame tibia_l_offset: socket_parent=/bodyset/tibia_l translation=(0 -0.43 0)
      PhysicalOffsetFrame talus_l_offset: socket_parent=/bodyset/talus_l translation=(0 0 0)
      SpatialTransform: axes_held_at_zero=(rotation2 rotation3 translation1 translation2 translation3)
        TransformAxis rotation1: coordinates=ankle_angle_l axis=(0 0 1) LinearFunction(coefficients=1 0)
    CustomJoint subtalar_l: socket_parent_frame=talus_l_offset socket_child_frame=calcn_l_offset
      Coordinate subtalar_angle_l: default_value=0 range=(-1.570796 1.570796) clamped=true
      PhysicalOffsetFrame talus_l_offset: socket_parent=/bodyset/talus_l translation=(-0.04877 -0.04195 -0.00792)
      PhysicalOffsetFrame calcn_l_offset: socket_parent=/bodyset/calcn_l translation=(0 0 0)
      SpatialTransform: axes_held_at_zero=(rotation2 rotation3 translation1 translation2 translation3)
        TransformAxis rotation1: coordinates=subtalar_angle_l axis=(-0.7871796 -0.6047475 -0.1209495)
            LinearFunction(coefficients=1 0)
    CustomJoint mtp_l: socket_parent_frame=calcn_l_offset socket_child_frame=toes_l_offset
      Coordinate mtp_angle_l: default_value=0 range=(-1.570796 1.570796) clamped=true
      PhysicalOffsetFrame calcn_l_offset: socket_parent=/bodyset/calcn_l translation=(0.1788 -0.002 -0.00108)
      PhysicalOffsetFrame toes_l_offset: socket_parent=/bodyset/toes_l translation=(0 0 0)
      SpatialTransform: axes_held_at_zero=(rotation2 rotation3 translation1 translation2 translation3)
        TransformAxis rotation1: coordinates=mtp_angle_l axis=(0.5809544 0 0.8139361) LinearFunction(coefficients=1 0)
    CustomJoint sternoclavicular: socket_parent_frame=thorax_offset socket_child_frame=clavicle_offset
      Coordinate sternoclavicular_r2: default_value=0 range=(-99999.9 99999.9) clamped=false
      Coordinate sternoclavicular_r3: default_value=0 range=(-99999.9 99999.9) clamped=false
      PhysicalOffsetFrame thorax_offset: socket_parent=/bodyset/thorax translation=(0.006325 0.00693 0.025465)
      PhysicalOffsetFrame clavicle_offset: socket_parent=/bodyset/clavicle translation=(0 0 0)
      SpatialTransform: axes_held_at_zero=(rotation3 translation1 translation2 translation3)
        TransformAxis rotation1: coordinates=sternoclavicular_r2 axis=(0.0153 0.9892987 -0.1451)
            LinearFunction(coefficients=1 0)
        TransformAxis rotation2: coordinates=sternoclavicular_r3 axis=(-0.9944725 0 -0.104997)
            LinearFunction(coefficients=1 0)
    CustomJoint unrotscap: socket_parent_frame=clavicle_offset socket_child_frame=clavphant_offset
      Coordinate unrotscap_r3: default_value=0 range=(-99999.9 99999.9) clamped=false
      Coordinate unrotscap_r2: default_value=0 range=(-99999.9 99999.9) clamped=false
      PhysicalOffsetFrame clavicle_offset: socket_parent=/bodyset/clavicle translation=(-0.01433 0.02007 0.135535)
      PhysicalOffsetFrame clavphant_offset: socket_parent=/bodyset/clavphant translation=(0 0 0)
      SpatialTransform: axes_held_at_zero=(rotation3 translation1 translation2 translation3)
        TransformAxis rotation1: coordinates=unrotscap_r3 axis=(-0.9944725 0 -0.104997)
            LinearFunction(coefficients=1 0)
        TransformAxis rotation2: coordinates=unrotscap_r2 axis=(0.0153 0.9892987 -0.1451)
            LinearFunction(coefficients=1 0)
    CustomJoint acromioclavicular: socket_parent_frame=clavphant_offset socket_child_frame=scapula_offset
      Coordinate acromioclavicular_r2: default_value=0 range=(-99999.9 99999.9) clamped=false
      Coordinate acromioclavicular_r3: default_value=0 range=(-99999.9 99999.9) clamped=false
      Coordinate acromioclavicular_r1: default_value=0 range=(-99999.9 99999.9) clamped=false
      PhysicalOffsetFrame clavphant_offset: socket_parent=/bodyset/clavphant translation=(0 0 0)
      PhysicalOffsetFrame scapula_offset: socket_parent=/bodyset/scapula translation=(0 0 0)
      SpatialTransform: axes_held_at_zero=(translation1 translation2 translation3)
        TransformAxis rotation1: coordinates=acromioclavicular_r2 axis=(0.1570949 0.9472686 -0.2792909)
            LinearFunction(coefficients=1 0)
        TransformAxis rotation2: coordinates=acromioclavicular_r3 axis=(-0.754084 0.297594 0.585487)
            LinearFunction(coefficients=1 0)
        TransformAxis rotation3: coordinates=acromioclavicular_r1 axis=(0.6376999 0.1186 0.7610998)
            LinearFunction(coefficients=1 0)
    CustomJoint unrothum: socket_parent_frame=scapula_offset socket_child_frame=scapphant_offset
      Coordinate unrothum_r1: default_value=0 range=(-99999.9 99999.9) clamped=false
      Coordinate unrothum_r3: default_value=0 range=(-99999.9 99999.9) clamped=false
      Coordinate unrothum_r2: default_value=0 range=(-99999.9 99999.9) clamped=false
      PhysicalOffsetFrame scapula_offset: socket_parent=/bodyset/scapula translation=(-0.00955 -0.034 0.009)
      PhysicalOffsetFrame scapphant_offset: socket_parent=/bodyset/scapphant translation=(0 0 0)
      SpatialTransform: axes_held_at_zero=(translation1 translation2 translation3)
        TransformAxis rotation1: coordinates=unrothum_r1 axis=(0.6376999 0.1186 0.7610998)
            LinearFunction(coefficients=1 0)
        TransformAxis rotation2: coordinates=unrothum_r3 axis=(-0.754084 0.297594 0.585487)
            LinearFunction(coefficients=1 0)
        TransformAxis rotation3: coordinates=unrothum_r2 axis=(0.1570949 0.9472686 -0.2792909)
            LinearFunction(coefficients=1 0)
    CustomJoint shoulder0: socket_parent_frame=scapphant_offset socket_child_frame=humphant_offset
      Coordinate elv_angle: default_value=0 range=(-1.570796 2.268928) clamped=true
      PhysicalOffsetFrame scapphant_offset: socket_parent=/bodyset/scapphant translation=(0 0 0)
      PhysicalOffsetFrame humphant_offset: socket_parent=/bodyset/humphant translation=(0 0 0)
      SpatialTransform: axes_held_at_zero=(rotation2 rotation3 translation1 translation2 translation3)
        TransformAxis rotation1: coordinates=elv_angle axis=(0.004800001 0.9990892 0.04240001)
            LinearFunction(coefficients=1 0)
    CustomJoint shoulder1: socket_parent_frame=humphant_offset socket_child_frame=humphant1_offset
      Coordinate shoulder_elv: default_value=0 range=(0 3.141593) clamped=true
      Coordinate shoulder1_r2: default_value=0 range=(-99999.9 99999.9) clamped=false
      PhysicalOffsetFrame humphant_offset: socket_parent=/bodyset/humphant translation=(0 0 0)
      PhysicalOffsetFrame humphant1_offset: socket_parent=/bodyset/humphant1 translation=(0 0 0)
      SpatialTransform: axes_held_at_zero=(rotation3 translation1 translation2 translation3)
        TransformAxis rotation1: coordinates=shoulder_elv axis=(-0.9982614 0.002300001 0.05889802)
            LinearFunction(coefficients=1 0)
        TransformAxis rotation2: coordinates=shoulder1_r2 axis=(0.004800001 0.9990892 0.04240001)
            LinearFunction(coefficients=1 0)
    CustomJoint shoulder2: socket_parent_frame=humphant1_offset socket_child_frame=humerus_offset
      Coordinate shoulder_rot: default_value=0 range=(-1.570796 0.3490659) clamped=true
      PhysicalOffsetFrame humphant1_offset: socket_parent=/bodyset/humphant1 translation=(0 0 0)
      PhysicalOffsetFrame humerus_offset: socket_parent=/bodyset/humerus translation=(0 0 0)
      SpatialTransform: axes_held_at_zero=(rotation2 rotation3 translation1 translation2 translation3)
        TransformAxis rotation1: coordinates=shoulder_rot axis=(0.004800001 0.9990892 0.04240001)
            LinearFunction(coefficients=1 0)
    CustomJoint elbow: socket_parent_frame=humerus_offset socket_child_frame=ulna_offset
      Coordinate elbow_flexion: default_value=0 range=(0 2.268928) clamped=true
      PhysicalOffsetFrame humerus_offset: socket_parent=/bodyset/humerus translation=(0.0061 -0.2904 -0.0123)
      PhysicalOffsetFrame ulna_offset: socket_parent=/bodyset/ulna translation=(0 0 0)
      SpatialTransform: axes_held_at_zero=(rotation2 rotation3 translation1 translation2 translation3)
        TransformAxis rotation1: coordinates=elbow_flexion axis=(0.04940001 0.03660001 0.9981082)
            LinearFunction(coefficients=1 0)
    CustomJoint radioulnar: socket_parent_frame=ulna_offset socket_child_frame=radius_offset
      Coordinate pro_sup: default_value=0 range=(-1.570796 1.570796) clamped=true
      PhysicalOffsetFrame ulna_offset: socket_parent=/bodyset/ulna translation=(0.0004 -0.011503 0.019999)
      PhysicalOffsetFrame radius_offset: socket_parent=/bodyset/radius translation=(0 0 0)
      SpatialTransform: axes_held_at_zero=(rotation2 rotation3 translation1 translation2 translation3)
        TransformAxis rotation1: coordinates=pro_sup axis=(-0.01716099 0.9926656 -0.119668)
            LinearFunction(coefficients=1 0)
    CustomJoint radiocarpal: socket_parent_frame=radius_offset socket_child_frame=lunate_offset
      Coordinate deviation: default_value=0 range=(-0.1745329 0.4363323) clamped=true
      Coordinate flexion: default_value=0 range=(-1.22173 1.22173) clamped=true
      PhysicalOffsetFrame radius_offset: socket_parent=/bodyset/radius translation=(0.018 -0.242 0.025)
      PhysicalOffsetFrame lunate_offset: socket_parent=/bodyset/lunate translation=(0 0 0)
      SpatialTransform: axes_held_at_zero=(rotation3 translation1 translation2 translation3)
        TransformAxis rotation1: coordinates=deviation axis=(-0.819064 -0.135611 -0.557444)
          SimmSpline: x=(-0.174533 0 0.436332) y=(-0.174533 0 0.436332)
        TransformAxis rotation2: coordinates=flexion axis=(0.9564267 -0.2522069 0.147104)
          SimmSpline: x=(-1.5708 1.5708) y=(-0.785398 0.785398)
    WeldJoint lun_scaph: socket_parent_frame=lunate_offset socket_child_frame=scaphoid_offset
      PhysicalOffsetFrame lunate_offset: socket_parent=/bodyset/lunate translation=(0.012345 -0.004464 -0.001254)
      PhysicalOffsetFrame scaphoid_offset: socket_parent=/bodyset/scaphoid translation=(0 0 0)
    WeldJoint lun_pis: socket_parent_frame=lunate_offset socket_child_frame=pisiform_offset
      PhysicalOffsetFrame lunate_offset: socket_parent=/bodyset/lunate translation=(-0.013388 -0.009886 -0.010593)
      PhysicalOffsetFrame pisiform_offset: socket_parent=/bodyset/pisiform translation=(0 0 0)
    WeldJoint lun_triq: socket_parent_frame=lunate_offset socket_child_frame=triquetrum_offset
      PhysicalOffsetFrame lunate_offset: socket_parent=/bodyset/lunate translation=(-0.010784 -0.007499 -0.001289)
      PhysicalOffsetFrame triquetrum_offset: socket_parent=/bodyset/triquetrum translation=(0 0 0)
    CustomJoint proximal_distal: socket_parent_frame=lunate_offset socket_child_frame=capitate_offset
      Coordinate proximal_distal_r1: default_value=0 range=(-99999.9 99999.9) clamped=false
      Coordinate proximal_distal_r3: default_value=0 range=(-99999.9 99999.9) clamped=false
      PhysicalOffsetFrame lunate_offset: socket_parent=/bodyset/lunate translation=(0.003992 -0.015054 0.002327)
      PhysicalOffsetFrame capitate_offset: socket_parent=/bodyset/capitate translation=(0 0 0)
      SpatialTransform: axes_held_at_zero=(rotation3 translation1 translation2 translation3)
        TransformAxis rotation1: coordinates=proximal_distal_r1 axis=(0.8991357 -0.3490529 -0.2640399)
            LinearFunction(coefficients=1 0)
        TransformAxis rotation2: coordinates=proximal_distal_r3 axis=(0.9971185 0.01069999 -0.07510096)
            LinearFunction(coefficients=1 0)
    WeldJoint cap_trpzm: socket_parent_frame=capitate_offset socket_child_frame=trapezium_offset
      PhysicalOffsetFrame capitate_offset: socket_parent=/bodyset/capitate translation=(0.015293 -0.004569 -0.010308)
      PhysicalOffsetFrame trapezium_offset: socket_parent=/bodyset/trapezium translation=(0 0 0)
    WeldJoint cap_trpzd: socket_parent_frame=capitate_offset socket_child_frame=trapezoid_offset
      PhysicalOffsetFrame capitate_offset: socket_parent=/bodyset/capitate translation=(0.009143 -0.004062 -0.002464)
      PhysicalOffsetFrame trapezoid_offset: socket_parent=/bodyset/trapezoid translation=(0 0 0)
    WeldJoint cap_ham: socket_parent_frame=capitate_offset socket_child_frame=hamate_offset
      PhysicalOffsetFrame capitate_offset: socket_parent=/bodyset/capitate translation=(-0.010969 -0.002495 -0.00075)
      PhysicalOffsetFrame hamate_offset: socket_parent=/bodyset/hamate translation=(0 0 0)
    CustomJoint CMC1a: socket_parent_frame=trapezium_offset socket_child_frame=firstmc1_offset
      Coordinate cmc_flexion: default_value=0 range=(-0.2617994 0.7853982) clamped=true
      PhysicalOffsetFrame trapezium_offset: socket_parent=/bodyset/trapezium translation=(0 0 0)
      PhysicalOffsetFrame firstmc1_offset: socket_parent=/bodyset/firstmc1 translation=(0 0 0)
      SpatialTransform: axes_held_at_zero=(rotation2 rotation3 translation1 translation2 translation3)
        TransformAxis rotation1: coordinates=cmc_flexion axis=(-0.04239899 -0.6652859 0.7453838)
            LinearFunction(coefficients=1 0)
    CustomJoint CMC1b: socket_parent_frame=firstmc1_offset socket_child_frame=firstmc_offset
      Coordinate cmc_abduction: default_value=0 range=(-0.4363323 0.4363323) clamped=true
      PhysicalOffsetFrame firstmc1_offset: socket_parent=/bodyset/firstmc1 translation=(0.0072 -0.0054 -0.0025)
      PhysicalOffsetFrame firstmc_offset: socket_parent=/bodyset/firstmc translation=(0 0 0)
      SpatialTransform: axes_held_at_zero=(rotation2 rotation3 translation1 translation2 translation3)
        TransformAxis rotation1: coordinates=cmc_abduction axis=(0.495557 0.731736 0.467959)
            LinearFunction(coefficients=1 0)
    WeldJoint CMC2: socket_parent_frame=capitate_offset socket_child_frame=secondmc_offset
      PhysicalOffsetFrame capitate_offset: socket_parent=/bodyset/capitate translation=(0.014685 -0.03762 0.005032)
      PhysicalOffsetFrame secondmc_offset: socket_parent=/bodyset/secondmc translation=(0 0 0)
    WeldJoint CMC3: socket_parent_frame=capitate_offset socket_child_frame=thirdmc_offset
      PhysicalOffsetFrame capitate_offset: socket_parent=/bodyset/capitate translation=(0.000477 -0.039239 0.007377)
      PhysicalOffsetFrame thirdmc_offset: socket_parent=/bodyset/thirdmc translation=(0 0 0)
    WeldJoint CMC4: socket_parent_frame=capitate_offset socket_child_frame=fourthmc_offset
      PhysicalOffsetFrame capitate_offset: socket_parent=/bodyset/capitate translation=(-0.012046 -0.040519 0.003513)
      PhysicalOffsetFrame fourthmc_offset: socket_parent=/bodyset/fourthmc translation=(0 0 0)
    WeldJoint CMC5: socket_parent_frame=capitate_offset socket_child_frame=fifthmc_offset
      PhysicalOffsetFrame capitate_offset: socket_parent=/bodyset/capitate translation=(-0.021896 -0.034683 -0.004218)
      PhysicalOffsetFrame fifthmc_offset: socket_parent=/bodyset/fifthmc translation=(0 0 0)
    CustomJoint MCP: socket_parent_frame=firstmc_offset socket_child_frame=proximal_thumb_offset
      Coordinate mp_flexion: default_value=0 range=(-0.7853982 0.6981317) clamped=true
      PhysicalOffsetFrame firstmc_offset: socket_parent=/bodyset/firstmc translation=(0.0165 -0.0292 -0.0127)
      PhysicalOffsetFrame proximal_thumb_offset: socket_parent=/bodyset/proximal_thumb translation=(0 0 0)
      SpatialTransform: axes_held_at_zero=(rotation2 rotation3 translation1 translation2 translation3)
        TransformAxis rotation1: coordinates=mp_flexion axis=(-0.084295 -0.203488 0.9754419)
            LinearFunction(coefficients=1 0)
    CustomJoint IP: socket_parent_frame=proximal_thumb_offset socket_child_frame=distal_thumb_offset
      Coordinate ip_flexion: default_value=0 range=(-1.308997 0.4363323) clamped=true
      PhysicalOffsetFrame proximal_thumb_offset: socket_parent=/bodyset/proximal_thumb
          translation=(0.014 -0.0259 -0.0101)
      PhysicalOffsetFrame distal_thumb_offset: socket_parent=/bodyset/distal_thumb translation=(0 0 0)
      SpatialTransform: axes_held_at_zero=(rotation2 rotation3 translation1 translation2 translation3)
        TransformAxis rotation1: coordinates=ip_flexion axis=(-0.05010201 -0.4796231 0.8760431)
            LinearFunction(coefficients=1 0)
    CustomJoint 2MCP: socket_parent_frame=secondmc_offset socket_child_frame=2proxph_offset
      Coordinate 2mcp_flexion: default_value=0 range=(-0.8726646 1.570796) clamped=true
      Coordinate 2mcp_abduction: default_value=0 range=(-0.2617994 0.2617994) clamped=true
      PhysicalOffsetFrame secondmc_offset: socket_parent=/bodyset/secondmc translation=(0.003501 -0.028243 0.00362)
      PhysicalOffsetFrame 2proxph_offset: socket_parent=/bodyset/2proxph translation=(0 0 0)
      SpatialTransform: axes_held_at_zero=(rotation3 translation1 translation2 translation3)
        TransformAxis rotation1: coordinates=2mcp_flexion axis=(0.9975061 -0.03949601 0.05849401)
            LinearFunction(coefficients=1 0)
        TransformAxis rotation2: coordinates=2mcp_abduction axis=(-0.05499898 0.08589897 0.9947846)
            LinearFunction(coefficients=1 0)
    CustomJoint 2prox-midph: socket_parent_frame=2proxph_offset socket_child_frame=2midph_offset
      Coordinate 2pm_flexion: default_value=0 range=(0 2.094395) clamped=true
      PhysicalOffsetFrame 2proxph_offset: socket_parent=/bodyset/2proxph translation=(0.007517 -0.041273 0.007326)
      PhysicalOffsetFrame 2midph_offset: socket_parent=/bodyset/2midph translation=(0 0 0)
      SpatialTransform: axes_held_at_zero=(rotation2 rotation3 translation1 translation2 translation3)
        TransformAxis rotation1: coordinates=2pm_flexion axis=(0.9603449 0.040998 -0.275784)
            LinearFunction(coefficients=1 0)
    CustomJoint 2mid-distph: socket_parent_frame=2midph_offset socket_child_frame=2distph_offset
      Coordinate 2md_flexion: default_value=0 range=(0 1.570796) clamped=true
      PhysicalOffsetFrame 2midph_offset: socket_parent=/bodyset/2midph translation=(0.003333 -0.024888 0.00122)
      PhysicalOffsetFrame 2distph_offset: socket_parent=/bodyset/2distph translation=(0 0 0)
      SpatialTransform: axes_held_at_zero=(rotation2 rotation3 translation1 translation2 translation3)
        TransformAxis rotation1: coordinates=2md_flexion axis=(0.9789773 0.07690602 -0.1889151)
            LinearFunction(coefficients=1 0)
    WeldJoint 3MCP: socket_parent_frame=thirdmc_offset socket_child_frame=3proxph_offset
      PhysicalOffsetFrame thirdmc_offset: socket_parent=/bodyset/thirdmc translation=(0.00024 -0.02629 0.001778)
      PhysicalOffsetFrame 3proxph_offset: socket_parent=/bodyset/3proxph translation=(0 0 0)
    WeldJoint 3prox-midph: socket_parent_frame=3proxph_offset socket_child_frame=3midph_offset
      PhysicalOffsetFrame 3proxph_offset: socket_parent=/bodyset/3proxph translation=(0.00165 -0.044211 0.00623)
      PhysicalOffsetFrame 3midph_offset: socket_parent=/bodyset/3midph translation=(0 0 0)
    WeldJoint 3mid-distph: socket_parent_frame=3midph_offset socket_child_frame=3distph_offset
      PhysicalOffsetFrame 3midph_offset: socket_parent=/bodyset/3midph translation=(0.001365 -0.029047 0.001954)
      PhysicalOffsetFrame 3distph_offset: socket_parent=/bodyset/3distph translation=(0 0 0)
    WeldJoint 4MCP: socket_parent_frame=fourthmc_offset socket_child_frame=4proxph_offset
      PhysicalOffsetFrame fourthmc_offset: socket_parent=/bodyset/fourthmc translation=(-0.00183 -0.023689 -0.000173)
      PhysicalOffsetFrame 4proxph_offset: socket_parent=/bodyset/4proxph translation=(0 0 0)
    WeldJoint 4prox-midph: socket_parent_frame=4proxph_offset socket_child_frame=4midph_offset
      PhysicalOffsetFrame 4proxph_offset: socket_parent=/bodyset/4proxph translation=(-0.003528 -0.040255 0.001345)
      PhysicalOffsetFrame 4midph_offset: socket_parent=/bodyset/4midph translation=(0 0 0)
    WeldJoint 4mid-distph: socket_parent_frame=4midph_offset socket_child_frame=4distph_offset
      PhysicalOffsetFrame 4midph_offset: socket_parent=/bodyset/4midph translation=(-0.002317 -0.024789 0.000563)
      PhysicalOffsetFrame 4distph_offset: socket_parent=/bodyset/4distph translation=(0 0 0)
    WeldJoint 5MCP: socket_parent_frame=fifthmc_offset socket_child_frame=5proxph_offset
      PhysicalOffsetFrame fifthmc_offset: socket_parent=/bodyset/fifthmc translation=(-0.001597 -0.021431 -0.001496)
      PhysicalOffsetFrame 5proxph_offset: socket_parent=/bodyset/5proxph translation=(0 0 0)
    WeldJoint 5prox-midph: socket_parent_frame=5proxph_offset socket_child_frame=5midph_offset
      PhysicalOffsetFrame 5proxph_offset: socket_parent=/bodyset/5proxph translation=(-0.005279 -0.035563 -0.002879)
      PhysicalOffsetFrame 5midph_offset: socket_parent=/bodyset/5midph translation=(0 0 0)
    WeldJoint 5mid-distph: socket_parent_frame=5midph_offset socket_child_frame=5distph_offset
      PhysicalOffsetFrame 5midph_offset: socket_parent=/bodyset/5midph translation=(-0.002871 -0.020677 -0.002243)
      PhysicalOffsetFrame 5distph_offset: socket_parent=/bodyset/5distph translation=(0 0 0)
    CustomJoint bicpt: socket_parent_frame=radius_offset socket_child_frame=bicpt_offset
      Coordinate bicpt_tx: default_value=-0.0001 range=(-99999.9 99999.9) clamped=false
      Coordinate bicpt_ty: default_value=-0.0276 range=(-99999.9 99999.9) clamped=false
      Coordinate bicpt_tz: default_value=-0.0043 range=(-99999.9 99999.9) clamped=false
      PhysicalOffsetFrame radius_offset: socket_parent=/bodyset/radius translation=(0 0 0)
      PhysicalOffsetFrame bicpt_offset: socket_parent=/bodyset/bicpt translation=(0 0 0)
      SpatialTransform: axes_held_at_zero=(rotation1 rotation2 rotation3)
        TransformAxis translation1: coordinates=bicpt_tx axis=(1 0 0) LinearFunction(coefficients=1 0)
        TransformAxis translation2: coordinates=bicpt_ty axis=(0 1 0) LinearFunction(coefficients=1 0)
        TransformAxis translation3: coordinates=bicpt_tz axis=(0 0 1) LinearFunction(coefficients=1 0)
    CustomJoint bicpt2: socket_parent_frame=radius_offset socket_child_frame=bicpt2_offset
      Coordinate bicpt2_tx: default_value=0.0146695 range=(-99999.9 99999.9) clamped=false
      Coordinate bicpt2_ty: default_value=-0.0102 range=(-99999.9 99999.9) clamped=false
      Coordinate bicpt2_tz: default_value=-0.01061843 range=(-99999.9 99999.9) clamped=false
      PhysicalOffsetFrame radius_offset: socket_parent=/bodyset/radius translation=(0 0 0)
      PhysicalOffsetFrame bicpt2_offset: socket_parent=/bodyset/bicpt2 translation=(0 0 0)
      SpatialTransform: axes_held_at_zero=(rotation1 rotation2 rotation3)
        TransformAxis translation1: coordinates=bicpt2_tx axis=(1 0 0) LinearFunction(coefficients=1 0)
        TransformAxis translation2: coordinates=bicpt2_ty axis=(0 1 0) LinearFunction(coefficients=1 0)
        TransformAxis translation3: coordinates=bicpt2_tz axis=(0 0 1) LinearFunction(coefficients=1 0)
    CustomJoint ptpt: socket_parent_frame=ulna_offset socket_child_frame=ptpt_offset
      Coordinate ptpt_tx: default_value=0.00755 range=(-99999.9 99999.9) clamped=false
      Coordinate ptpt_ty: default_value=-0.0649 range=(-99999.9 99999.9) clamped=false
      Coordinate ptpt_tz: default_value=-5e-5 range=(-99999.9 99999.9) clamped=false
      PhysicalOffsetFrame ulna_offset: socket_parent=/bodyset/ulna translation=(0 0 0)
      PhysicalOffsetFrame ptpt_offset: socket_parent=/bodyset/ptpt translation=(0 0 0)
      SpatialTransform: axes_held_at_zero=(rotation1 rotation2 rotation3)
        TransformAxis translation1: coordinates=ptpt_tx axis=(1 0 0) LinearFunction(coefficients=1 0)
        TransformAxis translation2: coordinates=ptpt_ty axis=(0 1 0) LinearFunction(coefficients=1 0)
        TransformAxis translation3: coordinates=ptpt_tz axis=(0 0 1) LinearFunction(coefficients=1 0)
    CustomJoint FCUpt: socket_parent_frame=radius_offset socket_child_frame=FCUpt_offset
      Coordinate FCUpt_tx: default_value=0.004 range=(-99999.9 99999.9) clamped=false
      Coordinate FCUpt_ty: default_value=-0.1841 range=(-99999.9 99999.9) clamped=false
      Coordinate FCUpt_tz: default_value=0.0005 range=(-99999.9 99999.9) clamped=false
      PhysicalOffsetFrame radius_offset: socket_parent=/bodyset/radius translation=(0 0 0)
      PhysicalOffsetFrame FCUpt_offset: socket_parent=/bodyset/FCUpt translation=(0 0 0)
      SpatialTransform: axes_held_at_zero=(rotation1 rotation2 rotation3)
        TransformAxis translation1: coordinates=FCUpt_tx axis=(1 0 0) LinearFunction(coefficients=1 0)
        TransformAxis translation2: coordinates=FCUpt_ty axis=(0 1 0) LinearFunction(coefficients=1 0)
        TransformAxis translation3: coordinates=FCUpt_tz axis=(0 0 1) LinearFunction(coefficients=1 0)
    CustomJoint EDCpt: socket_parent_frame=radius_offset socket_child_frame=EDCpt_offset
      Coordinate EDCpt_tx: default_value=0 range=(-99999.9 99999.9) clamped=false
      Coordinate EDCpt_ty: default_value=0 range=(-99999.9 99999.9) clamped=false
      Coordinate EDCpt_tz: default_value=0 range=(-99999.9 99999.9) clamped=false
      PhysicalOffsetFrame radius_offset: socket_parent=/bodyset/radius translation=(0 0 0)
      PhysicalOffsetFrame EDCpt_offset: socket_parent=/bodyset/EDCpt translation=(0 0 0)
      SpatialTransform: axes_held_at_zero=(rotation1 rotation2 rotation3)
        TransformAxis translation1: coordinates=EDCpt_tx axis=(1 0 0) LinearFunction(coefficients=1 0)
        TransformAxis translation2: coordinates=EDCpt_ty axis=(0 1 0) LinearFunction(coefficients=1 0)
        TransformAxis translation3: coordinates=EDCpt_tz axis=(0 0 1) LinearFunction(coefficients=1 0)
    CustomJoint APLpt: socket_parent_frame=capitate_offset socket_child_frame=APLpt_offset
      Coordinate APLpt_tx: default_value=0 range=(-99999.9 99999.9) clamped=false
      Coordinate APLpt_ty: default_value=0 range=(-99999.9 99999.9) clamped=false
      Coordinate APLpt_tz: default_value=0 range=(-99999.9 99999.9) clamped=false
      PhysicalOffsetFrame capitate_offset: socket_parent=/bodyset/capitate translation=(0 0 0)
      PhysicalOffsetFrame APLpt_offset: socket_parent=/bodyset/APLpt translation=(0 0 0)
      SpatialTransform: axes_held_at_zero=(rotation1 rotation2 rotation3)
        TransformAxis translation1: coordinates=APLpt_tx axis=(1 0 0) LinearFunction(coefficients=1 0)
        TransformAxis translation2: coordinates=APLpt_ty axis=(0 1 0) LinearFunction(coefficients=1 0)
        TransformAxis translation3: coordinates=APLpt_tz axis=(0 0 1) LinearFunction(coefficients=1 0)
    CustomJoint FPLpt: socket_parent_frame=capitate_offset socket_child_frame=FPLpt_offset
      Coordinate FPLpt_tx: default_value=0 range=(-99999.9 99999.9) clamped=false
      Coordinate FPLpt_ty: default_value=0 range=(-99999.9 99999.9) clamped=false
      Coordinate FPLpt_tz: default_value=0 range=(-99999.9 99999.9) clamped=false
      PhysicalOffsetFrame capitate_offset: socket_parent=/bodyset/capitate translation=(0 0 0)
      PhysicalOffsetFrame FPLpt_offset: socket_parent=/bodyset/FPLpt translation=(0 0 0)
      SpatialTransform: axes_held_at_zero=(rotation1 rotation2 rotation3)
        TransformAxis translation1: coordinates=FPLpt_tx axis=(1 0 0) LinearFunction(coefficients=1 0)
        TransformAxis translation2: coordinates=FPLpt_ty axis=(0 1 0) LinearFunction(coefficients=1 0)
        TransformAxis translation3: coordinates=FPLpt_tz axis=(0 0 1) LinearFunction(coefficients=1 0)
    CustomJoint FPLpt2: socket_parent_frame=capitate_offset socket_child_frame=FPLpt2_offset
      Coordinate FPLpt2_tx: default_value=0 range=(-99999.9 99999.9) clamped=false
      Coordinate FPLpt2_ty: default_value=0 range=(-99999.9 99999.9) clamped=false
      Coordinate FPLpt2_tz: default_value=0 range=(-99999.9 99999.9) clamped=false
      PhysicalOffsetFrame capitate_offset: socket_parent=/bodyset/capitate translation=(0 0 0)
      PhysicalOffsetFrame FPLpt2_offset: socket_parent=/bodyset/FPLpt2 translation=(0 0 0)
      SpatialTransform: axes_held_at_zero=(rotation1 rotation2 rotation3)
        TransformAxis translation1: coordinates=FPLpt2_tx axis=(1 0 0) LinearFunction(coefficients=1 0)
        TransformAxis translation2: coordinates=FPLpt2_ty axis=(0 1 0) LinearFunction(coefficients=1 0)
        TransformAxis translation3: coordinates=FPLpt2_tz axis=(0 0 1) LinearFunction(coefficients=1 0)
    CustomJoint PEC1pt2: socket_parent_frame=humerus_offset socket_child_frame=PEC1pt2_offset
      Coordinate PEC1pt2_tx: default_value=0 range=(-99999.9 99999.9) clamped=false
      Coordinate PEC1pt2_ty: default_value=0 range=(-99999.9 99999.9) clamped=false
      Coordinate PEC1pt2_tz: default_value=0 range=(-99999.9 99999.9) clamped=false
      PhysicalOffsetFrame humerus_offset: socket_parent=/bodyset/humerus translation=(0 0 0)
      PhysicalOffsetFrame PEC1pt2_offset: socket_parent=/bodyset/PEC1pt2 translation=(0 0 0)
      SpatialTransform: axes_held_at_zero=(rotation1 rotation2 rotation3)
        TransformAxis translation1: coordinates=PEC1pt2_tx axis=(1 0 0) LinearFunction(coefficients=1 0)
        TransformAxis translation2: coordinates=PEC1pt2_ty axis=(0 1 0) LinearFunction(coefficients=1 0)
        TransformAxis translation3: coordinates=PEC1pt2_tz axis=(0 0 1) LinearFunction(coefficients=1 0)
    CustomJoint PEC1pt3: socket_parent_frame=thorax_offset socket_child_frame=PEC1pt3_offset
      Coordinate PEC1pt3_tx: default_value=0 range=(-99999.9 99999.9) clamped=false
      Coordinate PEC1pt3_ty: default_value=0 range=(-99999.9 99999.9) clamped=false
      Coordinate PEC1pt3_tz: default_value=0 range=(-99999.9 99999.9) clamped=false
      PhysicalOffsetFrame thorax_offset: socket_parent=/bodyset/thorax translation=(0 0 0)
      PhysicalOffsetFrame PEC1pt3_offset: socket_parent=/bodyset/PEC1pt3 translation=(0 0 0)
      SpatialTransform: axes_held_at_zero=(rotation1 rotation2 rotation3)
        TransformAxis translation1: coordinates=PEC1pt3_tx axis=(1 0 0) LinearFunction(coefficients=1 0)
        TransformAxis translation2: coordinates=PEC1pt3_ty axis=(0 1 0) LinearFunction(coefficients=1 0)
        TransformAxis translation3: coordinates=PEC1pt3_tz axis=(0 0 1) LinearFunction(coefficients=1 0)
    CustomJoint PEC2pt2: socket_parent_frame=humerus_offset socket_child_frame=PEC2pt2_offset
      Coordinate PEC2pt2_tx: default_value=0 range=(-99999.9 99999.9) clamped=false
      Coordinate PEC2pt2_ty: default_value=0 range=(-99999.9 99999.9) clamped=false
      Coordinate PEC2pt2_tz: default_value=0 range=(-99999.9 99999.9) clamped=false
      PhysicalOffsetFrame humerus_offset: socket_parent=/bodyset/humerus translation=(0 0 0)
      PhysicalOffsetFrame PEC2pt2_offset: socket_parent=/bodyset/PEC2pt2 translation=(0 0 0)
      SpatialTransform: axes_held_at_zero=(rotation1 rotation2 rotation3)
        TransformAxis translation1: coordinates=PEC2pt2_tx axis=(1 0 0) LinearFunction(coefficients=1 0)
        TransformAxis translation2: coordinates=PEC2pt2_ty axis=(0 1 0) LinearFunction(coefficients=1 0)
        TransformAxis translation3: coordinates=PEC2pt2_tz axis=(0 0 1) LinearFunction(coefficients=1 0)
    CustomJoint PEC2pt3: socket_parent_frame=thorax_offset socket_child_frame=PEC2pt3_offset
      Coordinate PEC2pt3_tx: default_value=0 range=(-99999.9 99999.9) clamped=false
      Coordinate PEC2pt3_ty: default_value=0 range=(-99999.9 99999.9) clamped=false
      Coordinate PEC2pt3_tz: default_value=0 range=(-99999.9 99999.9) clamped=false
      PhysicalOffsetFrame thorax_offset: socket_parent=/bodyset/thorax translation=(0 0 0)
      PhysicalOffsetFrame PEC2pt3_offset: socket_parent=/bodyset/PEC2pt3 translation=(0 0 0)
      SpatialTransform: axes_held_at_zero=(rotation1 rotation2 rotation3)
        TransformAxis translation1: coordinates=PEC2pt3_tx axis=(1 0 0) LinearFunction(coefficients=1 0)
        TransformAxis translation2: coordinates=PEC2pt3_ty axis=(0 1 0) LinearFunction(coefficients=1 0)
        TransformAxis translation3: coordinates=PEC2pt3_tz axis=(0 0 1) LinearFunction(coefficients=1 0)
    CustomJoint PEC3pt2: socket_parent_frame=humerus_offset socket_child_frame=PEC3pt2_offset
      Coordinate PEC3pt2_tx: default_value=0 range=(-99999.9 99999.9) clamped=false
      Coordinate PEC3pt2_ty: default_value=0 range=(-99999.9 99999.9) clamped=false
      Coordinate PEC3pt2_tz: default_value=0 range=(-99999.9 99999.9) clamped=false
      PhysicalOffsetFrame humerus_offset: socket_parent=/bodyset/humerus translation=(0 0 0)
      PhysicalOffsetFrame PEC3pt2_offset: socket_parent=/bodyset/PEC3pt2 translation=(0 0 0)
      SpatialTransform: axes_held_at_zero=(rotation1 rotation2 rotation3)
        TransformAxis translation1: coordinates=PEC3pt2_tx axis=(1 0 0) LinearFunction(coefficients=1 0)
        TransformAxis translation2: coordinates=PEC3pt2_ty axis=(0 1 0) LinearFunction(coefficients=1 0)
        TransformAxis translation3: coordinates=PEC3pt2_tz axis=(0 0 1) LinearFunction(coefficients=1 0)
    CustomJoint PEC3pt3: socket_parent_frame=thorax_offset socket_child_frame=PEC3pt3_offset
      Coordinate PEC3pt3_tx: default_value=0 range=(-99999.9 99999.9) clamped=false
      Coordinate PEC3pt3_ty: default_value=0.000225322 range=(-99999.9 99999.9) clamped=false
      Coordinate PEC3pt3_tz: default_value=0 range=(-99999.9 99999.9) clamped=false
      PhysicalOffsetFrame thorax_offset: socket_parent=/bodyset/thorax translation=(0 0 0)
      PhysicalOffsetFrame PEC3pt3_offset: socket_parent=/bodyset/PEC3pt3 translation=(0 0 0)
      SpatialTransform: axes_held_at_zero=(rotation1 rotation2 rotation3)
        TransformAxis translation1: coordinates=PEC3pt3_tx axis=(1 0 0) LinearFunction(coefficients=1 0)
        TransformAxis translation2: coordinates=PEC3pt3_ty axis=(0 1 0) LinearFunction(coefficients=1 0)
        TransformAxis translation3: coordinates=PEC3pt3_tz axis=(0 0 1) LinearFunction(coefficients=1 0)
    CustomJoint DELT2pt2a: socket_parent_frame=humerus_offset socket_child_frame=DELT2pt2a_offset
      Coordinate DELT2pt2a_tx: default_value=0 range=(-99999.9 99999.9) clamped=false
      Coordinate DELT2pt2a_ty: default_value=0 range=(-99999.9 99999.9) clamped=false
      Coordinate DELT2pt2a_tz: default_value=0 range=(-99999.9 99999.9) clamped=false
      PhysicalOffsetFrame humerus_offset: socket_parent=/bodyset/humerus translation=(0 0 0)
      PhysicalOffsetFrame DELT2pt2a_offset: socket_parent=/bodyset/DELT2pt2a translation=(0 0 0)
      SpatialTransform: axes_held_at_zero=(rotation1 rotation2 rotation3)
        TransformAxis translation1: coordinates=DELT2pt2a_tx axis=(1 0 0) LinearFunction(coefficients=1 0)
        TransformAxis translation2: coordinates=DELT2pt2a_ty axis=(0 1 0) LinearFunction(coefficients=1 0)
        TransformAxis translation3: coordinates=DELT2pt2a_tz axis=(0 0 1) LinearFunction(coefficients=1 0)
    CustomJoint DELT2pt2: socket_parent_frame=DELT2pt2a_offset socket_child_frame=DELT2pt2_offset
      Coordinate DELT2pt2_tx: default_value=-0.0004399096 range=(-99999.9 99999.9) clamped=false
      Coordinate DELT2pt2_ty: default_value=0 range=(-99999.9 99999.9) clamped=false
      Coordinate DELT2pt2_tz: default_value=0 range=(-99999.9 99999.9) clamped=false
      PhysicalOffsetFrame DELT2pt2a_offset: socket_parent=/bodyset/DELT2pt2a translation=(0 0 0)
      PhysicalOffsetFrame DELT2pt2_offset: socket_parent=/bodyset/DELT2pt2 translation=(0 0 0)
      SpatialTransform: axes_held_at_zero=(rotation1 rotation2 rotation3)
        TransformAxis translation1: coordinates=DELT2pt2_tx axis=(1 0 0) LinearFunction(coefficients=1 0)
        TransformAxis translation2: coordinates=DELT2pt2_ty axis=(0 1 0) LinearFunction(coefficients=1 0)
        TransformAxis translation3: coordinates=DELT2pt2_tz axis=(0 0 1) LinearFunction(coefficients=1 0)
    CustomJoint LAT1pt2: socket_parent_frame=scapula_offset socket_child_frame=LAT1pt2_offset
      Coordinate LAT1pt2_tx: default_value=0 range=(-99999.9 99999.9) clamped=false
      Coordinate LAT1pt2_ty: default_value=0 range=(-99999.9 99999.9) clamped=false
      Coordinate LAT1pt2_tz: default_value=0 range=(-99999.9 99999.9) clamped=false
      PhysicalOffsetFrame scapula_offset: socket_parent=/bodyset/scapula translation=(0 0 0)
      PhysicalOffsetFrame LAT1pt2_offset: socket_parent=/bodyset/LAT1pt2 translation=(0 0 0)
      SpatialTransform: axes_held_at_zero=(rotation1 rotation2 rotation3)
        TransformAxis translation1: coordinates=LAT1pt2_tx axis=(1 0 0) LinearFunction(coefficients=1 0)
        TransformAxis translation2: coordinates=LAT1pt2_ty axis=(0 1 0) LinearFunction(coefficients=1 0)
        TransformAxis translation3: coordinates=LAT1pt2_tz axis=(0 0 1) LinearFunction(coefficients=1 0)
    CustomJoint LAT1pt3: socket_parent_frame=scapula_offset socket_child_frame=LAT1pt3_offset
      Coordinate LAT1pt3_tx: default_value=0 range=(-99999.9 99999.9) clamped=false
      Coordinate LAT1pt3_ty: default_value=0 range=(-99999.9 99999.9) clamped=false
      Coordinate LAT1pt3_tz: default_value=0 range=(-99999.9 99999.9) clamped=false
      PhysicalOffsetFrame scapula_offset: socket_parent=/bodyset/scapula translation=(0 0 0)
      PhysicalOffsetFrame LAT1pt3_offset: socket_parent=/bodyset/LAT1pt3 translation=(0 0 0)
      SpatialTransform: axes_held_at_zero=(rotation1 rotation2 rotation3)
        TransformAxis translation1: coordinates=LAT1pt3_tx axis=(1 0 0) LinearFunction(coefficients=1 0)
        TransformAxis translation2: coordinates=LAT1pt3_ty axis=(0 1 0) LinearFunction(coefficients=1 0)
        TransformAxis translation3: coordinates=LAT1pt3_tz axis=(0 0 1) LinearFunction(coefficients=1 0)
    CustomJoint LAT2pt2: socket_parent_frame=scapula_offset socket_child_frame=LAT2pt2_offset
      Coordinate LAT2pt2_tx: default_value=0 range=(-99999.9 99999.9) clamped=false
      Coordinate LAT2pt2_ty: default_value=0 range=(-99999.9 99999.9) clamped=false
      Coordinate LAT2pt2_tz: default_value=0 range=(-99999.9 99999.9) clamped=false
      PhysicalOffsetFrame scapula_offset: socket_parent=/bodyset/scapula translation=(0 0 0)
      PhysicalOffsetFrame LAT2pt2_offset: socket_parent=/bodyset/LAT2pt2 translation=(0 0 0)
      SpatialTransform: axes_held_at_zero=(rotation1 rotation2 rotation3)
        TransformAxis translation1: coordinates=LAT2pt2_tx axis=(1 0 0) LinearFunction(coefficients=1 0)
        TransformAxis translation2: coordinates=LAT2pt2_ty axis=(0 1 0) LinearFunction(coefficients=1 0)
        TransformAxis translation3: coordinates=LAT2pt2_tz axis=(0 0 1) LinearFunction(coefficients=1 0)
    CustomJoint LAT2pt3: socket_parent_frame=scapula_offset socket_child_frame=LAT2pt3_offset
      Coordinate LAT2pt3_tx: default_value=0 range=(-99999.9 99999.9) clamped=false
      Coordinate LAT2pt3_ty: default_value=0 range=(-99999.9 99999.9) clamped=false
      Coordinate LAT2pt3_tz: default_value=0 range=(-99999.9 99999.9) clamped=false
      PhysicalOffsetFrame scapula_offset: socket_parent=/bodyset/scapula translation=(0 0 0)
      PhysicalOffsetFrame LAT2pt3_offset: socket_parent=/bodyset/LAT2pt3 translation=(0 0 0)
      SpatialTransform: axes_held_at_zero=(rotation1 rotation2 rotation3)
        TransformAxis translation1: coordinates=LAT2pt3_tx axis=(1 0 0) LinearFunction(coefficients=1 0)
        TransformAxis translation2: coordinates=LAT2pt3_ty axis=(0 1 0) LinearFunction(coefficients=1 0)
        TransformAxis translation3: coordinates=LAT2pt3_tz axis=(0 0 1) LinearFunction(coefficients=1 0)
    CustomJoint LAT3pt2: socket_parent_frame=scapula_offset socket_child_frame=LAT3pt2_offset
      Coordinate LAT3pt2_tx: default_value=0 range=(-99999.9 99999.9) clamped=false
      Coordinate LAT3pt2_ty: default_value=0 range=(-99999.9 99999.9) clamped=false
      Coordinate LAT3pt2_tz: default_value=0 range=(-99999.9 99999.9) clamped=false
      PhysicalOffsetFrame scapula_offset: socket_parent=/bodyset/scapula translation=(0 0 0)
      PhysicalOffsetFrame LAT3pt2_offset: socket_parent=/bodyset/LAT3pt2 translation=(0 0 0)
      SpatialTransform: axes_held_at_zero=(rotation1 rotation2 rotation3)
        TransformAxis translation1: coordinates=LAT3pt2_tx axis=(1 0 0) LinearFunction(coefficients=1 0)
        TransformAxis translation2: coordinates=LAT3pt2_ty axis=(0 1 0) LinearFunction(coefficients=1 0)
        TransformAxis translation3: coordinates=LAT3pt2_tz axis=(0 0 1) LinearFunction(coefficients=1 0)
    CustomJoint LAT3pt3: socket_parent_frame=scapula_offset socket_child_frame=LAT3pt3_offset
      Coordinate LAT3pt3_tx: default_value=0 range=(-99999.9 99999.9) clamped=false
      Coordinate LAT3pt3_ty: default_value=0 range=(-99999.9 99999.9) clamped=false
      Coordinate LAT3pt3_tz: default_value=0 range=(-99999.9 99999.9) clamped=false
      PhysicalOffsetFrame scapula_offset: socket_parent=/bodyset/scapula translation=(0 0 0)
      PhysicalOffsetFrame LAT3pt3_offset: socket_parent=/bodyset/LAT3pt3 translation=(0 0 0)
      SpatialTransform: axes_held_at_zero=(rotation1 rotation2 rotation3)
        TransformAxis translation1: coordinates=LAT3pt3_tx axis=(1 0 0) LinearFunction(coefficients=1 0)
        TransformAxis translation2: coordinates=LAT3pt3_ty axis=(0 1 0) LinearFunction(coefficients=1 0)
        TransformAxis translation3: coordinates=LAT3pt3_tz axis=(0 0 1) LinearFunction(coefficients=1 0)
    CustomJoint sternoclavicular_l: socket_parent_frame=thorax_offset socket_child_frame=clavicle_l_offset
      Coordinate sternoclavicular_r2_l: default_value=0 range=(-99999.9 99999.9) clamped=false
      Coordinate sternoclavicular_r3_l: default_value=0 range=(-99999.9 99999.9) clamped=false
      PhysicalOffsetFrame thorax_offset: socket_parent=/bodyset/thorax translation=(0.006325 0.00693 -0.025465)
      PhysicalOffsetFrame clavicle_l_offset: socket_parent=/bodyset/clavicle_l translation=(0 0 0)
      SpatialTransform: axes_held_at_zero=(rotation3 translation1 translation2 translation3)
        TransformAxis rotation1: coordinates=sternoclavicular_r2_l axis=(-0.0153 -0.9892987 -0.1451)
            LinearFunction(coefficients=1 0)
        TransformAxis rotation2: coordinates=sternoclavicular_r3_l axis=(0.9944725 0 -0.104997)
            LinearFunction(coefficients=1 0)
    CustomJoint unrotscap_l: socket_parent_frame=clavicle_l_offset socket_child_frame=clavphant_l_offset
      Coordinate unrotscap_r3_l: default_value=0 range=(-99999.9 99999.9) clamped=false
      Coordinate unrotscap_r2_l: default_value=0 range=(-99999.9 99999.9) clamped=false
      PhysicalOffsetFrame clavicle_l_offset: socket_parent=/bodyset/clavicle_l translation=(-0.01433 0.02007 -0.135535)
      PhysicalOffsetFrame clavphant_l_offset: socket_parent=/bodyset/clavphant_l translation=(0 0 0)
      SpatialTransform: axes_held_at_zero=(rotation3 translation1 translation2 translation3)
        TransformAxis rotation1: coordinates=unrotscap_r3_l axis=(0.9944725 0 -0.104997)
            LinearFunction(coefficients=1 0)
        TransformAxis rotation2: coordinates=unrotscap_r2_l axis=(-0.0153 -0.9892987 -0.1451)
            LinearFunction(coefficients=1 0)
    CustomJoint acromioclavicular_l: socket_parent_frame=clavphant_l_offset socket_child_frame=scapula_l_offset
      Coordinate acromioclavicular_r2_l: default_value=0 range=(-99999.9 99999.9) clamped=false
      Coordinate acromioclavicular_r3_l: default_value=0 range=(-99999.9 99999.9) clamped=false
      Coordinate acromioclavicular_r1_l: default_value=0 range=(-99999.9 99999.9) clamped=false
      PhysicalOffsetFrame clavphant_l_offset: socket_parent=/bodyset/clavphant_l translation=(0 0 0)
      PhysicalOffsetFrame scapula_l_offset: socket_parent=/bodyset/scapula_l translation=(0 0 0)
      SpatialTransform: axes_held_at_zero=(translation1 translation2 translation3)
        TransformAxis rotation1: coordinates=acromioclavicular_r2_l axis=(-0.1570949 -0.9472686 -0.2792909)
            LinearFunction(coefficients=1 0)
        TransformAxis rotation2: coordinates=acromioclavicular_r3_l axis=(0.754084 -0.297594 0.585487)
            LinearFunction(coefficients=1 0)
        TransformAxis rotation3: coordinates=acromioclavicular_r1_l axis=(-0.6376999 -0.1186 0.7610998)
            LinearFunction(coefficients=1 0)
    CustomJoint unrothum_l: socket_parent_frame=scapula_l_offset socket_child_frame=scapphant_l_offset
      Coordinate unrothum_r1_l: default_value=0 range=(-99999.9 99999.9) clamped=false
      Coordinate unrothum_r3_l: default_value=0 range=(-99999.9 99999.9) clamped=false
      Coordinate unrothum_r2_l: default_value=0 range=(-99999.9 99999.9) clamped=false
      PhysicalOffsetFrame scapula_l_offset: socket_parent=/bodyset/scapula_l translation=(-0.00955 -0.034 -0.009)
      PhysicalOffsetFrame scapphant_l_offset: socket_parent=/bodyset/scapphant_l translation=(0 0 0)
      SpatialTransform: axes_held_at_zero=(translation1 translation2 translation3)
        TransformAxis rotation1: coordinates=unrothum_r1_l axis=(-0.6376999 -0.1186 0.7610998)
            LinearFunction(coefficients=1 0)
        TransformAxis rotation2: coordinates=unrothum_r3_l axis=(0.754084 -0.297594 0.585487)
            LinearFunction(coefficients=1 0)
        TransformAxis rotation3: coordinates=unrothum_r2_l axis=(-0.1570949 -0.9472686 -0.2792909)
            LinearFunction(coefficients=1 0)
    CustomJoint shoulder0_l: socket_parent_frame=scapphant_l_offset socket_child_frame=humphant_l_offset
      Coordinate elv_angle_l: default_value=0 range=(-1.570796 2.268928) clamped=true
      PhysicalOffsetFrame scapphant_l_offset: socket_parent=/bodyset/scapphant_l translation=(0 0 0)
      PhysicalOffsetFrame humphant_l_offset: socket_parent=/bodyset/humphant_l translation=(0 0 0)
      SpatialTransform: axes_held_at_zero=(rotation2 rotation3 translation1 translation2 translation3)
        TransformAxis rotation1: coordinates=elv_angle_l axis=(-0.004800001 -0.9990892 0.04240001)
            LinearFunction(coefficients=1 0)
    CustomJoint shoulder1_l: socket_parent_frame=humphant_l_offset socket_child_frame=humphant1_l_offset
      Coordinate shoulder_elv_l: default_value=0 range=(0 3.141593) clamped=true
      Coordinate shoulder1_r2_l: default_value=0 range=(-99999.9 99999.9) clamped=false
      PhysicalOffsetFrame humphant_l_offset: socket_parent=/bodyset/humphant_l translation=(0 0 0)
      PhysicalOffsetFrame humphant1_l_offset: socket_parent=/bodyset/humphant1_l translation=(0 0 0)
      SpatialTransform: axes_held_at_zero=(rotation3 translation1 translation2 translation3)
        TransformAxis rotation1: coordinates=shoulder_elv_l axis=(0.9982614 -0.002300001 0.05889802)
            LinearFunction(coefficients=1 0)
        TransformAxis rotation2: coordinates=shoulder1_r2_l axis=(-0.004800001 -0.9990892 0.04240001)
            LinearFunction(coefficients=1 0)
    CustomJoint shoulder2_l: socket_parent_frame=humphant1_l_offset socket_child_frame=humerus_l_offset
      Coordinate shoulder_rot_l: default_value=0 range=(-1.570796 0.3490659) clamped=true
      PhysicalOffsetFrame humphant1_l_offset: socket_parent=/bodyset/humphant1_l translation=(0 0 0)
      PhysicalOffsetFrame humerus_l_offset: socket_parent=/bodyset/humerus_l translation=(0 0 0)
      SpatialTransform: axes_held_at_zero=(rotation2 rotation3 translation1 translation2 translation3)
        TransformAxis rotation1: coordinates=shoulder_rot_l axis=(-0.004800001 -0.9990892 0.04240001)
            LinearFunction(coefficients=1 0)
    CustomJoint elbow_l: socket_parent_frame=humerus_l_offset socket_child_frame=ulna_l_offset
      Coordinate elbow_flexion_l: default_value=0 range=(0 2.268928) clamped=true
      PhysicalOffsetFrame humerus_l_offset: socket_parent=/bodyset/humerus_l translation=(0.0061 -0.2904 0.0123)
      PhysicalOffsetFrame ulna_l_offset: socket_parent=/bodyset/ulna_l translation=(0 0 0)
      SpatialTransform: axes_held_at_zero=(rotation2 rotation3 translation1 translation2 translation3)
        TransformAxis rotation1: coordinates=elbow_flexion_l axis=(-0.04940001 -0.03660001 0.9981082)
            LinearFunction(coefficients=1 0)
    CustomJoint radioulnar_l: socket_parent_frame=ulna_l_offset socket_child_frame=radius_l_offset
      Coordinate pro_sup_l: default_value=0 range=(-1.570796 1.570796) clamped=true
      PhysicalOffsetFrame ulna_l_offset: socket_parent=/bodyset/ulna_l translation=(0.0004 -0.011503 -0.019999)
      PhysicalOffsetFrame radius_l_offset: socket_parent=/bodyset/radius_l translation=(0 0 0)
      SpatialTransform: axes_held_at_zero=(rotation2 rotation3 translation1 translation2 translation3)
        TransformAxis rotation1: coordinates=pro_sup_l axis=(0.01716099 -0.9926656 -0.119668)
            LinearFunction(coefficients=1 0)
    CustomJoint radiocarpal_l: socket_parent_frame=radius_l_offset socket_child_frame=lunate_l_offset
      Coordinate deviation_l: default_value=0 range=(-0.1745329 0.4363323) clamped=true
      Coordinate flexion_l: default_value=0 range=(-1.22173 1.22173) clamped=true
      PhysicalOffsetFrame radius_l_offset: socket_parent=/bodyset/radius_l translation=(0.018 -0.242 -0.025)
      PhysicalOffsetFrame lunate_l_offset: socket_parent=/bodyset/lunate_l translation=(0 0 0)
      SpatialTransform: axes_held_at_zero=(rotation3 translation1 translation2 translation3)
        TransformAxis rotation1: coordinates=deviation_l axis=(0.819064 0.135611 -0.557444)
          SimmSpline: x=(-0.174533 0 0.436332) y=(-0.174533 0 0.436332)
        TransformAxis rotation2: coordinates=flexion_l axis=(-0.9564267 0.2522069 0.147104)
          SimmSpline: x=(-1.5708 1.5708) y=(-0.785398 0.785398)
    WeldJoint lun_scaph_l: socket_parent_frame=lunate_l_offset socket_child_frame=scaphoid_l_offset
      PhysicalOffsetFrame lunate_l_offset: socket_parent=/bodyset/lunate_l translation=(0.012345 -0.004464 0.001254)
      PhysicalOffsetFrame scaphoid_l_offset: socket_parent=/bodyset/scaphoid_l translation=(0 0 0)
    WeldJoint lun_pis_l: socket_parent_frame=lunate_l_offset socket_child_frame=pisiform_l_offset
      PhysicalOffsetFrame lunate_l_offset: socket_parent=/bodyset/lunate_l translation=(-0.013388 -0.009886 0.010593)
      PhysicalOffsetFrame pisiform_l_offset: socket_parent=/bodyset/pisiform_l translation=(0 0 0)
    WeldJoint lun_triq_l: socket_parent_frame=lunate_l_offset socket_child_frame=triquetrum_l_offset
      PhysicalOffsetFrame lunate_l_offset: socket_parent=/bodyset/lunate_l translation=(-0.010784 -0.007499 0.001289)
      PhysicalOffsetFrame triquetrum_l_offset: socket_parent=/bodyset/triquetrum_l translation=(0 0 0)
    CustomJoint proximal_distal_l: socket_parent_frame=lunate_l_offset socket_child_frame=capitate_l_offset
      Coordinate proximal_distal_r1_l: default_value=0 range=(-99999.9 99999.9) clamped=false
      Coordinate proximal_distal_r3_l: default_value=0 range=(-99999.9 99999.9) clamped=false
      PhysicalOffsetFrame lunate_l_offset: socket_parent=/bodyset/lunate_l translation=(0.003992 -0.015054 -0.002327)
      PhysicalOffsetFrame capitate_l_offset: socket_parent=/bodyset/capitate_l translation=(0 0 0)
      SpatialTransform: axes_held_at_zero=(rotation3 translation1 translation2 translation3)
        TransformAxis rotation1: coordinates=proximal_distal_r1_l axis=(-0.8991357 0.3490529 -0.2640399)
            LinearFunction(coefficients=1 0)
        TransformAxis rotation2: coordinates=proximal_distal_r3_l axis=(-0.9971185 -0.01069999 -0.07510096)
            LinearFunction(coefficients=1 0)
    WeldJoint cap_trpzm_l: socket_parent_frame=capitate_l_offset socket_child_frame=trapezium_l_offset
      PhysicalOffsetFrame capitate_l_offset: socket_parent=/bodyset/capitate_l
          translation=(0.015293 -0.004569 0.010308)
      PhysicalOffsetFrame trapezium_l_offset: socket_parent=/bodyset/trapezium_l translation=(0 0 0)
    WeldJoint cap_trpzd_l: socket_parent_frame=capitate_l_offset socket_child_frame=trapezoid_l_offset
      PhysicalOffsetFrame capitate_l_offset: socket_parent=/bodyset/capitate_l
          translation=(0.009143 -0.004062 0.002464)
      PhysicalOffsetFrame trapezoid_l_offset: socket_parent=/bodyset/trapezoid_l translation=(0 0 0)
    WeldJoint cap_ham_l: socket_parent_frame=capitate_l_offset socket_child_frame=hamate_l_offset
      PhysicalOffsetFrame capitate_l_offset: socket_parent=/bodyset/capitate_l
          translation=(-0.010969 -0.002495 0.00075)
      PhysicalOffsetFrame hamate_l_offset: socket_parent=/bodyset/hamate_l translation=(0 0 0)
    CustomJoint CMC1a_l: socket_parent_frame=trapezium_l_offset socket_child_frame=firstmc1_l_offset
      Coordinate cmc_flexion_l: default_value=0 range=(-0.2617994 0.7853982) clamped=true
      PhysicalOffsetFrame trapezium_l_offset: socket_parent=/bodyset/trapezium_l translation=(0 0 0)
      PhysicalOffsetFrame firstmc1_l_offset: socket_parent=/bodyset/firstmc1_l translation=(0 0 0)
      SpatialTransform: axes_held_at_zero=(rotation2 rotation3 translation1 translation2 translation3)
        TransformAxis rotation1: coordinates=cmc_flexion_l axis=(0.04239899 0.6652859 0.7453838)
            LinearFunction(coefficients=1 0)
    CustomJoint CMC1b_l: socket_parent_frame=firstmc1_l_offset socket_child_frame=firstmc_l_offset
      Coordinate cmc_abduction_l: default_value=0 range=(-0.4363323 0.4363323) clamped=true
      PhysicalOffsetFrame firstmc1_l_offset: socket_parent=/bodyset/firstmc1_l translation=(0.0072 -0.0054 0.0025)
      PhysicalOffsetFrame firstmc_l_offset: socket_parent=/bodyset/firstmc_l translation=(0 0 0)
      SpatialTransform: axes_held_at_zero=(rotation2 rotation3 translation1 translation2 translation3)
        TransformAxis rotation1: coordinates=cmc_abduction_l axis=(-0.495557 -0.731736 0.467959)
            LinearFunction(coefficients=1 0)
    WeldJoint CMC2_l: socket_parent_frame=capitate_l_offset socket_child_frame=secondmc_l_offset
      PhysicalOffsetFrame capitate_l_offset: socket_parent=/bodyset/capitate_l
          translation=(0.014685 -0.03762 -0.005032)
      PhysicalOffsetFrame secondmc_l_offset: socket_parent=/bodyset/secondmc_l translation=(0 0 0)
    WeldJoint CMC3_l: socket_parent_frame=capitate_l_offset socket_child_frame=thirdmc_l_offset
      PhysicalOffsetFrame capitate_l_offset: socket_parent=/bodyset/capitate_l
          translation=(0.000477 -0.039239 -0.007377)
      PhysicalOffsetFrame thirdmc_l_offset: socket_parent=/bodyset/thirdmc_l translation=(0 0 0)
    WeldJoint CMC4_l: socket_parent_frame=capitate_l_offset socket_child_frame=fourthmc_l_offset
      PhysicalOffsetFrame capitate_l_offset: socket_parent=/bodyset/capitate_l
          translation=(-0.012046 -0.040519 -0.003513)
      PhysicalOffsetFrame fourthmc_l_offset: socket_parent=/bodyset/fourthmc_l translation=(0 0 0)
    WeldJoint CMC5_l: socket_parent_frame=capitate_l_offset socket_child_frame=fifthmc_l_offset
      PhysicalOffsetFrame capitate_l_offset: socket_parent=/bodyset/capitate_l
          translation=(-0.021896 -0.034683 0.004218)
      PhysicalOffsetFrame fifthmc_l_offset: socket_parent=/bodyset/fifthmc_l translation=(0 0 0)
    CustomJoint MCP_l: socket_parent_frame=firstmc_l_offset socket_child_frame=proximal_thumb_l_offset
      Coordinate mp_flexion_l: default_value=0 range=(-0.7853982 0.6981317) clamped=true
      PhysicalOffsetFrame firstmc_l_offset: socket_parent=/bodyset/firstmc_l translation=(0.0165 -0.0292 0.0127)
      PhysicalOffsetFrame proximal_thumb_l_offset: socket_parent=/bodyset/proximal_thumb_l translation=(0 0 0)
      SpatialTransform: axes_held_at_zero=(rotation2 rotation3 translation1 translation2 translation3)
        TransformAxis rotation1: coordinates=mp_flexion_l axis=(0.084295 0.203488 0.9754419)
            LinearFunction(coefficients=1 0)
    CustomJoint IP_l: socket_parent_frame=proximal_thumb_l_offset socket_child_frame=distal_thumb_l_offset
      Coordinate ip_flexion_l: default_value=0 range=(-1.308997 0.4363323) clamped=true
      PhysicalOffsetFrame proximal_thumb_l_offset: socket_parent=/bodyset/proximal_thumb_l
          translation=(0.014 -0.0259 0.0101)
      PhysicalOffsetFrame distal_thumb_l_offset: socket_parent=/bodyset/distal_thumb_l translation=(0 0 0)
      SpatialTransform: axes_held_at_zero=(rotation2 rotation3 translation1 translation2 translation3)
        TransformAxis rotation1: coordinates=ip_flexion_l axis=(0.05010201 0.4796231 0.8760431)
            LinearFunction(coefficients=1 0)
    CustomJoint 2MCP_l: socket_parent_frame=secondmc_l_offset socket_child_frame=2proxph_l_offset
      Coordinate 2mcp_flexion_l: default_value=0 range=(-0.8726646 1.570796) clamped=true
      Coordinate 2mcp_abduction_l: default_value=0 range=(-0.2617994 0.2617994) clamped=true
      PhysicalOffsetFrame secondmc_l_offset: socket_parent=/bodyset/secondmc_l
          translation=(0.003501 -0.028243 -0.00362)
      PhysicalOffsetFrame 2proxph_l_offset: socket_parent=/bodyset/2proxph_l translation=(0 0 0)
      SpatialTransform: axes_held_at_zero=(rotation3 translation1 translation2 translation3)
        TransformAxis rotation1: coordinates=2mcp_flexion_l axis=(-0.9975061 0.03949601 0.05849401)
            LinearFunction(coefficients=1 0)
        TransformAxis rotation2: coordinates=2mcp_abduction_l axis=(0.05499898 -0.08589897 0.9947846)
            LinearFunction(coefficients=1 0)
    CustomJoint 2prox-midph_l: socket_parent_frame=2proxph_l_offset socket_child_frame=2midph_l_offset
      Coordinate 2pm_flexion_l: default_value=0 range=(0 2.094395) clamped=true
      PhysicalOffsetFrame 2proxph_l_offset: socket_parent=/bodyset/2proxph_l translation=(0.007517 -0.041273 -0.007326)
      PhysicalOffsetFrame 2midph_l_offset: socket_parent=/bodyset/2midph_l translation=(0 0 0)
      SpatialTransform: axes_held_at_zero=(rotation2 rotation3 translation1 translation2 translation3)
        TransformAxis rotation1: coordinates=2pm_flexion_l axis=(-0.9603449 -0.040998 -0.275784)
            LinearFunction(coefficients=1 0)
    CustomJoint 2mid-distph_l: socket_parent_frame=2midph_l_offset socket_child_frame=2distph_l_offset
      Coordinate 2md_flexion_l: default_value=0 range=(0 1.570796) clamped=true
      PhysicalOffsetFrame 2midph_l_offset: socket_parent=/bodyset/2midph_l translation=(0.003333 -0.024888 -0.00122)
      PhysicalOffsetFrame 2distph_l_offset: socket_parent=/bodyset/2distph_l translation=(0 0 0)
      SpatialTransform: axes_held_at_zero=(rotation2 rotation3 translation1 translation2 translation3)
        TransformAxis rotation1: coordinates=2md_flexion_l axis=(-0.9789773 -0.07690602 -0.1889151)
            LinearFunction(coefficients=1 0)
    WeldJoint 3MCP_l: socket_parent_frame=thirdmc_l_offset socket_child_frame=3proxph_l_offset
      PhysicalOffsetFrame thirdmc_l_offset: socket_parent=/bodyset/thirdmc_l translation=(0.00024 -0.02629 -0.001778)
      PhysicalOffsetFrame 3proxph_l_offset: socket_parent=/bodyset/3proxph_l translation=(0 0 0)
    WeldJoint 3prox-midph_l: socket_parent_frame=3proxph_l_offset socket_child_frame=3midph_l_offset
      PhysicalOffsetFrame 3proxph_l_offset: socket_parent=/bodyset/3proxph_l translation=(0.00165 -0.044211 -0.00623)
      PhysicalOffsetFrame 3midph_l_offset: socket_parent=/bodyset/3midph_l translation=(0 0 0)
    WeldJoint 3mid-distph_l: socket_parent_frame=3midph_l_offset socket_child_frame=3distph_l_offset
      PhysicalOffsetFrame 3midph_l_offset: socket_parent=/bodyset/3midph_l translation=(0.001365 -0.029047 -0.001954)
      PhysicalOffsetFrame 3distph_l_offset: socket_parent=/bodyset/3distph_l translation=(0 0 0)
    WeldJoint 4MCP_l: socket_parent_frame=fourthmc_l_offset socket_child_frame=4proxph_l_offset
      PhysicalOffsetFrame fourthmc_l_offset: socket_parent=/bodyset/fourthmc_l
          translation=(-0.00183 -0.023689 0.000173)
      PhysicalOffsetFrame 4proxph_l_offset: socket_parent=/bodyset/4proxph_l translation=(0 0 0)
    WeldJoint 4prox-midph_l: socket_parent_frame=4proxph_l_offset socket_child_frame=4midph_l_offset
      PhysicalOffsetFrame 4proxph_l_offset: socket_parent=/bodyset/4proxph_l
          translation=(-0.003528 -0.040255 -0.001345)
      PhysicalOffsetFrame 4midph_l_offset: socket_parent=/bodyset/4midph_l translation=(0 0 0)
    WeldJoint 4mid-distph_l: socket_parent_frame=4midph_l_offset socket_child_frame=4distph_l_offset
      PhysicalOffsetFrame 4midph_l_offset: socket_parent=/bodyset/4midph_l translation=(-0.002317 -0.024789 -0.000563)
      PhysicalOffsetFrame 4distph_l_offset: socket_parent=/bodyset/4distph_l translation=(0 0 0)
    WeldJoint 5MCP_l: socket_parent_frame=fifthmc_l_offset socket_child_frame=5proxph_l_offset
      PhysicalOffsetFrame fifthmc_l_offset: socket_parent=/bodyset/fifthmc_l translation=(-0.001597 -0.021431 0.001496)
      PhysicalOffsetFrame 5proxph_l_offset: socket_parent=/bodyset/5proxph_l translation=(0 0 0)
    WeldJoint 5prox-midph_l: socket_parent_frame=5proxph_l_offset socket_child_frame=5midph_l_offset
      PhysicalOffsetFrame 5proxph_l_offset: socket_parent=/bodyset/5proxph_l translation=(-0.005279 -0.035563 0.002879)
      PhysicalOffsetFrame 5midph_l_offset: socket_parent=/bodyset/5midph_l translation=(0 0 0)
    WeldJoint 5mid-distph_l: socket_parent_frame=5midph_l_offset socket_child_frame=5distph_l_offset
      PhysicalOffsetFrame 5midph_l_offset: socket_parent=/bodyset/5midph_l translation=(-0.002871 -0.020677 0.002243)
      PhysicalOffsetFrame 5distph_l_offset: socket_parent=/bodyset/5distph_l translation=(0 0 0)
    CustomJoint bicpt_l: socket_parent_frame=radius_l_offset socket_child_frame=bicpt_l_offset
      Coordinate bicpt_tx_l: default_value=-0.0001 range=(-99999.9 99999.9) clamped=false
      Coordinate bicpt_ty_l: default_value=-0.0276 range=(-99999.9 99999.9) clamped=false
      Coordinate bicpt_tz_l: default_value=-0.0043 range=(-99999.9 99999.9) clamped=false
      PhysicalOffsetFrame radius_l_offset: socket_parent=/bodyset/radius_l translation=(0 0 0)
      PhysicalOffsetFrame bicpt_l_offset: socket_parent=/bodyset/bicpt_l translation=(0 0 0)
      SpatialTransform: axes_held_at_zero=(rotation1 rotation2 rotation3)
        TransformAxis translation1: coordinates=bicpt_tx_l axis=(1 0 0) LinearFunction(coefficients=1 0)
        TransformAxis translation2: coordinates=bicpt_ty_l axis=(0 1 0) LinearFunction(coefficients=1 0)
        TransformAxis translation3: coordinates=bicpt_tz_l axis=(0 0 -1) LinearFunction(coefficients=1 0)
    CustomJoint bicpt2_l: socket_parent_frame=radius_l_offset socket_child_frame=bicpt2_l_offset
      Coordinate bicpt2_tx_l: default_value=0.0146695 range=(-99999.9 99999.9) clamped=false
      Coordinate bicpt2_ty_l: default_value=-0.0102 range=(-99999.9 99999.9) clamped=false
      Coordinate bicpt2_tz_l: default_value=-0.01061843 range=(-99999.9 99999.9) clamped=false
      PhysicalOffsetFrame radius_l_offset: socket_parent=/bodyset/radius_l translation=(0 0 0)
      PhysicalOffsetFrame bicpt2_l_offset: socket_parent=/bodyset/bicpt2_l translation=(0 0 0)
      SpatialTransform: axes_held_at_zero=(rotation1 rotation2 rotation3)
        TransformAxis translation1: coordinates=bicpt2_tx_l axis=(1 0 0) LinearFunction(coefficients=1 0)
        TransformAxis translation2: coordinates=bicpt2_ty_l axis=(0 1 0) LinearFunction(coefficients=1 0)
        TransformAxis translation3: coordinates=bicpt2_tz_l axis=(0 0 -1) LinearFunction(coefficients=1 0)
    CustomJoint ptpt_l: socket_parent_frame=ulna_l_offset socket_child_frame=ptpt_l_offset
      Coordinate ptpt_tx_l: default_value=0.00755 range=(-99999.9 99999.9) clamped=false
      Coordinate ptpt_ty_l: default_value=-0.0649 range=(-99999.9 99999.9) clamped=false
      Coordinate ptpt_tz_l: default_value=-5e-5 range=(-99999.9 99999.9) clamped=false
      PhysicalOffsetFrame ulna_l_offset: socket_parent=/bodyset/ulna_l translation=(0 0 0)
      PhysicalOffsetFrame ptpt_l_offset: socket_parent=/bodyset/ptpt_l translation=(0 0 0)
      SpatialTransform: axes_held_at_zero=(rotation1 rotation2 rotation3)
        TransformAxis translation1: coordinates=ptpt_tx_l axis=(1 0 0) LinearFunction(coefficients=1 0)
        TransformAxis translation2: coordinates=ptpt_ty_l axis=(0 1 0) LinearFunction(coefficients=1 0)
        TransformAxis translation3: coordinates=ptpt_tz_l axis=(0 0 -1) LinearFunction(coefficients=1 0)
    CustomJoint FCUpt_l: socket_parent_frame=radius_l_offset socket_child_frame=FCUpt_l_offset
      Coordinate FCUpt_tx_l: default_value=0.004 range=(-99999.9 99999.9) clamped=false
      Coordinate FCUpt_ty_l: default_value=-0.1841 range=(-99999.9 99999.9) clamped=false
      Coordinate FCUpt_tz_l: default_value=0.0005 range=(-99999.9 99999.9) clamped=false
      PhysicalOffsetFrame radius_l_offset: socket_parent=/bodyset/radius_l translation=(0 0 0)
      PhysicalOffsetFrame FCUpt_l_offset: socket_parent=/bodyset/FCUpt_l translation=(0 0 0)
      SpatialTransform: axes_held_at_zero=(rotation1 rotation2 rotation3)
        TransformAxis translation1: coordinates=FCUpt_tx_l axis=(1 0 0) LinearFunction(coefficients=1 0)
        TransformAxis translation2: coordinates=FCUpt_ty_l axis=(0 1 0) LinearFunction(coefficients=1 0)
        TransformAxis translation3: coordinates=FCUpt_tz_l axis=(0 0 -1) LinearFunction(coefficients=1 0)
    CustomJoint EDCpt_l: socket_parent_frame=radius_l_offset socket_child_frame=EDCpt_l_offset
      Coordinate EDCpt_tx_l: default_value=0 range=(-99999.9 99999.9) clamped=false
      Coordinate EDCpt_ty_l: default_value=0 range=(-99999.9 99999.9) clamped=false
      Coordinate EDCpt_tz_l: default_value=0 range=(-99999.9 99999.9) clamped=false
      PhysicalOffsetFrame radius_l_offset: socket_parent=/bodyset/radius_l translation=(0 0 0)
      PhysicalOffsetFrame EDCpt_l_offset: socket_parent=/bodyset/EDCpt_l translation=(0 0 0)
      SpatialTransform: axes_held_at_zero=(rotation1 rotation2 rotation3)
        TransformAxis translation1: coordinates=EDCpt_tx_l axis=(1 0 0) LinearFunction(coefficients=1 0)
        TransformAxis translation2: coordinates=EDCpt_ty_l axis=(0 1 0) LinearFunction(coefficients=1 0)
        TransformAxis translation3: coordinates=EDCpt_tz_l axis=(0 0 -1) LinearFunction(coefficients=1 0)
    CustomJoint APLpt_l: socket_parent_frame=capitate_l_offset socket_child_frame=APLpt_l_offset
      Coordinate APLpt_tx_l: default_value=0 range=(-99999.9 99999.9) clamped=false
      Coordinate APLpt_ty_l: default_value=0 range=(-99999.9 99999.9) clamped=false
      Coordinate APLpt_tz_l: default_value=0 range=(-99999.9 99999.9) clamped=false
      PhysicalOffsetFrame capitate_l_offset: socket_parent=/bodyset/capitate_l translation=(0 0 0)
      PhysicalOffsetFrame APLpt_l_offset: socket_parent=/bodyset/APLpt_l translation=(0 0 0)
      SpatialTransform: axes_held_at_zero=(rotation1 rotation2 rotation3)
        TransformAxis translation1: coordinates=APLpt_tx_l axis=(1 0 0) LinearFunction(coefficients=1 0)
        TransformAxis translation2: coordinates=APLpt_ty_l axis=(0 1 0) LinearFunction(coefficients=1 0)
        TransformAxis translation3: coordinates=APLpt_tz_l axis=(0 0 -1) LinearFunction(coefficients=1 0)
    CustomJoint FPLpt_l: socket_parent_frame=capitate_l_offset socket_child_frame=FPLpt_l_offset
      Coordinate FPLpt_tx_l: default_value=0 range=(-99999.9 99999.9) clamped=false
      Coordinate FPLpt_ty_l: default_value=0 range=(-99999.9 99999.9) clamped=false
      Coordinate FPLpt_tz_l: default_value=0 range=(-99999.9 99999.9) clamped=false
      PhysicalOffsetFrame capitate_l_offset: socket_parent=/bodyset/capitate_l translation=(0 0 0)
      PhysicalOffsetFrame FPLpt_l_offset: socket_parent=/bodyset/FPLpt_l translation=(0 0 0)
      SpatialTransform: axes_held_at_zero=(rotation1 rotation2 rotation3)
        TransformAxis translation1: coordinates=FPLpt_tx_l axis=(1 0 0) LinearFunction(coefficients=1 0)
        TransformAxis translation2: coordinates=FPLpt_ty_l axis=(0 1 0) LinearFunction(coefficients=1 0)
        TransformAxis translation3: coordinates=FPLpt_tz_l axis=(0 0 -1) LinearFunction(coefficients=1 0)
    CustomJoint FPLpt2_l: socket_parent_frame=capitate_l_offset socket_child_frame=FPLpt2_l_offset
      Coordinate FPLpt2_tx_l: default_value=0 range=(-99999.9 99999.9) clamped=false
      Coordinate FPLpt2_ty_l: default_value=0 range=(-99999.9 99999.9) clamped=false
      Coordinate FPLpt2_tz_l: default_value=0 range=(-99999.9 99999.9) clamped=false
      PhysicalOffsetFrame capitate_l_offset: socket_parent=/bodyset/capitate_l translation=(0 0 0)
      PhysicalOffsetFrame FPLpt2_l_offset: socket_parent=/bodyset/FPLpt2_l translation=(0 0 0)
      SpatialTransform: axes_held_at_zero=(rotation1 rotation2 rotation3)
        TransformAxis translation1: coordinates=FPLpt2_tx_l axis=(1 0 0) LinearFunction(coefficients=1 0)
        TransformAxis translation2: coordinates=FPLpt2_ty_l axis=(0 1 0) LinearFunction(coefficients=1 0)
        TransformAxis translation3: coordinates=FPLpt2_tz_l axis=(0 0 -1) LinearFunction(coefficients=1 0)
    CustomJoint PEC1pt2_l: socket_parent_frame=humerus_l_offset socket_child_frame=PEC1pt2_l_offset
      Coordinate PEC1pt2_tx_l: default_value=0 range=(-99999.9 99999.9) clamped=false
      Coordinate PEC1pt2_ty_l: default_value=0 range=(-99999.9 99999.9) clamped=false
      Coordinate PEC1pt2_tz_l: default_value=0 range=(-99999.9 99999.9) clamped=false
      PhysicalOffsetFrame humerus_l_offset: socket_parent=/bodyset/humerus_l translation=(0 0 0)
      PhysicalOffsetFrame PEC1pt2_l_offset: socket_parent=/bodyset/PEC1pt2_l translation=(0 0 0)
      SpatialTransform: axes_held_at_zero=(rotation1 rotation2 rotation3)
        TransformAxis translation1: coordinates=PEC1pt2_tx_l axis=(1 0 0) LinearFunction(coefficients=1 0)
        TransformAxis translation2: coordinates=PEC1pt2_ty_l axis=(0 1 0) LinearFunction(coefficients=1 0)
        TransformAxis translation3: coordinates=PEC1pt2_tz_l axis=(0 0 -1) LinearFunction(coefficients=1 0)
    CustomJoint PEC1pt3_l: socket_parent_frame=thorax_offset socket_child_frame=PEC1pt3_l_offset
      Coordinate PEC1pt3_tx_l: default_value=0 range=(-99999.9 99999.9) clamped=false
      Coordinate PEC1pt3_ty_l: default_value=0 range=(-99999.9 99999.9) clamped=false
      Coordinate PEC1pt3_tz_l: default_value=0 range=(-99999.9 99999.9) clamped=false
      PhysicalOffsetFrame thorax_offset: socket_parent=/bodyset/thorax translation=(0 0 0)
      PhysicalOffsetFrame PEC1pt3_l_offset: socket_parent=/bodyset/PEC1pt3_l translation=(0 0 0)
      SpatialTransform: axes_held_at_zero=(rotation1 rotation2 rotation3)
        TransformAxis translation1: coordinates=PEC1pt3_tx_l axis=(1 0 0) LinearFunction(coefficients=1 0)
        TransformAxis translation2: coordinates=PEC1pt3_ty_l axis=(0 1 0) LinearFunction(coefficients=1 0)
        TransformAxis translation3: coordinates=PEC1pt3_tz_l axis=(0 0 -1) LinearFunction(coefficients=1 0)
    CustomJoint PEC2pt2_l: socket_parent_frame=humerus_l_offset socket_child_frame=PEC2pt2_l_offset
      Coordinate PEC2pt2_tx_l: default_value=0 range=(-99999.9 99999.9) clamped=false
      Coordinate PEC2pt2_ty_l: default_value=0 range=(-99999.9 99999.9) clamped=false
      Coordinate PEC2pt2_tz_l: default_value=0 range=(-99999.9 99999.9) clamped=false
      PhysicalOffsetFrame humerus_l_offset: socket_parent=/bodyset/humerus_l translation=(0 0 0)
      PhysicalOffsetFrame PEC2pt2_l_offset: socket_parent=/bodyset/PEC2pt2_l translation=(0 0 0)
      SpatialTransform: axes_held_at_zero=(rotation1 rotation2 rotation3)
        TransformAxis translation1: coordinates=PEC2pt2_tx_l axis=(1 0 0) LinearFunction(coefficients=1 0)
        TransformAxis translation2: coordinates=PEC2pt2_ty_l axis=(0 1 0) LinearFunction(coefficients=1 0)
        TransformAxis translation3: coordinates=PEC2pt2_tz_l axis=(0 0 -1) LinearFunction(coefficients=1 0)
    CustomJoint PEC2pt3_l: socket_parent_frame=thorax_offset socket_child_frame=PEC2pt3_l_offset
      Coordinate PEC2pt3_tx_l: default_value=0 range=(-99999.9 99999.9) clamped=false
      Coordinate PEC2pt3_ty_l: default_value=0 range=(-99999.9 99999.9) clamped=false
      Coordinate PEC2pt3_tz_l: default_value=0 range=(-99999.9 99999.9) clamped=false
      PhysicalOffsetFrame thorax_offset: socket_parent=/bodyset/thorax translation=(0 0 0)
      PhysicalOffsetFrame PEC2pt3_l_offset: socket_parent=/bodyset/PEC2pt3_l translation=(0 0 0)
      SpatialTransform: axes_held_at_zero=(rotation1 rotation2 rotation3)
        TransformAxis translation1: coordinates=PEC2pt3_tx_l axis=(1 0 0) LinearFunction(coefficients=1 0)
        TransformAxis translation2: coordinates=PEC2pt3_ty_l axis=(0 1 0) LinearFunction(coefficients=1 0)
        TransformAxis translation3: coordinates=PEC2pt3_tz_l axis=(0 0 -1) LinearFunction(coefficients=1 0)
    CustomJoint PEC3pt2_l: socket_parent_frame=humerus_l_offset socket_child_frame=PEC3pt2_l_offset
      Coordinate PEC3pt2_tx_l: default_value=0 range=(-99999.9 99999.9) clamped=false
      Coordinate PEC3pt2_ty_l: default_value=0 range=(-99999.9 99999.9) clamped=false
      Coordinate PEC3pt2_tz_l: default_value=0 range=(-99999.9 99999.9) clamped=false
      PhysicalOffsetFrame humerus_l_offset: socket_parent=/bodyset/humerus_l translation=(0 0 0)
      PhysicalOffsetFrame PEC3pt2_l_offset: socket_parent=/bodyset/PEC3pt2_l translation=(0 0 0)
      SpatialTransform: axes_held_at_zero=(rotation1 rotation2 rotation3)
        TransformAxis translation1: coordinates=PEC3pt2_tx_l axis=(1 0 0) LinearFunction(coefficients=1 0)
        TransformAxis translation2: coordinates=PEC3pt2_ty_l axis=(0 1 0) LinearFunction(coefficients=1 0)
        TransformAxis translation3: coordinates=PEC3pt2_tz_l axis=(0 0 -1) LinearFunction(coefficients=1 0)
    CustomJoint PEC3pt3_l: socket_parent_frame=thorax_offset socket_child_frame=PEC3pt3_l_offset
      Coordinate PEC3pt3_tx_l: default_value=0 range=(-99999.9 99999.9) clamped=false
      Coordinate PEC3pt3_ty_l: default_value=0.000225322 range=(-99999.9 99999.9) clamped=false
      Coordinate PEC3pt3_tz_l: default_value=0 range=(-99999.9 99999.9) clamped=false
      PhysicalOffsetFrame thorax_offset: socket_parent=/bodyset/thorax translation=(0 0 0)
      PhysicalOffsetFrame PEC3pt3_l_offset: socket_parent=/bodyset/PEC3pt3_l translation=(0 0 0)
      SpatialTransform: axes_held_at_zero=(rotation1 rotation2 rotation3)
        TransformAxis translation1: coordinates=PEC3pt3_tx_l axis=(1 0 0) LinearFunction(coefficients=1 0)
        TransformAxis translation2: coordinates=PEC3pt3_ty_l axis=(0 1 0) LinearFunction(coefficients=1 0)
        TransformAxis translation3: coordinates=PEC3pt3_tz_l axis=(0 0 -1) LinearFunction(coefficients=1 0)
    CustomJoint DELT2pt2a_l: socket_parent_frame=humerus_l_offset socket_child_frame=DELT2pt2a_l_offset
      Coordinate DELT2pt2a_tx_l: default_value=0 range=(-99999.9 99999.9) clamped=false
      Coordinate DELT2pt2a_ty_l: default_value=0 range=(-99999.9 99999.9) clamped=false
      Coordinate DELT2pt2a_tz_l: default_value=0 range=(-99999.9 99999.9) clamped=false
      PhysicalOffsetFrame humerus_l_offset: socket_parent=/bodyset/humerus_l translation=(0 0 0)
      PhysicalOffsetFrame DELT2pt2a_l_offset: socket_parent=/bodyset/DELT2pt2a_l translation=(0 0 0)
      SpatialTransform: axes_held_at_zero=(rotation1 rotation2 rotation3)
        TransformAxis translation1: coordinates=DELT2pt2a_tx_l axis=(1 0 0) LinearFunction(coefficients=1 0)
        TransformAxis translation2: coordinates=DELT2pt2a_ty_l axis=(0 1 0) LinearFunction(coefficients=1 0)
        TransformAxis translation3: coordinates=DELT2pt2a_tz_l axis=(0 0 -1) LinearFunction(coefficients=1 0)
    CustomJoint DELT2pt2_l: socket_parent_frame=DELT2pt2a_l_offset socket_child_frame=DELT2pt2_l_offset
      Coordinate DELT2pt2_tx_l: default_value=-0.0004399096 range=(-99999.9 99999.9) clamped=false
      Coordinate DELT2pt2_ty_l: default_value=0 range=(-99999.9 99999.9) clamped=false
      Coordinate DELT2pt2_tz_l: default_value=0 range=(-99999.9 99999.9) clamped=false
      PhysicalOffsetFrame DELT2pt2a_l_offset: socket_parent=/bodyset/DELT2pt2a_l translation=(0 0 0)
      PhysicalOffsetFrame DELT2pt2_l_offset: socket_parent=/bodyset/DELT2pt2_l translation=(0 0 0)
      SpatialTransform: axes_held_at_zero=(rotation1 rotation2 rotation3)
        TransformAxis translation1: coordinates=DELT2pt2_tx_l axis=(1 0 0) LinearFunction(coefficients=1 0)
        TransformAxis translation2: coordinates=DELT2pt2_ty_l axis=(0 1 0) LinearFunction(coefficients=1 0)
        TransformAxis translation3: coordinates=DELT2pt2_tz_l axis=(0 0 -1) LinearFunction(coefficients=1 0)
    CustomJoint LAT1pt2_l: socket_parent_frame=scapula_l_offset socket_child_frame=LAT1pt2_l_offset
      Coordinate LAT1pt2_tx_l: default_value=0 range=(-99999.9 99999.9) clamped=false
      Coordinate LAT1pt2_ty_l: default_value=0 range=(-99999.9 99999.9) clamped=false
      Coordinate LAT1pt2_tz_l: default_value=0 range=(-99999.9 99999.9) clamped=false
      PhysicalOffsetFrame scapula_l_offset: socket_parent=/bodyset/scapula_l translation=(0 0 0)
      PhysicalOffsetFrame LAT1pt2_l_offset: socket_parent=/bodyset/LAT1pt2_l translation=(0 0 0)
      SpatialTransform: axes_held_at_zero=(rotation1 rotation2 rotation3)
        TransformAxis translation1: coordinates=LAT1pt2_tx_l axis=(1 0 0) LinearFunction(coefficients=1 0)
        TransformAxis translation2: coordinates=LAT1pt2_ty_l axis=(0 1 0) LinearFunction(coefficients=1 0)
        TransformAxis translation3: coordinates=LAT1pt2_tz_l axis=(0 0 -1) LinearFunction(coefficients=1 0)
    CustomJoint LAT1pt3_l: socket_parent_frame=scapula_l_offset socket_child_frame=LAT1pt3_l_offset
      Coordinate LAT1pt3_tx_l: default_value=0 range=(-99999.9 99999.9) clamped=false
      Coordinate LAT1pt3_ty_l: default_value=0 range=(-99999.9 99999.9) clamped=false
      Coordinate LAT1pt3_tz_l: default_value=0 range=(-99999.9 99999.9) clamped=false
      PhysicalOffsetFrame scapula_l_offset: socket_parent=/bodyset/scapula_l translation=(0 0 0)
      PhysicalOffsetFrame LAT1pt3_l_offset: socket_parent=/bodyset/LAT1pt3_l translation=(0 0 0)
      SpatialTransform: axes_held_at_zero=(rotation1 rotation2 rotation3)
        TransformAxis translation1: coordinates=LAT1pt3_tx_l axis=(1 0 0) LinearFunction(coefficients=1 0)
        TransformAxis translation2: coordinates=LAT1pt3_ty_l axis=(0 1 0) LinearFunction(coefficients=1 0)
        TransformAxis translation3: coordinates=LAT1pt3_tz_l axis=(0 0 -1) LinearFunction(coefficients=1 0)
    CustomJoint LAT2pt2_l: socket_parent_frame=scapula_l_offset socket_child_frame=LAT2pt2_l_offset
      Coordinate LAT2pt2_tx_l: default_value=0 range=(-99999.9 99999.9) clamped=false
      Coordinate LAT2pt2_ty_l: default_value=0 range=(-99999.9 99999.9) clamped=false
      Coordinate LAT2pt2_tz_l: default_value=0 range=(-99999.9 99999.9) clamped=false
      PhysicalOffsetFrame scapula_l_offset: socket_parent=/bodyset/scapula_l translation=(0 0 0)
      PhysicalOffsetFrame LAT2pt2_l_offset: socket_parent=/bodyset/LAT2pt2_l translation=(0 0 0)
      SpatialTransform: axes_held_at_zero=(rotation1 rotation2 rotation3)
        TransformAxis translation1: coordinates=LAT2pt2_tx_l axis=(1 0 0) LinearFunction(coefficients=1 0)
        TransformAxis translation2: coordinates=LAT2pt2_ty_l axis=(0 1 0) LinearFunction(coefficients=1 0)
        TransformAxis translation3: coordinates=LAT2pt2_tz_l axis=(0 0 -1) LinearFunction(coefficients=1 0)
    CustomJoint LAT2pt3_l: socket_parent_frame=scapula_l_offset socket_child_frame=LAT2pt3_l_offset
      Coordinate LAT2pt3_tx_l: default_value=0 range=(-99999.9 99999.9) clamped=false
      Coordinate LAT2pt3_ty_l: default_value=0 range=(-99999.9 99999.9) clamped=false
      Coordinate LAT2pt3_tz_l: default_value=0 range=(-99999.9 99999.9) clamped=false
      PhysicalOffsetFrame scapula_l_offset: socket_parent=/bodyset/scapula_l translation=(0 0 0)
      PhysicalOffsetFrame LAT2pt3_l_offset: socket_parent=/bodyset/LAT2pt3_l translation=(0 0 0)
      SpatialTransform: axes_held_at_zero=(rotation1 rotation2 rotation3)
        TransformAxis translation1: coordinates=LAT2pt3_tx_l axis=(1 0 0) LinearFunction(coefficients=1 0)
        TransformAxis translation2: coordinates=LAT2pt3_ty_l axis=(0 1 0) LinearFunction(coefficients=1 0)
        TransformAxis translation3: coordinates=LAT2pt3_tz_l axis=(0 0 -1) LinearFunction(coefficients=1 0)
    CustomJoint LAT3pt2_l: socket_parent_frame=scapula_l_offset socket_child_frame=LAT3pt2_l_offset
      Coordinate LAT3pt2_tx_l: default_value=0 range=(-99999.9 99999.9) clamped=false
      Coordinate LAT3pt2_ty_l: default_value=0 range=(-99999.9 99999.9) clamped=false
      Coordinate LAT3pt2_tz_l: default_value=0 range=(-99999.9 99999.9) clamped=false
      PhysicalOffsetFrame scapula_l_offset: socket_parent=/bodyset/scapula_l translation=(0 0 0)
      PhysicalOffsetFrame LAT3pt2_l_offset: socket_parent=/bodyset/LAT3pt2_l translation=(0 0 0)
      SpatialTransform: axes_held_at_zero=(rotation1 rotation2 rotation3)
        TransformAxis translation1: coordinates=LAT3pt2_tx_l axis=(1 0 0) LinearFunction(coefficients=1 0)
        TransformAxis translation2: coordinates=LAT3pt2_ty_l axis=(0 1 0) LinearFunction(coefficients=1 0)
        TransformAxis translation3: coordinates=LAT3pt2_tz_l axis=(0 0 -1) LinearFunction(coefficients=1 0)
    CustomJoint LAT3pt3_l: socket_parent_frame=scapula_l_offset socket_child_frame=LAT3pt3_l_offset
      Coordinate LAT3pt3_tx_l: default_value=0 range=(-99999.9 99999.9) clamped=false
      Coordinate LAT3pt3_ty_l: default_value=0 range=(-99999.9 99999.9) clamped=false
      Coordinate LAT3pt3_tz_l: default_value=0 range=(-99999.9 99999.9) clamped=false
      PhysicalOffsetFrame scapula_l_offset: socket_parent=/bodyset/scapula_l translation=(0 0 0)
      PhysicalOffsetFrame LAT3pt3_l_offset: socket_parent=/bodyset/LAT3pt3_l translation=(0 0 0)
      SpatialTransform: axes_held_at_zero=(rotation1 rotation2 rotation3)
        TransformAxis translation1: coordinates=LAT3pt3_tx_l axis=(1 0 0) LinearFunction(coefficients=1 0)
        TransformAxis translation2: coordinates=LAT3pt3_ty_l axis=(0 1 0) LinearFunction(coefficients=1 0)
        TransformAxis translation3: coordinates=LAT3pt3_tz_l axis=(0 0 -1) LinearFunction(coefficients=1 0)
  ConstraintSet:
    CoordinateCouplerConstraint sternoclavicular_r2_con: independent_coordinate_names=shoulder_elv
        dependent_coordinate_name=sternoclavicular_r2
      coupled_coordinates_function: SimmSpline f0: x=(0 2.61799) y=(0 -0.633555)
    CoordinateCouplerConstraint sternoclavicular_r3_con: independent_coordinate_names=shoulder_elv
        dependent_coordinate_name=sternoclavicular_r3
      coupled_coordinates_function: SimmSpline f1: x=(0 3.14159) y=(0 0.322013)
    CoordinateCouplerConstraint unrotscap_r2_con: independent_coordinate_names=shoulder_elv
        dependent_coordinate_name=unrotscap_r2
      coupled_coordinates_function: SimmSpline f2: x=(0 2.61799) y=(0 0.633555)
    CoordinateCouplerConstraint unrotscap_r3_con: independent_coordinate_names=shoulder_elv
        dependent_coordinate_name=unrotscap_r3
      coupled_coordinates_function: SimmSpline f3: x=(0 3.14159) y=(0 -0.322013)
    CoordinateCouplerConstraint acromioclavicular_r1_con: independent_coordinate_names=shoulder_elv
        dependent_coordinate_name=acromioclavicular_r1
      coupled_coordinates_function: SimmSpline f4: x=(0 2.61799) y=(0 0.466003)
    CoordinateCouplerConstraint acromioclavicular_r2_con: independent_coordinate_names=shoulder_elv
        dependent_coordinate_name=acromioclavicular_r2
      coupled_coordinates_function: SimmSpline f5: x=(0 2.61799) y=(0 -0.128282)
    CoordinateCouplerConstraint acromioclavicular_r3_con: independent_coordinate_names=shoulder_elv
        dependent_coordinate_name=acromioclavicular_r3
      coupled_coordinates_function: SimmSpline f6: x=(0 2.61799) y=(0 1.03673)
    CoordinateCouplerConstraint unrothum_r1_con: independent_coordinate_names=shoulder_elv
        dependent_coordinate_name=unrothum_r1
      coupled_coordinates_function: SimmSpline f7: x=(0 2.61799) y=(0 -0.466003)
    CoordinateCouplerConstraint unrothum_r2_con: independent_coordinate_names=shoulder_elv
        dependent_coordinate_name=unrothum_r2
      coupled_coordinates_function: SimmSpline f8: x=(0 2.61799) y=(0 0.128282)
    CoordinateCouplerConstraint unrothum_r3_con: independent_coordinate_names=shoulder_elv
        dependent_coordinate_name=unrothum_r3
      coupled_coordinates_function: SimmSpline f9: x=(0 2.61799) y=(0 -1.03673)
    CoordinateCouplerConstraint shoulder1_r2_con: independent_coordinate_names=elv_angle
        dependent_coordinate_name=shoulder1_r2
      coupled_coordinates_function: SimmSpline f11: x=(-1.5708 3.14159) y=(1.5708 -3.14159)
    CoordinateCouplerConstraint proximal_distal_r1_con: independent_coordinate_names=deviation
        dependent_coordinate_name=proximal_distal_r1
      coupled_coordinates_function: SimmSpline f18: x=(-0.174533 0 0.436332) y=(-0.261799 0 0.436332)
    CoordinateCouplerConstraint proximal_distal_r3_con: independent_coordinate_names=flexion
        dependent_coordinate_name=proximal_distal_r3
      coupled_coordinates_function: SimmSpline f19: x=(-1.22173 1.22173) y=(-0.610865 0.610865)
    CoordinateCouplerConstraint bicpt_tx_con: independent_coordinate_names=elbow_flexion
        dependent_coordinate_name=bicpt_tx
      coupled_coordinates_function: SimmSpline f70: x=(0 2.26893) y=(-0.0001 0.0042)
    CoordinateCouplerConstraint bicpt_ty_con: independent_coordinate_names=elbow_flexion
        dependent_coordinate_name=bicpt_ty
      coupled_coordinates_function: SimmSpline f71: x=(0 2.26893) y=(-0.0276 -0.0425)
    CoordinateCouplerConstraint bicpt_tz_con: independent_coordinate_names=elbow_flexion
        dependent_coordinate_name=bicpt_tz
      coupled_coordinates_function: SimmSpline f72: x=(0 2.26893) y=(-0.0043 -0.0067)
    CoordinateCouplerConstraint bicpt2_tx_con: independent_coordinate_names=pro_sup dependent_coordinate_name=bicpt2_tx
      coupled_coordinates_function: SimmSpline f80: x=(-1.5708 -0.610865 1.57823) y=(-0.003 0.01 0.01376)
    CoordinateCouplerConstraint bicpt2_ty_con: independent_coordinate_names=elbow_flexion
        dependent_coordinate_name=bicpt2_ty
      coupled_coordinates_function: SimmSpline f81: x=(0 2.27483) y=(-0.0102 -0.045607)
    CoordinateCouplerConstraint bicpt2_tz_con: independent_coordinate_names=pro_sup dependent_coordinate_name=bicpt2_tz
      coupled_coordinates_function: SimmSpline f82: x=(-1.5708 -0.610865 1.57561) y=(-0.0095 -0.011533 -0.000331)
    CoordinateCouplerConstraint ptpt_tx_con: independent_coordinate_names=pro_sup dependent_coordinate_name=ptpt_tx
      coupled_coordinates_function: SimmSpline f90: x=(-1.5708 1.5708) y=(0.0142 0.0009)
    CoordinateCouplerConstraint ptpt_ty_con: independent_coordinate_names=pro_sup dependent_coordinate_name=ptpt_ty
      coupled_coordinates_function: SimmSpline f91: x=(-1.5708 1.5708) y=(-0.0606 -0.0692)
    CoordinateCouplerConstraint ptpt_tz_con: independent_coordinate_names=pro_sup dependent_coordinate_name=ptpt_tz
      coupled_coordinates_function: SimmSpline f92: x=(-1.5708 1.5708) y=(0.0072 -0.0073)
    CoordinateCouplerConstraint FCUpt_tx_con: independent_coordinate_names=pro_sup dependent_coordinate_name=FCUpt_tx
      coupled_coordinates_function: SimmSpline f100: x=(-1.5708 0 1.5708) y=(-0.0027 0.004 0.0132)
    CoordinateCouplerConstraint FCUpt_ty_con: independent_coordinate_names=pro_sup dependent_coordinate_name=FCUpt_ty
      coupled_coordinates_function: SimmSpline f101: x=(-1.5708 0 1.5708) y=(-0.1838 -0.1841 -0.1821)
    CoordinateCouplerConstraint FCUpt_tz_con: independent_coordinate_names=pro_sup dependent_coordinate_name=FCUpt_tz
      coupled_coordinates_function: SimmSpline f102: x=(-1.5708 0 1.5708) y=(0.0069 0.0005 0.0002)
    CoordinateCouplerConstraint EDCpt_tx_con: independent_coordinate_names=pro_sup dependent_coordinate_name=EDCpt_tx
      coupled_coordinates_function: SimmSpline f110: x=(-1.5708 0 1.5708) y=(0.0108 0 -0.0108)
    CoordinateCouplerConstraint EDCpt_ty_con: independent_coordinate_names=pro_sup dependent_coordinate_name=EDCpt_ty
      coupled_coordinates_function: SimmSpline f111: x=(-1.5708 0 1.5708) y=(-0.0013 0 0.0038)
    CoordinateCouplerConstraint EDCpt_tz_con: independent_coordinate_names=pro_sup dependent_coordinate_name=EDCpt_tz
      coupled_coordinates_function: SimmSpline f112: x=(-1.5708 0 1.5708) y=(-0.0035 0 -0.00089)
    CoordinateCouplerConstraint APLpt_tx_con: independent_coordinate_names=flexion dependent_coordinate_name=APLpt_tx
      coupled_coordinates_function: SimmSpline f120: x=(-1.22173 0 1.22173) y=(0 0 -0.0025)
    CoordinateCouplerConstraint APLpt_ty_con: independent_coordinate_names=flexion dependent_coordinate_name=APLpt_ty
      coupled_coordinates_function: SimmSpline f121: x=(-1.22173 0 1.22173) y=(0 0 -0.001)
    CoordinateCouplerConstraint APLpt_tz_con: independent_coordinate_names=flexion dependent_coordinate_name=APLpt_tz
      coupled_coordinates_function: SimmSpline f122: x=(-1.22173 0 1.22173) y=(0 0 -0.005)
    CoordinateCouplerConstraint FPLpt_tx_con: independent_coordinate_names=flexion dependent_coordinate_name=FPLpt_tx
      coupled_coordinates_function: SimmSpline f130: x=(-1.22173 0 1.22173) y=(0 0 -0.0032)
    CoordinateCouplerConstraint FPLpt_ty_con: independent_coordinate_names=flexion dependent_coordinate_name=FPLpt_ty
      coupled_coordinates_function: SimmSpline f131: x=(-1.22173 0 1.22173) y=(0 0 -0.0096)
    CoordinateCouplerConstraint FPLpt_tz_con: independent_coordinate_names=flexion dependent_coordinate_name=FPLpt_tz
      coupled_coordinates_function: SimmSpline f132: x=(-1.22173 0 1.22173) y=(0 0 -0.0054)
    CoordinateCouplerConstraint FPLpt2_tx_con: independent_coordinate_names=cmc_flexion
        dependent_coordinate_name=FPLpt2_tx
      coupled_coordinates_function: SimmSpline f140: x=(-0.261799 0 0.0872665 0.183675 0.376492 0.785303)
          y=(-0.0032 0 4e-5 3.2e-5 8e-6 0)
    CoordinateCouplerConstraint FPLpt2_ty_con: independent_coordinate_names=cmc_flexion
        dependent_coordinate_name=FPLpt2_ty
      coupled_coordinates_function: SimmSpline f141: x=(-0.261799 0 0.785398) y=(0.0005 0 0)
    CoordinateCouplerConstraint FPLpt2_tz_con: independent_coordinate_names=cmc_flexion
        dependent_coordinate_name=FPLpt2_tz
      coupled_coordinates_function: SimmSpline f142: x=(-0.261799 0 0.785398) y=(0.0006 0 0)
    CoordinateCouplerConstraint PEC1pt2_tx_con: independent_coordinate_names=shoulder_elv
        dependent_coordinate_name=PEC1pt2_tx
      coupled_coordinates_function: SimmSpline f150: x=(0 3.14159) y=(0 0.0059)
    CoordinateCouplerConstraint PEC1pt2_ty_con: independent_coordinate_names=shoulder_elv
        dependent_coordinate_name=PEC1pt2_ty
      coupled_coordinates_function: SimmSpline f151: x=(0 3.14159) y=(0 0.0207)
    CoordinateCouplerConstraint PEC1pt2_tz_con: independent_coordinate_names=shoulder_elv
        dependent_coordinate_name=PEC1pt2_tz
      coupled_coordinates_function: SimmSpline f152: x=(0 3.14159) y=(0 0.0144)
    CoordinateCouplerConstraint PEC1pt3_tx_con: independent_coordinate_names=shoulder_elv
        dependent_coordinate_name=PEC1pt3_tx
      coupled_coordinates_function: SimmSpline f160: x=(0 3.14159) y=(0 -0.0193)
    CoordinateCouplerConstraint PEC1pt3_ty_con: independent_coordinate_names=shoulder_elv
        dependent_coordinate_name=PEC1pt3_ty
      coupled_coordinates_function: SimmSpline f161: x=(0 3.14159) y=(0 0.0466)
    CoordinateCouplerConstraint PEC1pt3_tz_con: independent_coordinate_names=shoulder_elv
        dependent_coordinate_name=PEC1pt3_tz
      coupled_coordinates_function: SimmSpline f162: x=(0 3.14159) y=(0 -0.0442)
    CoordinateCouplerConstraint PEC2pt2_tx_con: independent_coordinate_names=shoulder_elv
        dependent_coordinate_name=PEC2pt2_tx
      coupled_coordinates_function: SimmSpline f170: x=(0 3.14159) y=(0 0.0059)
    CoordinateCouplerConstraint PEC2pt2_ty_con: independent_coordinate_names=shoulder_elv
        dependent_coordinate_name=PEC2pt2_ty
      coupled_coordinates_function: SimmSpline f171: x=(0 3.14159) y=(0 0.0207)
    CoordinateCouplerConstraint PEC2pt2_tz_con: independent_coordinate_names=shoulder_elv
        dependent_coordinate_name=PEC2pt2_tz
      coupled_coordinates_function: SimmSpline f172: x=(0 3.14159) y=(0 0.0144)
    CoordinateCouplerConstraint PEC2pt3_tx_con: independent_coordinate_names=shoulder_elv
        dependent_coordinate_name=PEC2pt3_tx
      coupled_coordinates_function: SimmSpline f180: x=(0 3.14159) y=(0 0.0013)
    CoordinateCouplerConstraint PEC2pt3_ty_con: independent_coordinate_names=shoulder_elv
        dependent_coordinate_name=PEC2pt3_ty
      coupled_coordinates_function: SimmSpline f181: x=(0 3.14159) y=(0 0.0432)
    CoordinateCouplerConstraint PEC2pt3_tz_con: independent_coordinate_names=shoulder_elv
        dependent_coordinate_name=PEC2pt3_tz
      coupled_coordinates_function: SimmSpline f182: x=(0 3.14159) y=(0 -0.0227)
    CoordinateCouplerConstraint PEC3pt2_tx_con: independent_coordinate_names=shoulder_elv
        dependent_coordinate_name=PEC3pt2_tx
      coupled_coordinates_function: SimmSpline f190: x=(0 0.747517 3.14159) y=(0 0.002482 0.0059)
    CoordinateCouplerConstraint PEC3pt2_ty_con: independent_coordinate_names=shoulder_elv
        dependent_coordinate_name=PEC3pt2_ty
      coupled_coordinates_function: SimmSpline f191: x=(0 3.13149) y=(0 0.011474)
    CoordinateCouplerConstraint PEC3pt2_tz_con: independent_coordinate_names=shoulder_elv
        dependent_coordinate_name=PEC3pt2_tz
      coupled_coordinates_function: SimmSpline f192: x=(0 0.623056 2.29124 3.12533) y=(0 0.009968 0.018193 0.017746)
    CoordinateCouplerConstraint PEC3pt3_tx_con: independent_coordinate_names=shoulder_elv
        dependent_coordinate_name=PEC3pt3_tx
      coupled_coordinates_function: SimmSpline f200: x=(0 3.14159) y=(0 0)
    CoordinateCouplerConstraint PEC3pt3_ty_con: independent_coordinate_names=shoulder_elv
        dependent_coordinate_name=PEC3pt3_ty
      coupled_coordinates_function: SimmSpline f201: x=(0.0101016 1.59605 3.14159) y=(0.000222 0.011219 0.0441)
    CoordinateCouplerConstraint PEC3pt3_tz_con: independent_coordinate_names=shoulder_elv
        dependent_coordinate_name=PEC3pt3_tz
      coupled_coordinates_function: SimmSpline f202: x=(0 3.14159) y=(0 0)
    CoordinateCouplerConstraint DELT2pt2a_tx_con: independent_coordinate_names=shoulder_elv
        dependent_coordinate_name=DELT2pt2a_tx
      coupled_coordinates_function: SimmSpline f210: x=(0 3.14159) y=(0 -0.0169)
    CoordinateCouplerConstraint DELT2pt2a_ty_con: independent_coordinate_names=shoulder_elv
        dependent_coordinate_name=DELT2pt2a_ty
      coupled_coordinates_function: SimmSpline f211: x=(0 3.14159) y=(0 -0.0781)
    CoordinateCouplerConstraint DELT2pt2a_tz_con: independent_coordinate_names=shoulder_elv
        dependent_coordinate_name=DELT2pt2a_tz
      coupled_coordinates_function: SimmSpline f212: x=(0 1.22229 3.14159) y=(0 -0.005395 -0.0363)
    CoordinateCouplerConstraint DELT2pt2_tx_con: independent_coordinate_names=shoulder_rot
        dependent_coordinate_name=DELT2pt2_tx
      coupled_coordinates_function: SimmSpline f220: x=(-1.5708 -0.0101503 0.349046) y=(0.0214 4.9e-5 -0.020005)
    CoordinateCouplerConstraint DELT2pt2_ty_con: independent_coordinate_names=shoulder_rot
        dependent_coordinate_name=DELT2pt2_ty
      coupled_coordinates_function: SimmSpline f221: x=(-1.5708 -1.18189 -0.169482 0 0.349066)
          y=(-0.0029 -0.002148 -0.000139 0 -0.001644)
    CoordinateCouplerConstraint DELT2pt2_tz_con: independent_coordinate_names=shoulder_rot
        dependent_coordinate_name=DELT2pt2_tz
      coupled_coordinates_function: SimmSpline f222: x=(-1.5708 -0.496661 0 0.342893) y=(-0.0455 -0.006762 0 -0.00573)
    CoordinateCouplerConstraint LAT1pt2_tx_con: independent_coordinate_names=shoulder_elv
        dependent_coordinate_name=LAT1pt2_tx
      coupled_coordinates_function: SimmSpline f230: x=(0 3.14159) y=(0 -0.0021)
    CoordinateCouplerConstraint LAT1pt2_ty_con: independent_coordinate_names=shoulder_elv
        dependent_coordinate_name=LAT1pt2_ty
      coupled_coordinates_function: SimmSpline f231: x=(0 3.14159) y=(0 0.0352)
    CoordinateCouplerConstraint LAT1pt2_tz_con: independent_coordinate_names=shoulder_elv
        dependent_coordinate_name=LAT1pt2_tz
      coupled_coordinates_function: SimmSpline f232: x=(0 3.14159) y=(0 -0.0144)
    CoordinateCouplerConstraint LAT1pt3_tx_con: independent_coordinate_names=shoulder_elv
        dependent_coordinate_name=LAT1pt3_tx
      coupled_coordinates_function: SimmSpline f240: x=(0 3.14159) y=(0 0.0058)
    CoordinateCouplerConstraint LAT1pt3_ty_con: independent_coordinate_names=shoulder_elv
        dependent_coordinate_name=LAT1pt3_ty
      coupled_coordinates_function: SimmSpline f241: x=(0 3.14159) y=(0 0.0508)
    CoordinateCouplerConstraint LAT1pt3_tz_con: independent_coordinate_names=shoulder_elv
        dependent_coordinate_name=LAT1pt3_tz
      coupled_coordinates_function: SimmSpline f242: x=(0 3.14159) y=(0 -0.042)
    CoordinateCouplerConstraint LAT2pt2_tx_con: independent_coordinate_names=shoulder_elv
        dependent_coordinate_name=LAT2pt2_tx
      coupled_coordinates_function: SimmSpline f250: x=(0 3.14159) y=(0 -0.0141)
    CoordinateCouplerConstraint LAT2pt2_ty_con: independent_coordinate_names=shoulder_elv
        dependent_coordinate_name=LAT2pt2_ty
      coupled_coordinates_function: SimmSpline f251: x=(0 3.14159) y=(0 0.0305)
    CoordinateCouplerConstraint LAT2pt2_tz_con: independent_coordinate_names=shoulder_elv
        dependent_coordinate_name=LAT2pt2_tz
      coupled_coordinates_function: SimmSpline f252: x=(0 3.14159) y=(0 -0.0129)
    CoordinateCouplerConstraint LAT2pt3_tx_con: independent_coordinate_names=shoulder_elv
        dependent_coordinate_name=LAT2pt3_tx
      coupled_coordinates_function: SimmSpline f260: x=(0 3.14159) y=(0 -0.0294)
    CoordinateCouplerConstraint LAT2pt3_ty_con: independent_coordinate_names=shoulder_elv
        dependent_coordinate_name=LAT2pt3_ty
      coupled_coordinates_function: SimmSpline f261: x=(0 3.14159) y=(0 0.0644)
    CoordinateCouplerConstraint LAT2pt3_tz_con: independent_coordinate_names=shoulder_elv
        dependent_coordinate_name=LAT2pt3_tz
      coupled_coordinates_function: SimmSpline f262: x=(0 3.14159) y=(0 -0.0721)
    CoordinateCouplerConstraint LAT3pt2_tx_con: independent_coordinate_names=shoulder_elv
        dependent_coordinate_name=LAT3pt2_tx
      coupled_coordinates_function: SimmSpline f270: x=(0 3.14159) y=(0 -0.0552)
    CoordinateCouplerConstraint LAT3pt2_ty_con: independent_coordinate_names=shoulder_elv
        dependent_coordinate_name=LAT3pt2_ty
      coupled_coordinates_function: SimmSpline f271: x=(0 3.14159) y=(0 0.0341)
    CoordinateCouplerConstraint LAT3pt2_tz_con: independent_coordinate_names=shoulder_elv
        dependent_coordinate_name=LAT3pt2_tz
      coupled_coordinates_function: SimmSpline f272: x=(0 3.14159) y=(0 -0.0173)
    CoordinateCouplerConstraint LAT3pt3_tx_con: independent_coordinate_names=shoulder_elv
        dependent_coordinate_name=LAT3pt3_tx
      coupled_coordinates_function: SimmSpline f280: x=(0 3.14159) y=(0 -0.0366)
    CoordinateCouplerConstraint LAT3pt3_ty_con: independent_coordinate_names=shoulder_elv
        dependent_coordinate_name=LAT3pt3_ty
      coupled_coordinates_function: SimmSpline f281: x=(0 3.14159) y=(0 0.0744)
    CoordinateCouplerConstraint LAT3pt3_tz_con: independent_coordinate_names=shoulder_elv
        dependent_coordinate_name=LAT3pt3_tz
      coupled_coordinates_function: SimmSpline f282: x=(0 3.14159) y=(0 -0.0901)
    CoordinateCouplerConstraint sternoclavicular_r2_con_l: independent_coordinate_names=shoulder_elv_l
        dependent_coordinate_name=sternoclavicular_r2_l
      coupled_coordinates_function: SimmSpline f0_l: x=(0 2.61799) y=(0 -0.633555)
    CoordinateCouplerConstraint sternoclavicular_r3_con_l: independent_coordinate_names=shoulder_elv_l
        dependent_coordinate_name=sternoclavicular_r3_l
      coupled_coordinates_function: SimmSpline f1_l: x=(0 3.14159) y=(0 0.322013)
    CoordinateCouplerConstraint unrotscap_r2_con_l: independent_coordinate_names=shoulder_elv_l
        dependent_coordinate_name=unrotscap_r2_l
      coupled_coordinates_function: SimmSpline f2_l: x=(0 2.61799) y=(0 0.633555)
    CoordinateCouplerConstraint unrotscap_r3_con_l: independent_coordinate_names=shoulder_elv_l
        dependent_coordinate_name=unrotscap_r3_l
      coupled_coordinates_function: SimmSpline f3_l: x=(0 3.14159) y=(0 -0.322013)
    CoordinateCouplerConstraint acromioclavicular_r1_con_l: independent_coordinate_names=shoulder_elv_l
        dependent_coordinate_name=acromioclavicular_r1_l
      coupled_coordinates_function: SimmSpline f4_l: x=(0 2.61799) y=(0 0.466003)
    CoordinateCouplerConstraint acromioclavicular_r2_con_l: independent_coordinate_names=shoulder_elv_l
        dependent_coordinate_name=acromioclavicular_r2_l
      coupled_coordinates_function: SimmSpline f5_l: x=(0 2.61799) y=(0 -0.128282)
    CoordinateCouplerConstraint acromioclavicular_r3_con_l: independent_coordinate_names=shoulder_elv_l
        dependent_coordinate_name=acromioclavicular_r3_l
      coupled_coordinates_function: SimmSpline f6_l: x=(0 2.61799) y=(0 1.03673)
    CoordinateCouplerConstraint unrothum_r1_con_l: independent_coordinate_names=shoulder_elv_l
        dependent_coordinate_name=unrothum_r1_l
      coupled_coordinates_function: SimmSpline f7_l: x=(0 2.61799) y=(0 -0.466003)
    CoordinateCouplerConstraint unrothum_r2_con_l: independent_coordinate_names=shoulder_elv_l
        dependent_coordinate_name=unrothum_r2_l
      coupled_coordinates_function: SimmSpline f8_l: x=(0 2.61799) y=(0 0.128282)
    CoordinateCouplerConstraint unrothum_r3_con_l: independent_coordinate_names=shoulder_elv_l
        dependent_coordinate_name=unrothum_r3_l
      coupled_coordinates_function: SimmSpline f9_l: x=(0 2.61799) y=(0 -1.03673)
    CoordinateCouplerConstraint shoulder1_r2_con_l: independent_coordinate_names=elv_angle_l
        dependent_coordinate_name=shoulder1_r2_l
      coupled_coordinates_function: SimmSpline f11_l: x=(-1.5708 3.14159) y=(1.5708 -3.14159)
    CoordinateCouplerConstraint proximal_distal_r1_con_l: independent_coordinate_names=deviation_l
        dependent_coordinate_name=proximal_distal_r1_l
      coupled_coordinates_function: SimmSpline f18_l: x=(-0.174533 0 0.436332) y=(-0.261799 0 0.436332)
    CoordinateCouplerConstraint proximal_distal_r3_con_l: independent_coordinate_names=flexion_l
        dependent_coordinate_name=proximal_distal_r3_l
      coupled_coordinates_function: SimmSpline f19_l: x=(-1.22173 1.22173) y=(-0.610865 0.610865)
    CoordinateCouplerConstraint bicpt_tx_con_l: independent_coordinate_names=elbow_flexion_l
        dependent_coordinate_name=bicpt_tx_l
      coupled_coordinates_function: SimmSpline f70_l: x=(0 2.26893) y=(-0.0001 0.0042)
    CoordinateCouplerConstraint bicpt_ty_con_l: independent_coordinate_names=elbow_flexion_l
        dependent_coordinate_name=bicpt_ty_l
      coupled_coordinates_function: SimmSpline f71_l: x=(0 2.26893) y=(-0.0276 -0.0425)
    CoordinateCouplerConstraint bicpt_tz_con_l: independent_coordinate_names=elbow_flexion_l
        dependent_coordinate_name=bicpt_tz_l
      coupled_coordinates_function: SimmSpline f72_l: x=(0 2.26893) y=(-0.0043 -0.0067)
    CoordinateCouplerConstraint bicpt2_tx_con_l: independent_coordinate_names=pro_sup_l
        dependent_coordinate_name=bicpt2_tx_l
      coupled_coordinates_function: SimmSpline f80_l: x=(-1.5708 -0.610865 1.57823) y=(-0.003 0.01 0.01376)
    CoordinateCouplerConstraint bicpt2_ty_con_l: independent_coordinate_names=elbow_flexion_l
        dependent_coordinate_name=bicpt2_ty_l
      coupled_coordinates_function: SimmSpline f81_l: x=(0 2.27483) y=(-0.0102 -0.045607)
    CoordinateCouplerConstraint bicpt2_tz_con_l: independent_coordinate_names=pro_sup_l
        dependent_coordinate_name=bicpt2_tz_l
      coupled_coordinates_function: SimmSpline f82_l: x=(-1.5708 -0.610865 1.57561) y=(-0.0095 -0.011533 -0.000331)
    CoordinateCouplerConstraint ptpt_tx_con_l: independent_coordinate_names=pro_sup_l
        dependent_coordinate_name=ptpt_tx_l
      coupled_coordinates_function: SimmSpline f90_l: x=(-1.5708 1.5708) y=(0.0142 0.0009)
    CoordinateCouplerConstraint ptpt_ty_con_l: independent_coordinate_names=pro_sup_l
        dependent_coordinate_name=ptpt_ty_l
      coupled_coordinates_function: SimmSpline f91_l: x=(-1.5708 1.5708) y=(-0.0606 -0.0692)
    CoordinateCouplerConstraint ptpt_tz_con_l: independent_coordinate_names=pro_sup_l
        dependent_coordinate_name=ptpt_tz_l
      coupled_coordinates_function: SimmSpline f92_l: x=(-1.5708 1.5708) y=(0.0072 -0.0073)
    CoordinateCouplerConstraint FCUpt_tx_con_l: independent_coordinate_names=pro_sup_l
        dependent_coordinate_name=FCUpt_tx_l
      coupled_coordinates_function: SimmSpline f100_l: x=(-1.5708 0 1.5708) y=(-0.0027 0.004 0.0132)
    CoordinateCouplerConstraint FCUpt_ty_con_l: independent_coordinate_names=pro_sup_l
        dependent_coordinate_name=FCUpt_ty_l
      coupled_coordinates_function: SimmSpline f101_l: x=(-1.5708 0 1.5708) y=(-0.1838 -0.1841 -0.1821)
    CoordinateCouplerConstraint FCUpt_tz_con_l: independent_coordinate_names=pro_sup_l
        dependent_coordinate_name=FCUpt_tz_l
      coupled_coordinates_function: SimmSpline f102_l: x=(-1.5708 0 1.5708) y=(0.0069 0.0005 0.0002)
    CoordinateCouplerConstraint EDCpt_tx_con_l: independent_coordinate_names=pro_sup_l
        dependent_coordinate_name=EDCpt_tx_l
      coupled_coordinates_function: SimmSpline f110_l: x=(-1.5708 0 1.5708) y=(0.0108 0 -0.0108)
    CoordinateCouplerConstraint EDCpt_ty_con_l: independent_coordinate_names=pro_sup_l
        dependent_coordinate_name=EDCpt_ty_l
      coupled_coordinates_function: SimmSpline f111_l: x=(-1.5708 0 1.5708) y=(-0.0013 0 0.0038)
    CoordinateCouplerConstraint EDCpt_tz_con_l: independent_coordinate_names=pro_sup_l
        dependent_coordinate_name=EDCpt_tz_l
      coupled_coordinates_function: SimmSpline f112_l: x=(-1.5708 0 1.5708) y=(-0.0035 0 -0.00089)
    CoordinateCouplerConstraint APLpt_tx_con_l: independent_coordinate_names=flexion_l
        dependent_coordinate_name=APLpt_tx_l
      coupled_coordinates_function: SimmSpline f120_l: x=(-1.22173 0 1.22173) y=(0 0 -0.0025)
    CoordinateCouplerConstraint APLpt_ty_con_l: independent_coordinate_names=flexion_l
        dependent_coordinate_name=APLpt_ty_l
      coupled_coordinates_function: SimmSpline f121_l: x=(-1.22173 0 1.22173) y=(0 0 -0.001)
    CoordinateCouplerConstraint APLpt_tz_con_l: independent_coordinate_names=flexion_l
        dependent_coordinate_name=APLpt_tz_l
      coupled_coordinates_function: SimmSpline f122_l: x=(-1.22173 0 1.22173) y=(0 0 -0.005)
    CoordinateCouplerConstraint FPLpt_tx_con_l: independent_coordinate_names=flexion_l
        dependent_coordinate_name=FPLpt_tx_l
      coupled_coordinates_function: SimmSpline f130_l: x=(-1.22173 0 1.22173) y=(0 0 -0.0032)
    CoordinateCouplerConstraint FPLpt_ty_con_l: independent_coordinate_names=flexion_l
        dependent_coordinate_name=FPLpt_ty_l
      coupled_coordinates_function: SimmSpline f131_l: x=(-1.22173 0 1.22173) y=(0 0 -0.0096)
    CoordinateCouplerConstraint FPLpt_tz_con_l: independent_coordinate_names=flexion_l
        dependent_coordinate_name=FPLpt_tz_l
      coupled_coordinates_function: SimmSpline f132_l: x=(-1.22173 0 1.22173) y=(0 0 -0.0054)
    CoordinateCouplerConstraint FPLpt2_tx_con_l: independent_coordinate_names=cmc_flexion_l
        dependent_coordinate_name=FPLpt2_tx_l
      coupled_coordinates_function: SimmSpline f140_l: x=(-0.261799 0 0.0872665 0.183675 0.376492 0.785303)
          y=(-0.0032 0 4e-5 3.2e-5 8e-6 0)
    CoordinateCouplerConstraint FPLpt2_ty_con_l: independent_coordinate_names=cmc_flexion_l
        dependent_coordinate_name=FPLpt2_ty_l
      coupled_coordinates_function: SimmSpline f141_l: x=(-0.261799 0 0.785398) y=(0.0005 0 0)
    CoordinateCouplerConstraint FPLpt2_tz_con_l: independent_coordinate_names=cmc_flexion_l
        dependent_coordinate_name=FPLpt2_tz_l
      coupled_coordinates_function: SimmSpline f142_l: x=(-0.261799 0 0.785398) y=(0.0006 0 0)
    CoordinateCouplerConstraint PEC1pt2_tx_con_l: independent_coordinate_names=shoulder_elv_l
        dependent_coordinate_name=PEC1pt2_tx_l
      coupled_coordinates_function: SimmSpline f150_l: x=(0 3.14159) y=(0 0.0059)
    CoordinateCouplerConstraint PEC1pt2_ty_con_l: independent_coordinate_names=shoulder_elv_l
        dependent_coordinate_name=PEC1pt2_ty_l
      coupled_coordinates_function: SimmSpline f151_l: x=(0 3.14159) y=(0 0.0207)
    CoordinateCouplerConstraint PEC1pt2_tz_con_l: independent_coordinate_names=shoulder_elv_l
        dependent_coordinate_name=PEC1pt2_tz_l
      coupled_coordinates_function: SimmSpline f152_l: x=(0 3.14159) y=(0 0.0144)
    CoordinateCouplerConstraint PEC1pt3_tx_con_l: independent_coordinate_names=shoulder_elv_l
        dependent_coordinate_name=PEC1pt3_tx_l
      coupled_coordinates_function: SimmSpline f160_l: x=(0 3.14159) y=(0 -0.0193)
    CoordinateCouplerConstraint PEC1pt3_ty_con_l: independent_coordinate_names=shoulder_elv_l
        dependent_coordinate_name=PEC1pt3_ty_l
      coupled_coordinates_function: SimmSpline f161_l: x=(0 3.14159) y=(0 0.0466)
    CoordinateCouplerConstraint PEC1pt3_tz_con_l: independent_coordinate_names=shoulder_elv_l
        dependent_coordinate_name=PEC1pt3_tz_l
      coupled_coordinates_function: SimmSpline f162_l: x=(0 3.14159) y=(0 -0.0442)
    CoordinateCouplerConstraint PEC2pt2_tx_con_l: independent_coordinate_names=shoulder_elv_l
        dependent_coordinate_name=PEC2pt2_tx_l
      coupled_coordinates_function: SimmSpline f170_l: x=(0 3.14159) y=(0 0.0059)
    CoordinateCouplerConstraint PEC2pt2_ty_con_l: independent_coordinate_names=shoulder_elv_l
        dependent_coordinate_name=PEC2pt2_ty_l
      coupled_coordinates_function: SimmSpline f171_l: x=(0 3.14159) y=(0 0.0207)
    CoordinateCouplerConstraint PEC2pt2_tz_con_l: independent_coordinate_names=shoulder_elv_l
        dependent_coordinate_name=PEC2pt2_tz_l
      coupled_coordinates_function: SimmSpline f172_l: x=(0 3.14159) y=(0 0.0144)
    CoordinateCouplerConstraint PEC2pt3_tx_con_l: independent_coordinate_names=shoulder_elv_l
        dependent_coordinate_name=PEC2pt3_tx_l
      coupled_coordinates_function: SimmSpline f180_l: x=(0 3.14159) y=(0 0.0013)
    CoordinateCouplerConstraint PEC2pt3_ty_con_l: independent_coordinate_names=shoulder_elv_l
        dependent_coordinate_name=PEC2pt3_ty_l
      coupled_coordinates_function: SimmSpline f181_l: x=(0 3.14159) y=(0 0.0432)
    CoordinateCouplerConstraint PEC2pt3_tz_con_l: independent_coordinate_names=shoulder_elv_l
        dependent_coordinate_name=PEC2pt3_tz_l
      coupled_coordinates_function: SimmSpline f182_l: x=(0 3.14159) y=(0 -0.0227)
    CoordinateCouplerConstraint PEC3pt2_tx_con_l: independent_coordinate_names=shoulder_elv_l
        dependent_coordinate_name=PEC3pt2_tx_l
      coupled_coordinates_function: SimmSpline f190_l: x=(0 0.747517 3.14159) y=(0 0.002482 0.0059)
    CoordinateCouplerConstraint PEC3pt2_ty_con_l: independent_coordinate_names=shoulder_elv_l
        dependent_coordinate_name=PEC3pt2_ty_l
      coupled_coordinates_function: SimmSpline f191_l: x=(0 3.13149) y=(0 0.011474)
    CoordinateCouplerConstraint PEC3pt2_tz_con_l: independent_coordinate_names=shoulder_elv_l
        dependent_coordinate_name=PEC3pt2_tz_l
      coupled_coordinates_function: SimmSpline f192_l: x=(0 0.623056 2.29124 3.12533) y=(0 0.009968 0.018193 0.017746)
    CoordinateCouplerConstraint PEC3pt3_tx_con_l: independent_coordinate_names=shoulder_elv_l
        dependent_coordinate_name=PEC3pt3_tx_l
      coupled_coordinates_function: SimmSpline f200_l: x=(0 3.14159) y=(0 0)
    CoordinateCouplerConstraint PEC3pt3_ty_con_l: independent_coordinate_names=shoulder_elv_l
        dependent_coordinate_name=PEC3pt3_ty_l
      coupled_coordinates_function: SimmSpline f201_l: x=(0.0101016 1.59605 3.14159) y=(0.000222 0.011219 0.0441)
    CoordinateCouplerConstraint PEC3pt3_tz_con_l: independent_coordinate_names=shoulder_elv_l
        dependent_coordinate_name=PEC3pt3_tz_l
      coupled_coordinates_function: SimmSpline f202_l: x=(0 3.14159) y=(0 0)
    CoordinateCouplerConstraint DELT2pt2a_tx_con_l: independent_coordinate_names=shoulder_elv_l
        dependent_coordinate_name=DELT2pt2a_tx_l
      coupled_coordinates_function: SimmSpline f210_l: x=(0 3.14159) y=(0 -0.0169)
    CoordinateCouplerConstraint DELT2pt2a_ty_con_l: independent_coordinate_names=shoulder_elv_l
        dependent_coordinate_name=DELT2pt2a_ty_l
      coupled_coordinates_function: SimmSpline f211_l: x=(0 3.14159) y=(0 -0.0781)
    CoordinateCouplerConstraint DELT2pt2a_tz_con_l: independent_coordinate_names=shoulder_elv_l
        dependent_coordinate_name=DELT2pt2a_tz_l
      coupled_coordinates_function: SimmSpline f212_l: x=(0 1.22229 3.14159) y=(0 -0.005395 -0.0363)
    CoordinateCouplerConstraint DELT2pt2_tx_con_l: independent_coordinate_names=shoulder_rot_l
        dependent_coordinate_name=DELT2pt2_tx_l
      coupled_coordinates_function: SimmSpline f220_l: x=(-1.5708 -0.0101503 0.349046) y=(0.0214 4.9e-5 -0.020005)
    CoordinateCouplerConstraint DELT2pt2_ty_con_l: independent_coordinate_names=shoulder_rot_l
        dependent_coordinate_name=DELT2pt2_ty_l
      coupled_coordinates_function: SimmSpline f221_l: x=(-1.5708 -1.18189 -0.169482 0 0.349066)
          y=(-0.0029 -0.002148 -0.000139 0 -0.001644)
    CoordinateCouplerConstraint DELT2pt2_tz_con_l: independent_coordinate_names=shoulder_rot_l
        dependent_coordinate_name=DELT2pt2_tz_l
      coupled_coordinates_function: SimmSpline f222_l: x=(-1.5708 -0.496661 0 0.342893)
          y=(-0.0455 -0.006762 0 -0.00573)
    CoordinateCouplerConstraint LAT1pt2_tx_con_l: independent_coordinate_names=shoulder_elv_l
        dependent_coordinate_name=LAT1pt2_tx_l
      coupled_coordinates_function: SimmSpline f230_l: x=(0 3.14159) y=(0 -0.0021)
    CoordinateCouplerConstraint LAT1pt2_ty_con_l: independent_coordinate_names=shoulder_elv_l
        dependent_coordinate_name=LAT1pt2_ty_l
      coupled_coordinates_function: SimmSpline f231_l: x=(0 3.14159) y=(0 0.0352)
    CoordinateCouplerConstraint LAT1pt2_tz_con_l: independent_coordinate_names=shoulder_elv_l
        dependent_coordinate_name=LAT1pt2_tz_l
      coupled_coordinates_function: SimmSpline f232_l: x=(0 3.14159) y=(0 -0.0144)
    CoordinateCouplerConstraint LAT1pt3_tx_con_l: independent_coordinate_names=shoulder_elv_l
        dependent_coordinate_name=LAT1pt3_tx_l
      coupled_coordinates_function: SimmSpline f240_l: x=(0 3.14159) y=(0 0.0058)
    CoordinateCouplerConstraint LAT1pt3_ty_con_l: independent_coordinate_names=shoulder_elv_l
        dependent_coordinate_name=LAT1pt3_ty_l
      coupled_coordinates_function: SimmSpline f241_l: x=(0 3.14159) y=(0 0.0508)
    CoordinateCouplerConstraint LAT1pt3_tz_con_l: independent_coordinate_names=shoulder_elv_l
        dependent_coordinate_name=LAT1pt3_tz_l
      coupled_coordinates_function: SimmSpline f242_l: x=(0 3.14159) y=(0 -0.042)
    CoordinateCouplerConstraint LAT2pt2_tx_con_l: independent_coordinate_names=shoulder_elv_l
        dependent_coordinate_name=LAT2pt2_tx_l
      coupled_coordinates_function: SimmSpline f250_l: x=(0 3.14159) y=(0 -0.0141)
    CoordinateCouplerConstraint LAT2pt2_ty_con_l: independent_coordinate_names=shoulder_elv_l
        dependent_coordinate_name=LAT2pt2_ty_l
      coupled_coordinates_function: SimmSpline f251_l: x=(0 3.14159) y=(0 0.0305)
    CoordinateCouplerConstraint LAT2pt2_tz_con_l: independent_coordinate_names=shoulder_elv_l
        dependent_coordinate_name=LAT2pt2_tz_l
      coupled_coordinates_function: SimmSpline f252_l: x=(0 3.14159) y=(0 -0.0129)
    CoordinateCouplerConstraint LAT2pt3_tx_con_l: independent_coordinate_names=shoulder_elv_l
        dependent_coordinate_name=LAT2pt3_tx_l
      coupled_coordinates_function: SimmSpline f260_l: x=(0 3.14159) y=(0 -0.0294)
    CoordinateCouplerConstraint LAT2pt3_ty_con_l: independent_coordinate_names=shoulder_elv_l
        dependent_coordinate_name=LAT2pt3_ty_l
      coupled_coordinates_function: SimmSpline f261_l: x=(0 3.14159) y=(0 0.0644)
    CoordinateCouplerConstraint LAT2pt3_tz_con_l: independent_coordinate_names=shoulder_elv_l
        dependent_coordinate_name=LAT2pt3_tz_l
      coupled_coordinates_function: SimmSpline f262_l: x=(0 3.14159) y=(0 -0.0721)
    CoordinateCouplerConstraint LAT3pt2_tx_con_l: independent_coordinate_names=shoulder_elv_l
        dependent_coordinate_name=LAT3pt2_tx_l
      coupled_coordinates_function: SimmSpline f270_l: x=(0 3.14159) y=(0 -0.0552)
    CoordinateCouplerConstraint LAT3pt2_ty_con_l: independent_coordinate_names=shoulder_elv_l
        dependent_coordinate_name=LAT3pt2_ty_l
      coupled_coordinates_function: SimmSpline f271_l: x=(0 3.14159) y=(0 0.0341)
    CoordinateCouplerConstraint LAT3pt2_tz_con_l: independent_coordinate_names=shoulder_elv_l
        dependent_coordinate_name=LAT3pt2_tz_l
      coupled_coordinates_function: SimmSpline f272_l: x=(0 3.14159) y=(0 -0.0173)
    CoordinateCouplerConstraint LAT3pt3_tx_con_l: independent_coordinate_names=shoulder_elv_l
        dependent_coordinate_name=LAT3pt3_tx_l
      coupled_coordinates_function: SimmSpline f280_l: x=(0 3.14159) y=(0 -0.0366)
    CoordinateCouplerConstraint LAT3pt3_ty_con_l: independent_coordinate_names=shoulder_elv_l
        dependent_coordinate_name=LAT3pt3_ty_l
      coupled_coordinates_function: SimmSpline f281_l: x=(0 3.14159) y=(0 0.0744)
    CoordinateCouplerConstraint LAT3pt3_tz_con_l: independent_coordinate_names=shoulder_elv_l
        dependent_coordinate_name=LAT3pt3_tz_l
      coupled_coordinates_function: SimmSpline f282_l: x=(0 3.14159) y=(0 -0.0901)
  ForceSet:
    Thelen2003Muscle glut_med1_r: max_isometric_force=1119 optimal_fiber_length=0.0535 tendon_slack_length=0.078
        pennation_angle_at_optimal=0.1396263 [radians]
      PathPoint P1: pelvis (-0.0408 0.0304 0.1209)
      PathPoint P2: femur_r (-0.0218 -0.0117 0.0555)
    Thelen2003Muscle glut_med2_r: max_isometric_force=873 optimal_fiber_length=0.0845 tendon_slack_length=0.053
        pennation_angle_at_optimal=0
      PathPoint P1: pelvis (-0.0855 0.0445 0.0766)
      PathPoint P2: femur_r (-0.0258 -0.0058 0.0527)
    Thelen2003Muscle glut_med3_r: max_isometric_force=1000 optimal_fiber_length=0.0646 tendon_slack_length=0.053
        pennation_angle_at_optimal=0.3316126
      PathPoint P1: pelvis (-0.1223 0.0105 0.0648)
      PathPoint P2: femur_r (-0.0309 -0.0047 0.0518)
    Thelen2003Muscle bifemlh_r: max_isometric_force=2700 optimal_fiber_length=0.109 tendon_slack_length=0.326
        pennation_angle_at_optimal=0
      PathPoint P1: pelvis (-0.12596 -0.10257 0.06944)
      PathPoint P2: tibia_r (-0.0301 -0.036 0.02943)
      PathPoint P3: tibia_r (-0.0234 -0.0563 0.0343)
    Thelen2003Muscle bifemsh_r: max_isometric_force=804 optimal_fiber_length=0.173 tendon_slack_length=0.089
        pennation_angle_at_optimal=0.4014257
      PathPoint P1: femur_r (0.005 -0.2111 0.0234)
      PathPoint P2: tibia_r (-0.0301 -0.036 0.02943)
      PathPoint P3: tibia_r (-0.0234 -0.0563 0.0343)
    Thelen2003Muscle sar_r: max_isometric_force=156 optimal_fiber_length=0.52 tendon_slack_length=0.1
        pennation_angle_at_optimal=0
      PathPoint P1: pelvis (-0.0153 -0.0013 0.1242)
      PathPoint P2: femur_r (-0.003 -0.3568 -0.0421)
      PathPoint P3: tibia_r (-0.0056 -0.0419 -0.0399)
      PathPoint P4: tibia_r (0.006 -0.0589 -0.0383)
      PathPoint P5: tibia_r (0.0243 -0.084 -0.0252)
    Thelen2003Muscle add_mag2_r: max_isometric_force=2343 optimal_fiber_length=0.121 tendon_slack_length=0.12
        pennation_angle_at_optimal=0.05235988
      PathPoint P1: pelvis (-0.0831 -0.1192 0.0308)
      PathPoint P2: femur_r (0.0054 -0.2285 0.0227)
    Thelen2003Muscle tfl_r: max_isometric_force=233 optimal_fiber_length=0.095 tendon_slack_length=0.425
        pennation_angle_at_optimal=0.05235988
      PathPoint P1: pelvis (-0.0311 0.0214 0.1241)
      PathPoint P2: femur_r (0.0294 -0.0995 0.0597)
      PathPoint P3: femur_r (0.0054 -0.4049 0.0357)
      PathPoint P4: tibia_r (0.006 -0.0487 0.0297)
    Thelen2003Muscle pect_r: max_isometric_force=266 optimal_fiber_length=0.1 tendon_slack_length=0.033
        pennation_angle_at_optimal=0
      PathPoint P1: pelvis (-0.0431 -0.0768 0.0451)
      PathPoint P2: femur_r (-0.0122 -0.0822 0.0253)
    Thelen2003Muscle grac_r: max_isometric_force=162 optimal_fiber_length=0.352 tendon_slack_length=0.126
        pennation_angle_at_optimal=0.05235988
      PathPoint P1: pelvis (-0.07401 -0.1187 0.02794)
      ConditionalPathPoint P2: tibia_r (-0.02657 -0.0319 -0.03774) socket_coordinate=/jointset/knee_r/knee_angle_r
          range=(-0.436332 0.174533) [radians]
      PathPoint P3: tibia_r (-0.01943 -0.05153 -0.0358)
      PathPoint P4: tibia_r (0.006 -0.0836 -0.0228)
    Thelen2003Muscle glut_max1_r: max_isometric_force=573 optimal_fiber_length=0.142 tendon_slack_length=0.125
        pennation_angle_at_optimal=0.08726646
      PathPoint P1: pelvis (-0.1195 0.0612 0.07)
      PathPoint P2: pelvis (-0.1291 0.0012 0.0886)
      PathPoint P3: femur_r (-0.0457 -0.0248 0.0392)
      PathPoint P4: femur_r (-0.0277 -0.0566 0.047)
    Thelen2003Muscle glut_max2_r: max_isometric_force=819 optimal_fiber_length=0.147 tendon_slack_length=0.127
        pennation_angle_at_optimal=0
      PathPoint P1: pelvis (-0.1349 0.0176 0.0563)
      PathPoint P2: pelvis (-0.1376 -0.052 0.0914)
      PathPoint P3: femur_r (-0.0426 -0.053 0.0293)
      PathPoint P4: femur_r (-0.0156 -0.1016 0.0419)
    Thelen2003Muscle glut_max3_r: max_isometric_force=552 optimal_fiber_length=0.144 tendon_slack_length=0.145
        pennation_angle_at_optimal=0.08726646
      PathPoint P1: pelvis (-0.1556 -0.0314 0.0058)
      PathPoint P2: pelvis (-0.1529 -0.1052 0.0403)
      PathPoint P3: femur_r (-0.0299 -0.1041 0.0135)
      PathPoint P4: femur_r (-0.006 -0.1419 0.0411)
    Thelen2003Muscle iliacus_r: max_isometric_force=1073 optimal_fiber_length=0.1 tendon_slack_length=0.1
        pennation_angle_at_optimal=0.122173
      PathPoint P1: pelvis (-0.0674 0.0365 0.0854)
      PathPoint P2: pelvis (-0.0258 -0.055 0.0811)
      ConditionalPathPoint P3: pelvis (-0.0288 -0.0805 0.0816) socket_coordinate=/jointset/hip_r/hip_flexion_r
          range=(-1.5708 0.785398)
      PathPoint P4: femur_r (0.0017 -0.0543 0.0057)
      PathPoint P5: femur_r (-0.0193 -0.0621 0.0129)
    Thelen2003Muscle psoas_r: max_isometric_force=1113 optimal_fiber_length=0.1 tendon_slack_length=0.16
        pennation_angle_at_optimal=0.1396263
      PathPoint P1: pelvis (-0.0647 0.0887 0.0289)
      PathPoint P2: pelvis (-0.0238 -0.057 0.0759)
      ConditionalPathPoint P3: pelvis (-0.0288 -0.0805 0.0816) socket_coordinate=/jointset/hip_r/hip_flexion_r
          range=(-1.5708 0.785398)
      PathPoint P4: femur_r (0.0016 -0.0507 0.0038)
      PathPoint P5: femur_r (-0.0188 -0.0597 0.0104)
    Thelen2003Muscle quad_fem_r: max_isometric_force=381 optimal_fiber_length=0.054 tendon_slack_length=0.024
        pennation_angle_at_optimal=0
      PathPoint P1: pelvis (-0.1143 -0.1151 0.052)
      PathPoint P2: femur_r (-0.0381 -0.0359 0.0366)
    Thelen2003Muscle gem_r: max_isometric_force=164 optimal_fiber_length=0.024 tendon_slack_length=0.039
        pennation_angle_at_optimal=0
      PathPoint P1: pelvis (-0.1133 -0.082 0.0714)
      PathPoint P2: femur_r (-0.0142 -0.0033 0.0443)
    Thelen2003Muscle peri_r: max_isometric_force=444 optimal_fiber_length=0.026 tendon_slack_length=0.115
        pennation_angle_at_optimal=0.1745329
      PathPoint P1: pelvis (-0.1396 0.0003 0.0235)
      PathPoint P2: pelvis (-0.1193 -0.0276 0.0657)
      PathPoint P3: femur_r (-0.0148 -0.0036 0.0437)
    Thelen2003Muscle rect_fem_r: max_isometric_force=1169 optimal_fiber_length=0.114 tendon_slack_length=0.31
        pennation_angle_at_optimal=0.08726646
      PathPoint P1: pelvis (-0.0295 -0.0311 0.0968)
      ConditionalPathPoint P2: femur_r (0.0334 -0.403 0.0019) socket_coordinate=/jointset/knee_r/knee_angle_r
          range=(-2.61799 -1.45997)
      MovingPathPoint P3: tibia_r socket_x_coordinate=/jointset/knee_r/knee_angle_r
          socket_y_coordinate=/jointset/knee_r/knee_angle_r socket_z_coordinate=/jointset/knee_r/knee_angle_r
        x_location: SimmSpline: x=(-2.0944 -1.99997 -1.5708 -1.45752 -1.39626 -1.0472 -0.698132 -0.526391 -0.349066 -0.174533 0 0.000174533 0.000349066 0.0279253 0.0872665 0.174533 2.0944)
            y=(0.0155805 0.0179938 0.0275081 0.0296564 0.0307615 0.0365695 0.0422074 0.0450902 0.048391 0.0534299 0.0617575 0.0617669 0.0617762 0.0633083 0.066994 0.0733035 0.0573481)
        y_location: SimmSpline: x=(-2.0944 -1.99997 -1.5708 -1.45752 -1.39626 -1.0472 -0.698132 -0.526391 -0.349066 -0.174533 0 0.000174533 0.000349066 0.0279253 0.0872665 0.174533 2.0944)
            y=(0.0234116 0.0237613 0.0251141 0.0252795 0.0253146 0.0249184 0.0242373 0.0238447 0.0234197 0.0227644 0.020984 0.0209814 0.0209788 0.0205225 0.0191754 0.0159554 -0.0673774)
        z_location: SimmSpline: x=(-2.0944 0.1745) y=(0.0014 0.0014)
    Thelen2003Muscle vas_int_r: max_isometric_force=5000 optimal_fiber_length=0.107 tendon_slack_length=0.116
        pennation_angle_at_optimal=0.05235988
      PathPoint P1: femur_r (0.029 -0.1924 0.031)
      PathPoint P2: femur_r (0.0335 -0.2084 0.0285)
      ConditionalPathPoint P3: femur_r (0.0343 -0.403 0.0055) socket_coordinate=/jointset/knee_r/knee_angle_r
          range=(-2.61799 -1.42)
      MovingPathPoint P4: tibia_r socket_x_coordinate=/jointset/knee_r/knee_angle_r
          socket_y_coordinate=/jointset/knee_r/knee_angle_r socket_z_coordinate=/jointset/knee_r/knee_angle_r
        x_location: SimmSpline: x=(-2.0944 -1.99997 -1.5708 -1.45752 -1.39626 -1.0472 -0.698132 -0.526391 -0.349066 -0.174533 0 0.000174533 0.000349066 0.0279253 0.0872665 0.174533 2.0944)
            y=(0.0082733 0.0106866 0.0202042 0.022353 0.0234583 0.0292715 0.0349465 0.037871 0.0412569 0.0465287 0.0554632 0.0554735 0.0554837 0.0571717 0.061272 0.0684369 0.0648818)
        y_location: SimmSpline: x=(-2.0944 -1.99997 -1.5708 -1.45752 -1.39626 -1.0472 -0.698132 -0.526391 -0.349066 -0.174533 0 0.000174533 0.000349066 0.0279253 0.0872665 0.174533 2.0944)
            y=(0.025599 0.0259487 0.0273124 0.0274796 0.0275151 0.0271363 0.0265737 0.0263073 0.0261187 0.0260129 0.0252923 0.0252911 0.0252898 0.0250526 0.0242191 0.0218288 -0.0685706)
        z_location: SimmSpline: x=(-2.0944 2.0944) y=(0.0018 0.0018)
    Thelen2003Muscle med_gas_r: max_isometric_force=2500 optimal_fiber_length=0.09 tendon_slack_length=0.36
        pennation_angle_at_optimal=0.296706
      PathPoint P1: femur_r (-0.019 -0.3929 -0.0235)
      ConditionalPathPoint P2: femur_r (-0.03 -0.4022 -0.0258) socket_coordinate=/jointset/knee_r/knee_angle_r
          range=(-0.785398 0.174533)
      PathPoint P3: calcn_r (0 0.031 -0.0053)
    Thelen2003Muscle soleus_r: max_isometric_force=4000 optimal_fiber_length=0.08 tendon_slack_length=0.22
        pennation_angle_at_optimal=0.4363323
      PathPoint P1: tibia_r (-0.0024 -0.1533 0.0071)
      PathPoint P2: calcn_r (0 0.031 -0.0053)
    Thelen2003Muscle tib_post_r: max_isometric_force=3600 optimal_fiber_length=0.031 tendon_slack_length=0.31
        pennation_angle_at_optimal=0.2094395
      PathPoint P1: tibia_r (-0.0094 -0.1348 0.0019)
      PathPoint P2: tibia_r (-0.0144 -0.4051 -0.0229)
      PathPoint P3: calcn_r (0.0417 0.0334 -0.0286)
      PathPoint P4: calcn_r (0.0772 0.0159 -0.0281)
    Thelen2003Muscle tib_ant_r: max_isometric_force=3000 optimal_fiber_length=0.098 tendon_slack_length=0.223
        pennation_angle_at_optimal=0.08726646
      PathPoint P1: tibia_r (0.0179 -0.1624 0.0115)
      PathPoint P2: tibia_r (0.0329 -0.3951 -0.0177)
      PathPoint P3: calcn_r (0.1166 0.0178 -0.0305)
    Thelen2003Muscle glut_med1_l: max_isometric_force=1119 optimal_fiber_length=0.0535 tendon_slack_length=0.078
        pennation_angle_at_optimal=0.1396263
      PathPoint P1: pelvis (-0.0408 0.0304 -0.1209)
      PathPoint P2: femur_l (-0.0218 -0.0117 -0.0555)
    Thelen2003Muscle glut_med2_l: max_isometric_force=873 optimal_fiber_length=0.0845 tendon_slack_length=0.053
        pennation_angle_at_optimal=0
      PathPoint P1: pelvis (-0.0855 0.0445 -0.0766)
      PathPoint P2: femur_l (-0.0258 -0.0058 -0.0527)
    Thelen2003Muscle glut_med3_l: max_isometric_force=1000 optimal_fiber_length=0.0646 tendon_slack_length=0.053
        pennation_angle_at_optimal=0.3316126
      PathPoint P1: pelvis (-0.1223 0.0105 -0.0648)
      PathPoint P2: femur_l (-0.0309 -0.0047 -0.0518)
    Thelen2003Muscle bifemlh_l: max_isometric_force=2700 optimal_fiber_length=0.109 tendon_slack_length=0.326
        pennation_angle_at_optimal=0
      PathPoint P1: pelvis (-0.12596 -0.10257 -0.06944)
      PathPoint P2: tibia_l (-0.0301 -0.036 -0.02943)
      PathPoint P3: tibia_l (-0.0234 -0.0563 -0.0343)
    Thelen2003Muscle bifemsh_l: max_isometric_force=804 optimal_fiber_length=0.173 tendon_slack_length=0.089
        pennation_angle_at_optimal=0.4014257
      PathPoint P1: femur_l (0.005 -0.2111 -0.0234)
      PathPoint P2: tibia_l (-0.0301 -0.036 -0.02943)
      PathPoint P3: tibia_l (-0.0234 -0.0563 -0.0343)
    Thelen2003Muscle sar_l: max_isometric_force=156 optimal_fiber_length=0.52 tendon_slack_length=0.1
        pennation_angle_at_optimal=0
      PathPoint P1: pelvis (-0.0153 -0.0013 -0.1242)
      PathPoint P2: femur_l (-0.003 -0.3568 0.0421)
      PathPoint P3: tibia_l (-0.0056 -0.0419 0.0399)
      PathPoint P4: tibia_l (0.006 -0.0589 0.0383)
      PathPoint P5: tibia_l (0.0243 -0.084 0.0252)
    Thelen2003Muscle add_mag2_l: max_isometric_force=2343 optimal_fiber_length=0.121 tendon_slack_length=0.12
        pennation_angle_at_optimal=0.05235988
      PathPoint P1: pelvis (-0.0831 -0.1192 -0.0308)
      PathPoint P2: femur_l (0.0054 -0.2285 -0.0227)
    Thelen2003Muscle tfl_l: max_isometric_force=233 optimal_fiber_length=0.095 tendon_slack_length=0.425
        pennation_angle_at_optimal=0.05235988
      PathPoint P1: pelvis (-0.0311 0.0214 -0.1241)
      PathPoint P2: femur_l (0.0294 -0.0995 -0.0597)
      PathPoint P3: femur_l (0.0054 -0.4049 -0.0357)
      PathPoint P4: tibia_l (0.006 -0.0487 -0.0297)
    Thelen2003Muscle pect_l: max_isometric_force=266 optimal_fiber_length=0.1 tendon_slack_length=0.033
        pennation_angle_at_optimal=0
      PathPoint P1: pelvis (-0.0431 -0.0768 -0.0451)
      PathPoint P2: femur_l (-0.0122 -0.0822 -0.0253)
    Thelen2003Muscle grac_l: max_isometric_force=162 optimal_fiber_length=0.352 tendon_slack_length=0.126
        pennation_angle_at_optimal=0.05235988
      PathPoint P1: pelvis (-0.07401 -0.1187 -0.02794)
      ConditionalPathPoint P2: tibia_l (-0.02657 -0.0319 0.03774) socket_coordinate=/jointset/knee_l/knee_angle_l
          range=(-0.436332 0.174533)
      PathPoint P3: tibia_l (-0.01943 -0.05153 0.0358)
      PathPoint P4: tibia_l (0.006 -0.0836 0.0228)
    Thelen2003Muscle glut_max1_l: max_isometric_force=573 optimal_fiber_length=0.142 tendon_slack_length=0.125
        pennation_angle_at_optimal=0.08726646
      PathPoint P1: pelvis (-0.1195 0.0612 -0.07)
      PathPoint P2: pelvis (-0.1291 0.0012 -0.0886)
      PathPoint P3: femur_l (-0.0457 -0.0248 -0.0392)
      PathPoint P4: femur_l (-0.0277 -0.0566 -0.047)
    Thelen2003Muscle glut_max2_l: max_isometric_force=819 optimal_fiber_length=0.147 tendon_slack_length=0.127
        pennation_angle_at_optimal=0
      PathPoint P1: pelvis (-0.1349 0.0176 -0.0563)
      PathPoint P2: pelvis (-0.1376 -0.052 -0.0914)
      PathPoint P3: femur_l (-0.0426 -0.053 -0.0293)
      PathPoint P4: femur_l (-0.0156 -0.1016 -0.0419)
    Thelen2003Muscle glut_max3_l: max_isometric_force=552 optimal_fiber_length=0.144 tendon_slack_length=0.145
        pennation_angle_at_optimal=0.08726646
      PathPoint P1: pelvis (-0.1556 -0.0314 -0.0058)
      PathPoint P2: pelvis (-0.1529 -0.1052 -0.0403)
      PathPoint P3: femur_l (-0.0299 -0.1041 -0.0135)
      PathPoint P4: femur_l (-0.006 -0.1419 -0.0411)
    Thelen2003Muscle iliacus_l: max_isometric_force=1073 optimal_fiber_length=0.1 tendon_slack_length=0.1
        pennation_angle_at_optimal=0.122173
      PathPoint P1: pelvis (-0.0674 0.0365 -0.0854)
      PathPoint P2: pelvis (-0.0258 -0.055 -0.0811)
      ConditionalPathPoint P3: pelvis (-0.0288 -0.0805 -0.0816) socket_coordinate=/jointset/hip_l/hip_flexion_l
          range=(-1.5708 0.785398)
      PathPoint P4: femur_l (0.0017 -0.0543 -0.0057)
      PathPoint P5: femur_l (-0.0193 -0.0621 -0.0129)
    Thelen2003Muscle psoas_l: max_isometric_force=1113 optimal_fiber_length=0.1 tendon_slack_length=0.16
        pennation_angle_at_optimal=0.1396263
      PathPoint P1: pelvis (-0.0647 0.0887 -0.0289)
      PathPoint P2: pelvis (-0.0238 -0.057 -0.0759)
      ConditionalPathPoint P3: pelvis (-0.0288 -0.0805 -0.0816) socket_coordinate=/jointset/hip_l/hip_flexion_l
          range=(-1.5708 0.785398)
      PathPoint P4: femur_l (0.0016 -0.0507 -0.0038)
      PathPoint P5: femur_l (-0.0188 -0.0597 -0.0104)
    Thelen2003Muscle quad_fem_l: max_isometric_force=381 optimal_fiber_length=0.054 tendon_slack_length=0.024
        pennation_angle_at_optimal=0
      PathPoint P1: pelvis (-0.1143 -0.1151 -0.052)
      PathPoint P2: femur_l (-0.0381 -0.0359 -0.0366)
    Thelen2003Muscle gem_l: max_isometric_force=164 optimal_fiber_length=0.024 tendon_slack_length=0.039
        pennation_angle_at_optimal=0
      PathPoint P1: pelvis (-0.1133 -0.082 -0.0714)
      PathPoint P2: femur_l (-0.0142 -0.0033 -0.0443)
    Thelen2003Muscle peri_l: max_isometric_force=444 optimal_fiber_length=0.026 tendon_slack_length=0.115
        pennation_angle_at_optimal=0.1745329
      PathPoint P1: pelvis (-0.1396 0.0003 -0.0235)
      PathPoint P2: pelvis (-0.1193 -0.0276 -0.0657)
      PathPoint P3: femur_l (-0.0148 -0.0036 -0.0437)
    Thelen2003Muscle rect_fem_l: max_isometric_force=1169 optimal_fiber_length=0.114 tendon_slack_length=0.31
        pennation_angle_at_optimal=0.08726646
      PathPoint P1: pelvis (-0.0295 -0.0311 -0.0968)
      ConditionalPathPoint P2: femur_l (0.0334 -0.403 -0.0019) socket_coordinate=/jointset/knee_l/knee_angle_l
          range=(-2.61799 -1.45997)
      MovingPathPoint P3: tibia_l socket_x_coordinate=/jointset/knee_l/knee_angle_l
          socket_y_coordinate=/jointset/knee_l/knee_angle_l socket_z_coordinate=/jointset/knee_l/knee_angle_l
        x_location: SimmSpline: x=(-2.0944 -1.99997 -1.5708 -1.45752 -1.39626 -1.0472 -0.698132 -0.526391 -0.349066 -0.174533 0 0.000174533 0.000349066 0.0279253 0.0872665 0.174533 2.0944)
            y=(0.0155805 0.0179938 0.0275081 0.0296564 0.0307615 0.0365695 0.0422074 0.0450902 0.048391 0.0534299 0.0617575 0.0617669 0.0617762 0.0633083 0.066994 0.0733035 0.0573481)
        y_location: SimmSpline: x=(-2.0944 -1.99997 -1.5708 -1.45752 -1.39626 -1.0472 -0.698132 -0.526391 -0.349066 -0.174533 0 0.000174533 0.000349066 0.0279253 0.0872665 0.174533 2.0944)
            y=(0.0234116 0.0237613 0.0251141 0.0252795 0.0253146 0.0249184 0.0242373 0.0238447 0.0234197 0.0227644 0.020984 0.0209814 0.0209788 0.0205225 0.0191754 0.0159554 -0.0673774)
        z_location: SimmSpline: x=(-2.0944 0.1745) y=(-0.0014 -0.0014)
    Thelen2003Muscle vas_int_l: max_isometric_force=5000 optimal_fiber_length=0.107 tendon_slack_length=0.116
        pennation_angle_at_optimal=0.05235988
      PathPoint P1: femur_l (0.029 -0.1924 -0.031)
      PathPoint P2: femur_l (0.0335 -0.2084 -0.0285)
      ConditionalPathPoint P3: femur_l (0.0343 -0.403 -0.0055) socket_coordinate=/jointset/knee_l/knee_angle_l
          range=(-2.61799 -1.42)
      MovingPathPoint P4: tibia_l socket_x_coordinate=/jointset/knee_l/knee_angle_l
          socket_y_coordinate=/jointset/knee_l/knee_angle_l socket_z_coordinate=/jointset/knee_l/knee_angle_l
        x_location: SimmSpline: x=(-2.0944 -1.99997 -1.5708 -1.45752 -1.39626 -1.0472 -0.698132 -0.526391 -0.349066 -0.174533 0 0.000174533 0.000349066 0.0279253 0.0872665 0.174533 2.0944)
            y=(0.0082733 0.0106866 0.0202042 0.022353 0.0234583 0.0292715 0.0349465 0.037871 0.0412569 0.0465287 0.0554632 0.0554735 0.0554837 0.0571717 0.061272 0.0684369 0.0648818)
        y_location: SimmSpline: x=(-2.0944 -1.99997 -1.5708 -1.45752 -1.39626 -1.0472 -0.698132 -0.526391 -0.349066 -0.174533 0 0.000174533 0.000349066 0.0279253 0.0872665 0.174533 2.0944)
            y=(0.025599 0.0259487 0.0273124 0.0274796 0.0275151 0.0271363 0.0265737 0.0263073 0.0261187 0.0260129 0.0252923 0.0252911 0.0252898 0.0250526 0.0242191 0.0218288 -0.0685706)
        z_location: SimmSpline: x=(-2.0944 2.0944) y=(-0.0018 -0.0018)
    Thelen2003Muscle med_gas_l: max_isometric_force=2500 optimal_fiber_length=0.09 tendon_slack_length=0.36
        pennation_angle_at_optimal=0.296706
      PathPoint P1: femur_l (-0.019 -0.3929 0.0235)
      ConditionalPathPoint P2: femur_l (-0.03 -0.4022 0.0258) socket_coordinate=/jointset/knee_l/knee_angle_l
          range=(-0.785398 0.174533)
      PathPoint P3: calcn_l (0 0.031 0.0053)
    Thelen2003Muscle soleus_l: max_isometric_force=4000 optimal_fiber_length=0.08 tendon_slack_length=0.22
        pennation_angle_at_optimal=0.4363323
      PathPoint P1: tibia_l (-0.0024 -0.1533 -0.0071)
      PathPoint P2: calcn_l (0 0.031 0.0053)
    Thelen2003Muscle tib_post_l: max_isometric_force=3600 optimal_fiber_length=0.031 tendon_slack_length=0.31
        pennation_angle_at_optimal=0.2094395
      PathPoint P1: tibia_l (-0.0094 -0.1348 -0.0019)
      PathPoint P2: tibia_l (-0.0144 -0.4051 0.0229)
      PathPoint P3: calcn_l (0.0417 0.0334 0.0286)
      PathPoint P4: calcn_l (0.0772 0.0159 0.0281)
    Thelen2003Muscle tib_ant_l: max_isometric_force=3000 optimal_fiber_length=0.098 tendon_slack_length=0.223
        pennation_angle_at_optimal=0.08726646
      PathPoint P1: tibia_l (0.0179 -0.1624 -0.0115)
      PathPoint P2: tibia_l (0.0329 -0.3951 0.0177)
      PathPoint P3: calcn_l (0.1166 0.0178 0.0305)
    Thelen2003Muscle ercspn_r: max_isometric_force=2500 optimal_fiber_length=0.12 tendon_slack_length=0.03
        pennation_angle_at_optimal=0
      PathPoint P1: pelvis (-0.14 0.0439 0.0436)
      PathPoint P2: thorax (-0.0755 -0.2685 0.0241)
    Thelen2003Muscle ercspn_l: max_isometric_force=2500 optimal_fiber_length=0.12 tendon_slack_length=0.03
        pennation_angle_at_optimal=0
      PathPoint P1: pelvis (-0.14 0.0439 -0.0436)
      PathPoint P2: thorax (-0.0755 -0.2685 -0.0241)
    Thelen2003Muscle intobl_r: max_isometric_force=900 optimal_fiber_length=0.1 tendon_slack_length=0.1
        pennation_angle_at_optimal=0
      PathPoint P1: pelvis (-0.04 0.07 0.1157)
      PathPoint P2: thorax (0.0495 -0.2185 0.015)
    Thelen2003Muscle intobl_l: max_isometric_force=900 optimal_fiber_length=0.1 tendon_slack_length=0.1
        pennation_angle_at_optimal=0
      PathPoint P1: pelvis (-0.04 0.07 -0.1157)
      PathPoint P2: thorax (0.0495 -0.2185 -0.015)
    Thelen2003Muscle extobl_r: max_isometric_force=900 optimal_fiber_length=0.12 tendon_slack_length=0.14
        pennation_angle_at_optimal=0
      PathPoint P1: pelvis (-0.03 -0.0636 0.01)
      PathPoint P2: thorax (0.0445 -0.2685 0.11)
    Thelen2003Muscle extobl_l: max_isometric_force=900 optimal_fiber_length=0.12 tendon_slack_length=0.14
        pennation_angle_at_optimal=0
      PathPoint P1: pelvis (-0.03 -0.0636 -0.01)
      PathPoint P2: thorax (0.0445 -0.2685 -0.11)
    Schutte1993Muscle_Deprecated DELT1: max_isometric_force=1142.6 optimal_fiber_length=0.0976
        tendon_slack_length=0.093 pennation_angle_at_optimal=0.3839724 [radians]
      PathPoint P1: humerus (0.00896 -0.11883 0.00585)
      PathPoint P2: humerus (0.01623 -0.11033 0.00412)
      PathPoint P3: scapula (0.04347 -0.03252 0.00099)
      PathPoint P4: clavicle (-0.014 0.01106 0.08021)
      PathWrap: wrap_object=delt2hum method=hybrid
      PathWrap pathwrap_0: wrap_object=DELT1hh method=hybrid range=(2 3)
    Schutte1993Muscle_Deprecated DELT2: max_isometric_force=1142.6 optimal_fiber_length=0.1078
        tendon_slack_length=0.1095 pennation_angle_at_optimal=0.2617994
      PathPoint P1: humerus (0.00461 -0.13611 0.0056)
      PathPoint P2: DELT2pt2 (0.0272 0.00535 0.04807)
      PathPoint P3: scapula (5e-5 0.00294 0.02233)
      PathPoint P4: scapula (-0.01078 -0.00034 0.0062)
      PathWrap: wrap_object=Deltoid2 method=hybrid
      PathWrap pathwrap_0: wrap_object=delt2hum method=hybrid
      PathWrap pathwrap_1: wrap_object=TMAJ_LAT_PEC_CORBhh method=hybrid
    Schutte1993Muscle_Deprecated DELT3: max_isometric_force=259.88 optimal_fiber_length=0.1367
        tendon_slack_length=0.038 pennation_angle_at_optimal=0.3141593
      PathPoint P1: scapula (-0.05573 0.00122 -0.02512)
      PathPoint P2: scapula (-0.07247 -0.03285 0.01233)
      PathPoint P3: humerus (0.00206 -0.07602 0.01045)
      PathWrap: wrap_object=Delt3 method=hybrid
      PathWrap pathwrap_0: wrap_object=delt3hum method=hybrid
      PathWrap pathwrap_1: wrap_object=TMAJ_LAT_PEC_CORBhh method=hybrid
    Schutte1993Muscle_Deprecated SUPSP: max_isometric_force=487.82 optimal_fiber_length=0.0682
        tendon_slack_length=0.0395 pennation_angle_at_optimal=0.122173
      PathPoint P1: humerus (0.00256 0.01063 0.02593)
      PathPoint P2: scapula (-0.01918 0.00127 -0.01271)
      PathPoint P3: scapula (-0.044 -0.01512 -0.05855)
      PathWrap: wrap_object=SUPSP method=hybrid
    Schutte1993Muscle_Deprecated INFSP: max_isometric_force=1210.84 optimal_fiber_length=0.0755
        tendon_slack_length=0.0308 pennation_angle_at_optimal=0.3228859
      PathPoint P1: humerus (-0.00887 0.00484 0.02448)
      PathPoint P2: scapula (-0.07382 -0.05476 -0.04781)
      PathWrap: wrap_object=INFSP method=hybrid
      PathWrap pathwrap_0: wrap_object=INFSP_and_TMIN_hum_head method=hybrid
    Schutte1993Muscle_Deprecated SUBSC: max_isometric_force=1377.81 optimal_fiber_length=0.0873
        tendon_slack_length=0.033 pennation_angle_at_optimal=0.3490659
      PathPoint P1: humerus (0.01403 0.0084 -0.01331)
      PathPoint P2: scapula (-0.01831 -0.05223 -0.02457)
      PathPoint P3: scapula (-0.07246 -0.03943 -0.06475)
      PathWrap: wrap_object=SUBSCAP method=hybrid
    Schutte1993Muscle_Deprecated TMIN: max_isometric_force=354.25 optimal_fiber_length=0.0741
        tendon_slack_length=0.0713 pennation_angle_at_optimal=0.418879
      PathPoint P1: humerus (-0.0011 -0.01264 0.02156)
      PathPoint P2: scapula (-0.09473 -0.07991 -0.04737)
      PathPoint P3: scapula (-0.09643 -0.08121 -0.05298)
      PathWrap: wrap_object=TMIN method=hybrid range=(1 2)
      PathWrap pathwrap_0: wrap_object=INFSP_and_TMIN_hum_head method=hybrid range=(1 2)
      PathWrap pathwrap_1: wrap_object=TMINhum method=hybrid range=(1 2)
    Schutte1993Muscle_Deprecated TMAJ: max_isometric_force=425.39 optimal_fiber_length=0.1624 tendon_slack_length=0.02
        pennation_angle_at_optimal=0.2792527
      PathPoint P1: humerus (0.00998 -0.05419 -0.00568)
      PathPoint P2: scapula (-0.10264 -0.10319 -0.05829)
      PathPoint P3: scapula (-0.10489 -0.10895 -0.07117)
      PathWrap: wrap_object=TMAJ_LAThum method=hybrid
      PathWrap pathwrap_0: wrap_object=LAT_TMAJhh method=hybrid range=(1 2)
      PathWrap pathwrap_1: wrap_object=LAT_TMAJ2hh method=hybrid
    Schutte1993Muscle_Deprecated PECM1: max_isometric_force=364.41 optimal_fiber_length=0.1442
        tendon_slack_length=0.0028 pennation_angle_at_optimal=0.296706
      PathPoint P1: humerus (0.01169 -0.04191 0.0078)
      PathPoint P2: PEC1pt2 (0.01615 -0.04045 -0.00577)
      PathPoint P3: PEC1pt3 (0.00958 -0.01509 0.12664)
      PathPoint P4: clavicle (0.00321 -0.00013 0.05113)
      PathWrap: wrap_object=Thorax method=hybrid
      PathWrap pathwrap_0: wrap_object=PEC12hum method=hybrid range=(2 3)
      PathWrap pathwrap_1: wrap_object=PEC1hh method=hybrid
    Schutte1993Muscle_Deprecated PECM2: max_isometric_force=515.41 optimal_fiber_length=0.1385
        tendon_slack_length=0.089 pennation_angle_at_optimal=0.4363323
      PathPoint P1: humerus (0.01274 -0.04289 0.00785)
      PathPoint P2: PEC2pt2 (0.01453 -0.04568 -0.00687)
      PathPoint P3: PEC2pt3 (0.02018 -0.04165 0.1269)
      PathPoint P4: thorax (0.03091 -0.03922 0.09705)
      PathPoint P5: thorax (0.02769 -0.04498 0.02271)
      PathWrap: wrap_object=Thorax method=hybrid
      PathWrap pathwrap_0: wrap_object=PEC12hum method=hybrid range=(2 3)
      PathWrap pathwrap_1: wrap_object=TMAJ_LAT_PEC_CORBhh method=hybrid
      PathWrap pathwrap_2: wrap_object=PEC23hh method=hybrid
    Schutte1993Muscle_Deprecated PECM3: max_isometric_force=390.55 optimal_fiber_length=0.1385
        tendon_slack_length=0.132 pennation_angle_at_optimal=0.4363323
      PathPoint P1: humerus (0.01269 -0.04375 0.0075)
      PathPoint P2: PEC3pt2 (0.01243 -0.05157 -0.01807)
      PathPoint P3: PEC3pt3 (0.02984 -0.071 0.1151)
      PathPoint P4: thorax (0.0525 -0.08417 0.08935)
      PathPoint P5: thorax (0.05724 -0.11654 0.03787)
      PathWrap: wrap_object=Thorax method=hybrid
      PathWrap pathwrap_0: wrap_object=PEC3hum method=hybrid range=(2 3)
      PathWrap pathwrap_1: wrap_object=PEC23hh method=hybrid
    Schutte1993Muscle_Deprecated LAT1: max_isometric_force=389.1 optimal_fiber_length=0.254 tendon_slack_length=0.12
        pennation_angle_at_optimal=0.4363323
      PathPoint P1: humerus (0.0105 -0.03415 -0.00653)
      PathPoint P2: LAT1pt2 (-0.07947 -0.08581 -0.02188)
      PathPoint P3: LAT1pt3 (-0.11215 -0.09779 -0.05322)
      PathPoint P4: thorax (-0.11828 -0.10118 0.03316)
      PathPoint P5: thorax (-0.09578 -0.11724 0.00882)
      PathWrap: wrap_object=TMAJ_LAThum method=hybrid
      PathWrap pathwrap_0: wrap_object=LAT_TMAJhh method=hybrid range=(1 2)
      PathWrap pathwrap_1: wrap_object=LAT_TMAJ2hh method=hybrid
    Schutte1993Muscle_Deprecated LAT2: max_isometric_force=389.1 optimal_fiber_length=0.2324 tendon_slack_length=0.1765
        pennation_angle_at_optimal=0.3316126
      PathPoint P1: humerus (0.00968 -0.04071 -0.00611)
      PathPoint P2: LAT2pt2 (-0.0764 -0.1022 -0.01808)
      PathPoint P3: LAT2pt3 (-0.10054 -0.13969 -0.05258)
      PathPoint P4: thorax (-0.10992 -0.16908 0.02878)
      PathPoint P5: thorax (-0.07186 -0.18818 0.00815)
      PathWrap: wrap_object=TMAJ_LAThum method=hybrid
      PathWrap pathwrap_0: wrap_object=LAT_TMAJhh method=hybrid range=(1 2)
      PathWrap pathwrap_1: wrap_object=LAT_TMAJ2hh method=hybrid
    Schutte1993Muscle_Deprecated LAT3: max_isometric_force=281.66 optimal_fiber_length=0.2789
        tendon_slack_length=0.1403 pennation_angle_at_optimal=0.3665191
      PathPoint P1: humerus (0.01208 -0.03922 -0.00416)
      PathPoint P2: LAT3pt2 (-0.05678 -0.13303 -0.0213)
      PathPoint P3: LAT3pt3 (-0.09449 -0.17553 -0.04606)
      PathPoint P4: thorax (-0.11157 -0.19387 0.05532)
      PathPoint P5: thorax (-0.07117 -0.24858 0.00907)
      PathWrap: wrap_object=TMAJ_LAThum method=hybrid
      PathWrap pathwrap_0: wrap_object=LAT_TMAJhh method=hybrid range=(1 2)
      PathWrap pathwrap_1: wrap_object=LAT_TMAJ2hh method=hybrid
    Schutte1993Muscle_Deprecated CORB: max_isometric_force=242.46 optimal_fiber_length=0.0932 tendon_slack_length=0.097
        pennation_angle_at_optimal=0
      PathPoint P1: scapula (0.0125 -0.04127 -0.02652)
      PathPoint P2: scapula (0.00483 -0.06958 -0.01563)
      PathPoint P3: humerus (0.00743 -0.15048 -0.00782)
      PathWrap: wrap_object=CORBhum method=hybrid
      PathWrap pathwrap_0: wrap_object=TMAJ_LAT_PEC_CORBhh method=hybrid
    Schutte1993Muscle_Deprecated TRIlong: max_isometric_force=798.52 optimal_fiber_length=0.134
        tendon_slack_length=0.143 pennation_angle_at_optimal=0.2094395
      PathPoint P1: scapula (-0.04565 -0.04073 -0.01377)
      PathPoint P2: humerus (-0.02714 -0.11441 -0.00664)
      PathPoint P3: humerus (-0.03184 -0.22637 -0.01217)
      PathPoint P4: humerus (-0.01743 -0.26757 -0.01208)
      PathPoint P5: ulna (-0.0219 0.01046 -0.00078)
      PathWrap: wrap_object=TRI method=hybrid
      PathWrap pathwrap_0: wrap_object=TRIlonghh method=hybrid
      PathWrap pathwrap_1: wrap_object=TRIlongglen method=hybrid
    Schutte1993Muscle_Deprecated TRIlat: max_isometric_force=624.3 optimal_fiber_length=0.1138
        tendon_slack_length=0.098 pennation_angle_at_optimal=0.1570796
      PathPoint P1: humerus (-0.00599 -0.12646 0.00428)
      PathPoint P2: humerus (-0.02344 -0.14528 0.00928)
      PathPoint P3: humerus (-0.03184 -0.22637 -0.01217)
      PathPoint P4: humerus (-0.01743 -0.26757 -0.01208)
      PathPoint P5: ulna (-0.0219 0.01046 -0.00078)
      PathWrap: wrap_object=TRI method=hybrid
    Schutte1993Muscle_Deprecated TRImed: max_isometric_force=624.3 optimal_fiber_length=0.1138
        tendon_slack_length=0.0908 pennation_angle_at_optimal=0.1570796
      PathPoint P1: humerus (-0.00838 -0.13695 -0.00906)
      PathPoint P2: humerus (-0.02601 -0.15139 -0.0108)
      PathPoint P3: humerus (-0.03184 -0.22637 -0.01217)
      PathPoint P4: humerus (-0.01743 -0.26757 -0.01208)
      PathPoint P5: ulna (-0.0219 0.01046 -0.00078)
      PathWrap: wrap_object=TRI method=hybrid
    Schutte1993Muscle_Deprecated ANC: max_isometric_force=350 optimal_fiber_length=0.027 tendon_slack_length=0.018
        pennation_angle_at_optimal=0
      PathPoint P1: humerus (-0.00744 -0.28359 0.00979)
      PathPoint P2: ulna (-0.02532 -0.00124 0.006)
      PathWrap: wrap_object=ANC method=hybrid
    Schutte1993Muscle_Deprecated SUP: max_isometric_force=476 optimal_fiber_length=0.033 tendon_slack_length=0.028
        pennation_angle_at_optimal=0
      PathPoint P1: radius (0.00996 -0.06096 0.00075)
      PathPoint P2: radius (0.01201 -0.0517 -0.00107)
      PathPoint P3: ulna (-0.0136 -0.03384 0.02013)
      PathWrap: wrap_object=SUP method=hybrid
    Schutte1993Muscle_Deprecated BIClong: max_isometric_force=624.3 optimal_fiber_length=0.1157
        tendon_slack_length=0.2723 pennation_angle_at_optimal=0
      PathPoint P1: scapula (-0.03123 -0.02353 -0.01305)
      PathPoint P2: scapula (-0.02094 -0.01309 -0.00461)
      PathPoint P3: humerus (0.02131 0.01793 0.01028)
      PathPoint P4: humerus (0.02378 -0.00511 0.01201)
      PathPoint P5: humerus (0.01345 -0.02827 0.00136)
      PathPoint P6: humerus (0.01068 -0.07736 -0.00165)
      PathPoint P7: humerus (0.01703 -0.12125 0.00024)
      PathPoint P8: humerus (0.0228 -0.1754 -0.0063)
      PathPoint P9: bicpt2 (0 0 0)
      ConditionalPathPoint P10: bicpt (0 0 0) socket_coordinate=/jointset/radioulnar/pro_sup range=(-0.638791 1.5708)
      PathPoint P11: radius (-0.002 -0.0375 -0.002)
      PathWrap: wrap_object=Elbow_BIC_BRD method=hybrid
      PathWrap pathwrap_0: wrap_object=BIClong method=hybrid range=(2 3)
    Schutte1993Muscle_Deprecated BICshort: max_isometric_force=435.56 optimal_fiber_length=0.1321
        tendon_slack_length=0.1923 pennation_angle_at_optimal=0
      PathPoint P1: scapula (0.01268 -0.03931 -0.02625)
      PathPoint P2: scapula (0.00093 -0.06704 -0.01593)
      PathPoint P3: humerus (0.01117 -0.07576 -0.01101)
      PathPoint P4: humerus (0.01703 -0.12125 -0.01079)
      PathPoint P5: humerus (0.0228 -0.1754 -0.0063)
      PathPoint P6: bicpt2 (0 0 0)
      ConditionalPathPoint P7: bicpt (0 0 0) socket_coordinate=/jointset/radioulnar/pro_sup range=(-0.638791 1.5708)
      PathPoint P8: radius (-0.002 -0.0375 -0.002)
      PathWrap: wrap_object=Elbow_BIC_BRD method=hybrid
    Schutte1993Muscle_Deprecated BRA: max_isometric_force=987.26 optimal_fiber_length=0.0858 tendon_slack_length=0.0535
        pennation_angle_at_optimal=0
      PathPoint P1: humerus (0.0068 -0.1739 -0.0036)
      ConditionalPathPoint P2: humerus (0.01894 -0.28559 -0.01105) socket_coordinate=/jointset/elbow/elbow_flexion
          range=(0 0.813149)
      ConditionalPathPoint P3: ulna (0.00498 -0.01463 0.00128) socket_coordinate=/jointset/elbow/elbow_flexion
          range=(0 0.813149)
      PathPoint P4: ulna (-0.0032 -0.0239 0.0009)
    Schutte1993Muscle_Deprecated BRD: max_isometric_force=261.33 optimal_fiber_length=0.1726 tendon_slack_length=0.133
        pennation_angle_at_optimal=0
      PathPoint P1: humerus (-0.0098 -0.19963 0.00223)
      PathPoint P2: radius (0.03577 -0.12742 0.02315)
      PathPoint P3: radius (0.0419 -0.221 0.0224)
      PathWrap: wrap_object=Elbow_BIC_BRD method=hybrid
    Schutte1993Muscle_Deprecated ECRL: max_isometric_force=304.89 optimal_fiber_length=0.081 tendon_slack_length=0.224
        pennation_angle_at_optimal=0
      PathPoint P1: humerus (-0.0073 -0.2609 0.0091)
      PathPoint P2: radius (0.03195 -0.13463 0.02779)
      PathPoint P3: radius (0.04243 -0.23684 0.0362)
      PathPoint P4: secondmc (0.00249 0.0164 0.0008)
      PathWrap: wrap_object=Elbow_PT_ECRL method=hybrid
      PathWrap pathwrap_0: wrap_object=ECRL method=hybrid
    Schutte1993Muscle_Deprecated ECRB: max_isometric_force=100.52 optimal_fiber_length=0.0585
        tendon_slack_length=0.2223 pennation_angle_at_optimal=0.1553343
      PathPoint P1: humerus (0.01349 -0.29048 0.01698)
      PathPoint P2: radius (0.02905 -0.13086 0.02385)
      PathPoint P3: radius (0.03549 -0.22805 0.03937)
      PathPoint P4: thirdmc (0.00452 0.02788 0.00112)
      PathWrap: wrap_object=ECRB method=hybrid
    Schutte1993Muscle_Deprecated ECU: max_isometric_force=93.17 optimal_fiber_length=0.0622 tendon_slack_length=0.2285
        pennation_angle_at_optimal=0.06108652
      PathPoint P1: humerus (0.00083 -0.28955 0.0188)
      PathPoint P2: ulna (-0.01391 -0.03201 0.02947)
      PathPoint P3: ulna (-0.01705 -0.05428 0.02868)
      PathPoint P4: ulna (-0.01793 -0.09573 0.03278)
      PathPoint P5: radius (-0.01421 -0.22696 0.03481)
      PathPoint P6: fifthmc (-0.00061 0.02067 0.00294)
      PathWrap: wrap_object=ECU method=hybrid
    Schutte1993Muscle_Deprecated FCR: max_isometric_force=73.96 optimal_fiber_length=0.0628 tendon_slack_length=0.244
        pennation_angle_at_optimal=0.05410521
      PathPoint P1: humerus (0.00758 -0.27806 -0.03705)
      PathPoint P2: radius (0.0211 -0.21943 0.00127)
      PathPoint P3: secondmc (-0.00345 0.01918 -0.00921)
      PathWrap: wrap_object=Elbow_PT_ECRL method=hybrid
      PathWrap pathwrap_0: wrap_object=FCR method=hybrid
    Schutte1993Muscle_Deprecated FCU: max_isometric_force=128.93 optimal_fiber_length=0.0509 tendon_slack_length=0.265
        pennation_angle_at_optimal=0.2111848
      PathPoint P1: humerus (0.00219 -0.2774 -0.0388)
      PathPoint P2: FCUpt (0.00549 0 0)
      PathPoint P3: radius (0.01082 -0.22327 0.00969)
      PathPoint P4: fifthmc (0.00154 0.01703 -0.0033)
      PathWrap: wrap_object=FCU method=hybrid
      PathWrap pathwrap_0: wrap_object=Elbow_PT_ECRL method=hybrid
    Schutte1993Muscle_Deprecated PL: max_isometric_force=26.72 optimal_fiber_length=0.0638 tendon_slack_length=0.2694
        pennation_angle_at_optimal=0.06981317
      PathPoint P1: humerus (0.00457 -0.27519 -0.03865)
      PathPoint P2: radius (0.02531 -0.23915 -0.00276)
      PathPoint P3: capitate (0.00917 -0.01898 -0.01754)
      PathPoint P4: thirdmc (0.00179 0.00828 -0.00245)
      PathWrap: wrap_object=PL method=hybrid
      PathWrap pathwrap_0: wrap_object=Elbow_PT_ECRL method=hybrid
    Schutte1993Muscle_Deprecated PT: max_isometric_force=566.22 optimal_fiber_length=0.0492 tendon_slack_length=0.098
        pennation_angle_at_optimal=0.1745329
      PathPoint P1: humerus (0.0036 -0.2759 -0.0365)
      PathPoint P2: ulna (0.00846 -0.03373 -0.01432)
      PathPoint P3: ptpt (0.00464 -0.00026 -0.00214)
      ConditionalPathPoint P4: radius (0.0236 -0.0934 0.0094) socket_coordinate=/jointset/radioulnar/pro_sup
          range=(-1.5708 0.509636)
      PathPoint P5: radius (0.0254 -0.1088 0.0198)
      PathWrap: wrap_object=Elbow_PT_ECRL method=hybrid
    Schutte1993Muscle_Deprecated PQ: max_isometric_force=75.48 optimal_fiber_length=0.0282 tendon_slack_length=0.005
        pennation_angle_at_optimal=0.1745329
      PathPoint P1: radius (0.03245 -0.19998 0.01962)
      PathPoint P2: ulna (0.00193 -0.20972 0.03632)
      PathWrap: wrap_object=PQ2 method=hybrid
      PathWrap pathwrap_0: wrap_object=PQ1 method=hybrid
    Schutte1993Muscle_Deprecated FDSL: max_isometric_force=16.55 optimal_fiber_length=0.0515 tendon_slack_length=0.3383
        pennation_angle_at_optimal=0.08726646
      PathPoint P1: humerus (0.00421 -0.27598 -0.03864)
      PathPoint P2: radius (0.01377 -0.18718 0.00205)
      PathPoint P3: capitate (-0.00235 -0.01393 -0.01376)
      PathPoint P4: fourthmc (-0.00294 0.00846 -0.01213)
      PathPoint P5: fifthmc (-0.00032 -0.01968 -0.00757)
      PathPoint P6: 5proxph (-0.00323 -0.03568 -0.00417)
      PathPoint P7: 5midph (-0.0026 -0.01983 -0.0035)
      PathWrap: wrap_object=FDS method=hybrid
      PathWrap pathwrap_0: wrap_object=Elbow_PT_ECRL method=hybrid
    Schutte1993Muscle_Deprecated FDSR: max_isometric_force=57.9 optimal_fiber_length=0.0736 tendon_slack_length=0.328
        pennation_angle_at_optimal=0.06981317
      PathPoint P1: humerus (0.00479 -0.2788 -0.03731)
      PathPoint P2: radius (0.01571 -0.18666 0.00267)
      PathPoint P3: capitate (-0.00082 -0.01344 -0.01359)
      PathPoint P4: thirdmc (-0.00914 0.00544 -0.01085)
      PathPoint P5: fourthmc (-0.0029 -0.02334 -0.00767)
      PathPoint P6: 4proxph (-0.00172 -0.03947 -0.00102)
      PathPoint P7: 4midph (-2e-5 -0.02501 0.00029)
      PathWrap: wrap_object=FDS method=hybrid
      PathWrap pathwrap_0: wrap_object=Elbow_PT_ECRL method=hybrid
    Schutte1993Muscle_Deprecated FDSM: max_isometric_force=91.03 optimal_fiber_length=0.0749 tendon_slack_length=0.295
        pennation_angle_at_optimal=0.122173
      PathPoint P1: ulna (-0.00669 -0.02713 -0.00191)
      PathPoint P2: radius (0.01899 -0.18706 0.00424)
      PathPoint P3: capitate (0.0068 -0.01377 -0.01399)
      PathPoint P4: thirdmc (0.00128 0.00639 -0.00952)
      PathPoint P5: thirdmc (0.00263 -0.02478 -0.00183)
      PathPoint P6: 3proxph (0.00252 -0.04307 0.00417)
      PathPoint P7: 3midph (0.00155 -0.02773 0.00067)
      PathWrap: wrap_object=FDS method=hybrid
    Schutte1993Muscle_Deprecated FDSI: max_isometric_force=61.24 optimal_fiber_length=0.0835 tendon_slack_length=0.275
        pennation_angle_at_optimal=0.1047198
      PathPoint P1: ulna (-0.00676 -0.02819 -0.00137)
      PathPoint P2: radius (0.02145 -0.18623 0.00552)
      PathPoint P3: capitate (0.00889 -0.01366 -0.01387)
      PathPoint P4: secondmc (-0.00407 -0.00025 -0.00479)
      PathPoint P5: secondmc (0.00304 -0.02206 -0.00579)
      PathPoint P6: 2proxph (0.00427 -0.03367 0.00444)
      PathPoint P7: 2midph (0.00228 -0.02088 -0.00029)
      PathWrap: wrap_object=FDS method=hybrid
      PathWrap pathwrap_0: wrap_object=2ndmcp method=hybrid
    Schutte1993Muscle_Deprecated FDPL: max_isometric_force=79.65 optimal_fiber_length=0.0749 tendon_slack_length=0.2819
        pennation_angle_at_optimal=0.1396263
      PathPoint P1: ulna (-0.00628 -0.03214 0.00254)
      PathPoint P2: radius (0.01409 -0.18516 0.00861)
      PathPoint P3: capitate (-0.00088 -0.01027 -0.01188)
      PathPoint P4: fourthmc (-0.00686 0.0089 -0.00619)
      PathPoint P5: fifthmc (-0.00185 -0.01878 -0.00706)
      PathPoint P6: 5proxph (-0.0049 -0.03465 -0.00598)
      PathPoint P7: 5distph (-0.00032 -0.00433 -0.00165)
      PathWrap: wrap_object=FDP method=hybrid
    Schutte1993Muscle_Deprecated FDPR: max_isometric_force=64.08 optimal_fiber_length=0.0798 tendon_slack_length=0.282
        pennation_angle_at_optimal=0.122173
      PathPoint P1: ulna (-0.00502 -0.03374 0.00273)
      PathPoint P2: radius (0.0158 -0.18629 0.00803)
      PathPoint P3: capitate (0.00106 -0.01177 -0.01184)
      PathPoint P4: thirdmc (-0.0104 0.00473 -0.00804)
      PathPoint P5: fourthmc (-0.00289 -0.02297 -0.00609)
      PathPoint P6: 4proxph (-0.00304 -0.04002 -0.00075)
      PathPoint P7: 4distph (0.0001 -0.0066 -0.00066)
      PathWrap: wrap_object=FDP method=hybrid
    Schutte1993Muscle_Deprecated FDPM: max_isometric_force=81.65 optimal_fiber_length=0.0835 tendon_slack_length=0.293
        pennation_angle_at_optimal=0.1047198
      PathPoint P1: ulna (-0.00522 -0.03327 0.0021)
      PathPoint P2: radius (0.01906 -0.18644 0.00785)
      PathPoint P3: capitate (0.00335 -0.0128 -0.01144)
      PathPoint P4: thirdmc (-0.00128 0.00609 -0.00838)
      PathPoint P5: thirdmc (0.00034 -0.02347 -0.00303)
      PathPoint P6: 3proxph (0.00102 -0.04333 0.00294)
      PathPoint P7: 3distph (0.00023 -0.00505 -0.00226)
      PathWrap: wrap_object=FDP method=hybrid
    Schutte1993Muscle_Deprecated FDPI: max_isometric_force=68.27 optimal_fiber_length=0.0749 tendon_slack_length=0.2935
        pennation_angle_at_optimal=0.122173
      PathPoint P1: ulna (-0.00647 -0.03176 0.0028)
      PathPoint P2: radius (0.0208 -0.1856 0.00915)
      PathPoint P3: capitate (0.00896 -0.01168 -0.01212)
      PathPoint P4: secondmc (-0.00432 0.00663 -0.00248)
      PathPoint P5: secondmc (0.0042 -0.02262 -0.00499)
      PathPoint P6: 2proxph (0.00581 -0.03555 0.00306)
      PathPoint P7: 2distph (0.00046 -0.0046 -0.00301)
      PathWrap: wrap_object=FDP method=hybrid
      PathWrap pathwrap_0: wrap_object=2ndmcp method=hybrid
    Schutte1993Muscle_Deprecated EDCL: max_isometric_force=13.11 optimal_fiber_length=0.065 tendon_slack_length=0.2965
        pennation_angle_at_optimal=0.03490659
      PathPoint P1: humerus (-0.0004 -0.28831 0.0187)
      PathPoint P2: EDCpt (0.0013 -0.03888 0.01405)
      PathPoint P3: radius (0.00993 -0.22304 0.03618)
      PathPoint P4: fifthmc (-0.00478 -0.01915 0.00447)
      PathPoint P5: 5proxph (-0.00716 -0.03302 -0.00089)
      PathPoint P6: 5distph (-0.00142 0.00068 0.00115)
      PathWrap: wrap_object=EDCL method=hybrid range=(3 4)
    Schutte1993Muscle_Deprecated EDCR: max_isometric_force=34.04 optimal_fiber_length=0.0626 tendon_slack_length=0.327
        pennation_angle_at_optimal=0.05235988
      PathPoint P1: humerus (-0.00156 -0.28936 0.01782)
      PathPoint P2: EDCpt (0.0026 -0.03991 0.01552)
      PathPoint P3: radius (0.00882 -0.22366 0.04284)
      PathPoint P4: fourthmc (-0.00338 -0.0233 0.00513)
      PathPoint P5: 4proxph (-0.00546 -0.03868 0.00413)
      PathPoint P6: 4distph (-0.00171 -0.00375 0.00241)
      PathWrap: wrap_object=EDCR method=hybrid
    Schutte1993Muscle_Deprecated EDCM: max_isometric_force=35.32 optimal_fiber_length=0.0724 tendon_slack_length=0.335
        pennation_angle_at_optimal=0.05235988
      PathPoint P1: humerus (0.00051 -0.28984 0.01949)
      PathPoint P2: EDCpt (0.00316 -0.03948 0.01528)
      PathPoint P3: radius (0.0144 -0.22323 0.04223)
      PathPoint P4: thirdmc (0.00131 -0.02342 0.00764)
      PathPoint P5: 3proxph (0.00179 -0.04239 0.01003)
      PathPoint P6: 3distph (0.00077 -0.01111 0.00201)
      PathWrap: wrap_object=EDCM method=hybrid
    Schutte1993Muscle_Deprecated EDCI: max_isometric_force=18.26 optimal_fiber_length=0.07 tendon_slack_length=0.322
        pennation_angle_at_optimal=0.05235988
      PathPoint P1: humerus (0.00065 -0.28898 0.01869)
      PathPoint P2: EDCpt (0.00228 -0.03918 0.01483)
      PathPoint P3: radius (0.01533 -0.22314 0.04196)
      PathPoint P4: secondmc (0.00474 -0.02656 0.01293)
      PathPoint P5: 2proxph (0.00192 -0.01101 0.01021)
      PathPoint P6: 2proxph (0.00771 -0.04191 0.01399)
      PathPoint P7: 2midph (0.00123 -0.00941 0.00581)
      PathPoint P8: 2midph (0.0026 -0.01959 0.00363)
      PathPoint P9: 2distph (0.00025 -0.0037 0.00228)
      PathWrap: wrap_object=EDCI method=hybrid range=(3 4)
      PathWrap pathwrap_0: wrap_object=Secondpm method=hybrid range=(6 7)
      PathWrap pathwrap_1: wrap_object=Secondmd method=hybrid range=(8 9)
    Schutte1993Muscle_Deprecated EDM: max_isometric_force=25.25 optimal_fiber_length=0.0675 tendon_slack_length=0.322
        pennation_angle_at_optimal=0.05235988
      PathPoint P1: humerus (0.00089 -0.28919 0.01847)
      PathPoint P2: ulna (-0.00977 -0.03907 0.03085)
      PathPoint P3: ulna (-0.00755 -0.08267 0.03646)
      PathPoint P4: radius (0.00454 -0.22641 0.03678)
      PathPoint P5: fifthmc (0.00131 0.02436 0.00794)
      PathPoint P6: fifthmc (-0.00537 -0.01848 0.00316)
      PathPoint P7: 5proxph (-0.0054 -0.03237 0.00015)
      PathPoint P8: 5distph (-0.00226 -0.00334 0.00062)
      PathWrap: wrap_object=EDM method=hybrid range=(4 5)
    Schutte1993Muscle_Deprecated EIP: max_isometric_force=21.7 optimal_fiber_length=0.0589 tendon_slack_length=0.186
        pennation_angle_at_optimal=0.1047198
      PathPoint P1: ulna (-0.00394 -0.16652 0.03682)
      PathPoint P2: ulna (0.00171 -0.17469 0.04049)
      PathPoint P3: radius (0.01076 -0.22783 0.03664)
      PathPoint P4: secondmc (-0.01081 0.01528 0.00681)
      PathPoint P5: secondmc (0.00441 -0.02602 0.01285)
      PathPoint P6: 2proxph (0.00171 -0.01033 0.00947)
      PathPoint P7: 2proxph (0.00714 -0.04133 0.01413)
      PathPoint P8: 2midph (0.00115 -0.00899 0.00597)
      PathPoint P9: 2midph (0.00294 -0.02043 0.00377)
      PathPoint P10: 2distph (0.00264 -0.01233 0.00266)
      PathWrap: wrap_object=Extensor_ellipse method=hybrid
      PathWrap pathwrap_0: wrap_object=Secondpm method=hybrid range=(7 8)
      PathWrap pathwrap_1: wrap_object=Secondmd method=hybrid range=(9 10)
    Schutte1993Muscle_Deprecated EPL: max_isometric_force=39.46 optimal_fiber_length=0.054 tendon_slack_length=0.2205
        pennation_angle_at_optimal=0.1047198
      PathPoint P1: ulna (-0.01412 -0.09706 0.02952)
      PathPoint P2: radius (0.00124 -0.13668 0.0227)
      PathPoint P3: radius (0.02702 -0.21872 0.03828)
      PathPoint P4: radius (0.03382 -0.22754 0.04607)
      PathPoint P5: radius (0.04234 -0.23771 0.04173)
      PathPoint P6: capitate (0.02428 0.00014 0.00608)
      PathPoint P7: trapezium (0.00809 -0.0046 0.00992)
      PathPoint P8: firstmc (0.00656 -0.0043 0.00792)
      PathPoint P9: firstmc (0.02165 -0.0242 -0.00533)
      PathPoint P10: proximal_thumb (0.01147 -0.00362 0.00156)
      PathPoint P11: proximal_thumb (0.01921 -0.0265 -0.01038)
      PathPoint P12: distal_thumb (0.00543 -0.00714 -0.00464)
      PathWrap: wrap_object=MPthumb method=hybrid
    Schutte1993Muscle_Deprecated EPB: max_isometric_force=14.2 optimal_fiber_length=0.0675 tendon_slack_length=0.1155
        pennation_angle_at_optimal=0.1256637
      PathPoint P1: radius (0.01924 -0.14695 0.02114)
      PathPoint P2: radius (0.02276 -0.15857 0.02665)
      PathPoint P3: radius (0.03831 -0.19722 0.03834)
      PathPoint P4: radius (0.05235 -0.23611 0.02699)
      PathPoint P5: capitate (0.03123 0.00256 -0.00327)
      PathPoint P6: firstmc1 (0.01443 -0.00337 -0.00405)
      PathPoint P7: firstmc (0.02173 -0.02303 -0.01141)
      PathPoint P8: proximal_thumb (0.00927 -0.00618 -0.00557)
      PathWrap: wrap_object=MPthumb method=hybrid
    Schutte1993Muscle_Deprecated FPL: max_isometric_force=77.2 optimal_fiber_length=0.0552 tendon_slack_length=0.1938
        pennation_angle_at_optimal=0.122173
      PathPoint P1: radius (0.00971 -0.09458 0.01769)
      PathPoint P2: radius (0.01658 -0.13525 0.01915)
      PathPoint P3: radius (0.01869 -0.17932 0.01988)
      PathPoint P4: radius (0.038 -0.23171 0.0158)
      PathPoint P5: FPLpt (0.01869 0.00882 -0.01547)
      PathPoint P6: FPLpt2 (0.01244 -0.02207 -0.02089)
      PathPoint P7: firstmc (-0.00608 -0.01624 -0.0094)
      PathPoint P8: firstmc (0.00208 -0.02297 -0.00956)
      PathPoint P9: proximal_thumb (-0.0045 -0.01842 -0.00508)
      PathPoint P10: proximal_thumb (0.0059 -0.02602 -0.01114)
      PathPoint P11: distal_thumb (0.00242 -0.01127 -0.00412)
      PathWrap: wrap_object=FPL method=hybrid
      PathWrap pathwrap_0: wrap_object=IPthumb method=hybrid
      PathWrap pathwrap_1: wrap_object=MPthumb method=hybrid
    Schutte1993Muscle_Deprecated APL: max_isometric_force=59.53 optimal_fiber_length=0.0713 tendon_slack_length=0.1295
        pennation_angle_at_optimal=0.1308997
      PathPoint P1: radius (0.01154 -0.09477 0.01681)
      PathPoint P2: radius (0.0303 -0.1397 0.03507)
      PathPoint P3: radius (0.03993 -0.16072 0.034)
      PathPoint P4: radius (0.04397 -0.17845 0.03134)
      PathPoint P5: radius (0.05505 -0.23084 0.02368)
      PathPoint P6: APLpt (0.03385 0.00634 -0.00745)
      PathPoint P7: firstmc1 (0.01058 0.00662 -0.00619)
      PathPoint P8: firstmc (0.00629 0.00323 -0.00589)
      PathPoint P9: firstmc (0.00827 -0.00586 -0.00604)
      PathWrap: wrap_object=APL method=hybrid range=(5 6)
    Schutte1993Muscle_Deprecated DELT1_l: max_isometric_force=1142.6 optimal_fiber_length=0.0976
        tendon_slack_length=0.093 pennation_angle_at_optimal=0.3839724
      PathPoint P1: humerus_l (0.00896 -0.11883 -0.00585)
      PathPoint P2: humerus_l (0.01623 -0.11033 -0.00412)
      PathPoint P3: scapula_l (0.04347 -0.03252 -0.00099)
      PathPoint P4: clavicle_l (-0.014 0.01106 -0.08021)
      PathWrap: wrap_object=delt2hum_l method=hybrid
      PathWrap pathwrap_0: wrap_object=DELT1hh_l method=hybrid range=(2 3)
    Schutte1993Muscle_Deprecated DELT2_l: max_isometric_force=1142.6 optimal_fiber_length=0.1078
        tendon_slack_length=0.1095 pennation_angle_at_optimal=0.2617994
      PathPoint P1: humerus_l (0.00461 -0.13611 -0.0056)
      PathPoint P2: DELT2pt2_l (0.0272 0.00535 -0.04807)
      PathPoint P3: scapula_l (5e-5 0.00294 -0.02233)
      PathPoint P4: scapula_l (-0.01078 -0.00034 -0.0062)
      PathWrap: wrap_object=Deltoid2_l method=hybrid
      PathWrap pathwrap_0: wrap_object=delt2hum_l method=hybrid
      PathWrap pathwrap_1: wrap_object=TMAJ_LAT_PEC_CORBhh_l method=hybrid
    Schutte1993Muscle_Deprecated DELT3_l: max_isometric_force=259.88 optimal_fiber_length=0.1367
        tendon_slack_length=0.038 pennation_angle_at_optimal=0.3141593
      PathPoint P1: scapula_l (-0.05573 0.00122 0.02512)
      PathPoint P2: scapula_l (-0.07247 -0.03285 -0.01233)
      PathPoint P3: humerus_l (0.00206 -0.07602 -0.01045)
      PathWrap: wrap_object=Delt3_l method=hybrid
      PathWrap pathwrap_0: wrap_object=delt3hum_l method=hybrid
      PathWrap pathwrap_1: wrap_object=TMAJ_LAT_PEC_CORBhh_l method=hybrid
    Schutte1993Muscle_Deprecated SUPSP_l: max_isometric_force=487.82 optimal_fiber_length=0.0682
        tendon_slack_length=0.0395 pennation_angle_at_optimal=0.122173
      PathPoint P1: humerus_l (0.00256 0.01063 -0.02593)
      PathPoint P2: scapula_l (-0.01918 0.00127 0.01271)
      PathPoint P3: scapula_l (-0.044 -0.01512 0.05855)
      PathWrap: wrap_object=SUPSP_l method=hybrid
    Schutte1993Muscle_Deprecated INFSP_l: max_isometric_force=1210.84 optimal_fiber_length=0.0755
        tendon_slack_length=0.0308 pennation_angle_at_optimal=0.3228859
      PathPoint P1: humerus_l (-0.00887 0.00484 -0.02448)
      PathPoint P2: scapula_l (-0.07382 -0.05476 0.04781)
      PathWrap: wrap_object=INFSP_l method=hybrid
      PathWrap pathwrap_0: wrap_object=INFSP_and_TMIN_hum_head_l method=hybrid
    Schutte1993Muscle_Deprecated SUBSC_l: max_isometric_force=1377.81 optimal_fiber_length=0.0873
        tendon_slack_length=0.033 pennation_angle_at_optimal=0.3490659
      PathPoint P1: humerus_l (0.01403 0.0084 0.01331)
      PathPoint P2: scapula_l (-0.01831 -0.05223 0.02457)
      PathPoint P3: scapula_l (-0.07246 -0.03943 0.06475)
      PathWrap: wrap_object=SUBSCAP_l method=hybrid
    Schutte1993Muscle_Deprecated TMIN_l: max_isometric_force=354.25 optimal_fiber_length=0.0741
        tendon_slack_length=0.0713 pennation_angle_at_optimal=0.418879
      PathPoint P1: humerus_l (-0.0011 -0.01264 -0.02156)
      PathPoint P2: scapula_l (-0.09473 -0.07991 0.04737)
      PathPoint P3: scapula_l (-0.09643 -0.08121 0.05298)
      PathWrap: wrap_object=TMIN_l method=hybrid range=(1 2)
      PathWrap pathwrap_0: wrap_object=INFSP_and_TMIN_hum_head_l method=hybrid range=(1 2)
      PathWrap pathwrap_1: wrap_object=TMINhum_l method=hybrid range=(1 2)
    Schutte1993Muscle_Deprecated TMAJ_l: max_isometric_force=425.39 optimal_fiber_length=0.1624
        tendon_slack_length=0.02 pennation_angle_at_optimal=0.2792527
      PathPoint P1: humerus_l (0.00998 -0.05419 0.00568)
      PathPoint P2: scapula_l (-0.10264 -0.10319 0.05829)
      PathPoint P3: scapula_l (-0.10489 -0.10895 0.07117)
      PathWrap: wrap_object=TMAJ_LAThum_l method=hybrid
      PathWrap pathwrap_0: wrap_object=LAT_TMAJhh_l method=hybrid range=(1 2)
      PathWrap pathwrap_1: wrap_object=LAT_TMAJ2hh_l method=hybrid
    Schutte1993Muscle_Deprecated PECM1_l: max_isometric_force=364.41 optimal_fiber_length=0.1442
        tendon_slack_length=0.0028 pennation_angle_at_optimal=0.296706
      PathPoint P1: humerus_l (0.01169 -0.04191 -0.0078)
      PathPoint P2: PEC1pt2_l (0.01615 -0.04045 0.00577)
      PathPoint P3: PEC1pt3_l (0.00958 -0.01509 -0.12664)
      PathPoint P4: clavicle_l (0.00321 -0.00013 -0.05113)
      PathWrap: wrap_object=Thorax_l method=hybrid
      PathWrap pathwrap_0: wrap_object=PEC12hum_l method=hybrid range=(2 3)
      PathWrap pathwrap_1: wrap_object=PEC1hh_l method=hybrid
    Schutte1993Muscle_Deprecated PECM2_l: max_isometric_force=515.41 optimal_fiber_length=0.1385
        tendon_slack_length=0.089 pennation_angle_at_optimal=0.4363323
      PathPoint P1: humerus_l (0.01274 -0.04289 -0.00785)
      PathPoint P2: PEC2pt2_l (0.01453 -0.04568 0.00687)
      PathPoint P3: PEC2pt3_l (0.02018 -0.04165 -0.1269)
      PathPoint P4: thorax (0.03091 -0.03922 -0.09705)
      PathPoint P5: thorax (0.02769 -0.04498 -0.02271)
      PathWrap: wrap_object=Thorax method=hybrid
      PathWrap pathwrap_0: wrap_object=PEC12hum_l method=hybrid range=(2 3)
      PathWrap pathwrap_1: wrap_object=TMAJ_LAT_PEC_CORBhh_l method=hybrid
      PathWrap pathwrap_2: wrap_object=PEC23hh_l method=hybrid
    Schutte1993Muscle_Deprecated PECM3_l: max_isometric_force=390.55 optimal_fiber_length=0.1385
        tendon_slack_length=0.132 pennation_angle_at_optimal=0.4363323
      PathPoint P1: humerus_l (0.01269 -0.04375 -0.0075)
      PathPoint P2: PEC3pt2_l (0.01243 -0.05157 0.01807)
      PathPoint P3: PEC3pt3_l (0.02984 -0.071 -0.1151)
      PathPoint P4: thorax (0.0525 -0.08417 -0.08935)
      PathPoint P5: thorax (0.05724 -0.11654 -0.03787)
      PathWrap: wrap_object=Thorax method=hybrid
      PathWrap pathwrap_0: wrap_object=PEC3hum_l method=hybrid range=(2 3)
      PathWrap pathwrap_1: wrap_object=PEC23hh_l method=hybrid
    Schutte1993Muscle_Deprecated LAT1_l: max_isometric_force=389.1 optimal_fiber_length=0.254 tendon_slack_length=0.12
        pennation_angle_at_optimal=0.4363323
      PathPoint P1: humerus_l (0.0105 -0.03415 0.00653)
      PathPoint P2: LAT1pt2_l (-0.07947 -0.08581 0.02188)
      PathPoint P3: LAT1pt3_l (-0.11215 -0.09779 0.05322)
      PathPoint P4: thorax (-0.11828 -0.10118 -0.03316)
      PathPoint P5: thorax (-0.09578 -0.11724 -0.00882)
      PathWrap: wrap_object=TMAJ_LAThum_l method=hybrid
      PathWrap pathwrap_0: wrap_object=LAT_TMAJhh_l method=hybrid range=(1 2)
      PathWrap pathwrap_1: wrap_object=LAT_TMAJ2hh_l method=hybrid
    Schutte1993Muscle_Deprecated LAT2_l: max_isometric_force=389.1 optimal_fiber_length=0.2324
        tendon_slack_length=0.1765 pennation_angle_at_optimal=0.3316126
      PathPoint P1: humerus_l (0.00968 -0.04071 0.00611)
      PathPoint P2: LAT2pt2_l (-0.0764 -0.1022 0.01808)
      PathPoint P3: LAT2pt3_l (-0.10054 -0.13969 0.05258)
      PathPoint P4: thorax (-0.10992 -0.16908 -0.02878)
      PathPoint P5: thorax (-0.07186 -0.18818 -0.00815)
      PathWrap: wrap_object=TMAJ_LAThum_l method=hybrid
      PathWrap pathwrap_0: wrap_object=LAT_TMAJhh_l method=hybrid range=(1 2)
      PathWrap pathwrap_1: wrap_object=LAT_TMAJ2hh_l method=hybrid
    Schutte1993Muscle_Deprecated LAT3_l: max_isometric_force=281.66 optimal_fiber_length=0.2789
        tendon_slack_length=0.1403 pennation_angle_at_optimal=0.3665191
      PathPoint P1: humerus_l (0.01208 -0.03922 0.00416)
      PathPoint P2: LAT3pt2_l (-0.05678 -0.13303 0.0213)
      PathPoint P3: LAT3pt3_l (-0.09449 -0.17553 0.04606)
      PathPoint P4: thorax (-0.11157 -0.19387 -0.05532)
      PathPoint P5: thorax (-0.07117 -0.24858 -0.00907)
      PathWrap: wrap_object=TMAJ_LAThum_l method=hybrid
      PathWrap pathwrap_0: wrap_object=LAT_TMAJhh_l method=hybrid range=(1 2)
      PathWrap pathwrap_1: wrap_object=LAT_TMAJ2hh_l method=hybrid
    Schutte1993Muscle_Deprecated CORB_l: max_isometric_force=242.46 optimal_fiber_length=0.0932
        tendon_slack_length=0.097 pennation_angle_at_optimal=0
      PathPoint P1: scapula_l (0.0125 -0.04127 0.02652)
      PathPoint P2: scapula_l (0.00483 -0.06958 0.01563)
      PathPoint P3: humerus_l (0.00743 -0.15048 0.00782)
      PathWrap: wrap_object=CORBhum_l method=hybrid
      PathWrap pathwrap_0: wrap_object=TMAJ_LAT_PEC_CORBhh_l method=hybrid
    Schutte1993Muscle_Deprecated TRIlong_l: max_isometric_force=798.52 optimal_fiber_length=0.134
        tendon_slack_length=0.143 pennation_angle_at_optimal=0.2094395
      PathPoint P1: scapula_l (-0.04565 -0.04073 0.01377)
      PathPoint P2: humerus_l (-0.02714 -0.11441 0.00664)
      PathPoint P3: humerus_l (-0.03184 -0.22637 0.01217)
      PathPoint P4: humerus_l (-0.01743 -0.26757 0.01208)
      PathPoint P5: ulna_l (-0.0219 0.01046 0.00078)
      PathWrap: wrap_object=TRI_l method=hybrid
      PathWrap pathwrap_0: wrap_object=TRIlonghh_l method=hybrid
      PathWrap pathwrap_1: wrap_object=TRIlongglen_l method=hybrid
    Schutte1993Muscle_Deprecated TRIlat_l: max_isometric_force=624.3 optimal_fiber_length=0.1138
        tendon_slack_length=0.098 pennation_angle_at_optimal=0.1570796
      PathPoint P1: humerus_l (-0.00599 -0.12646 -0.00428)
      PathPoint P2: humerus_l (-0.02344 -0.14528 -0.00928)
      PathPoint P3: humerus_l (-0.03184 -0.22637 0.01217)
      PathPoint P4: humerus_l (-0.01743 -0.26757 0.01208)
      PathPoint P5: ulna_l (-0.0219 0.01046 0.00078)
      PathWrap: wrap_object=TRI_l method=hybrid
    Schutte1993Muscle_Deprecated TRImed_l: max_isometric_force=624.3 optimal_fiber_length=0.1138
        tendon_slack_length=0.0908 pennation_angle_at_optimal=0.1570796
      PathPoint P1: humerus_l (-0.00838 -0.13695 0.00906)
      PathPoint P2: humerus_l (-0.02601 -0.15139 0.0108)
      PathPoint P3: humerus_l (-0.03184 -0.22637 0.01217)
      PathPoint P4: humerus_l (-0.01743 -0.26757 0.01208)
      PathPoint P5: ulna_l (-0.0219 0.01046 0.00078)
      PathWrap: wrap_object=TRI_l method=hybrid
    Schutte1993Muscle_Deprecated ANC_l: max_isometric_force=350 optimal_fiber_length=0.027 tendon_slack_length=0.018
        pennation_angle_at_optimal=0
      PathPoint P1: humerus_l (-0.00744 -0.28359 -0.00979)
      PathPoint P2: ulna_l (-0.02532 -0.00124 -0.006)
      PathWrap: wrap_object=ANC_l method=hybrid
    Schutte1993Muscle_Deprecated SUP_l: max_isometric_force=476 optimal_fiber_length=0.033 tendon_slack_length=0.028
        pennation_angle_at_optimal=0
      PathPoint P1: radius_l (0.00996 -0.06096 -0.00075)
      PathPoint P2: radius_l (0.01201 -0.0517 0.00107)
      PathPoint P3: ulna_l (-0.0136 -0.03384 -0.02013)
      PathWrap: wrap_object=SUP_l method=hybrid
    Schutte1993Muscle_Deprecated BIClong_l: max_isometric_force=624.3 optimal_fiber_length=0.1157
        tendon_slack_length=0.2723 pennation_angle_at_optimal=0
      PathPoint P1: scapula_l (-0.03123 -0.02353 0.01305)
      PathPoint P2: scapula_l (-0.02094 -0.01309 0.00461)
      PathPoint P3: humerus_l (0.02131 0.01793 -0.01028)
      PathPoint P4: humerus_l (0.02378 -0.00511 -0.01201)
      PathPoint P5: humerus_l (0.01345 -0.02827 -0.00136)
      PathPoint P6: humerus_l (0.01068 -0.07736 0.00165)
      PathPoint P7: humerus_l (0.01703 -0.12125 -0.00024)
      PathPoint P8: humerus_l (0.0228 -0.1754 0.0063)
      PathPoint P9: bicpt2_l (0 0 0)
      ConditionalPathPoint P10: bicpt_l (0 0 0) socket_coordinate=/jointset/radioulnar_l/pro_sup_l
          range=(-0.638791 1.5708)
      PathPoint P11: radius_l (-0.002 -0.0375 0.002)
      PathWrap: wrap_object=Elbow_BIC_BRD_l method=hybrid
      PathWrap pathwrap_0: wrap_object=BIClong_l method=hybrid range=(2 3)
    Schutte1993Muscle_Deprecated BICshort_l: max_isometric_force=435.56 optimal_fiber_length=0.1321
        tendon_slack_length=0.1923 pennation_angle_at_optimal=0
      PathPoint P1: scapula_l (0.01268 -0.03931 0.02625)
      PathPoint P2: scapula_l (0.00093 -0.06704 0.01593)
      PathPoint P3: humerus_l (0.01117 -0.07576 0.01101)
      PathPoint P4: humerus_l (0.01703 -0.12125 0.01079)
      PathPoint P5: humerus_l (0.0228 -0.1754 0.0063)
      PathPoint P6: bicpt2_l (0 0 0)
      ConditionalPathPoint P7: bicpt_l (0 0 0) socket_coordinate=/jointset/radioulnar_l/pro_sup_l
          range=(-0.638791 1.5708)
      PathPoint P8: radius_l (-0.002 -0.0375 0.002)
      PathWrap: wrap_object=Elbow_BIC_BRD_l method=hybrid
    Schutte1993Muscle_Deprecated BRA_l: max_isometric_force=987.26 optimal_fiber_length=0.0858
        tendon_slack_length=0.0535 pennation_angle_at_optimal=0
      PathPoint P1: humerus_l (0.0068 -0.1739 0.0036)
      ConditionalPathPoint P2: humerus_l (0.01894 -0.28559 0.01105) socket_coordinate=/jointset/elbow_l/elbow_flexion_l
          range=(0 0.813149)
      ConditionalPathPoint P3: ulna_l (0.00498 -0.01463 -0.00128) socket_coordinate=/jointset/elbow_l/elbow_flexion_l
          range=(0 0.813149)
      PathPoint P4: ulna_l (-0.0032 -0.0239 -0.0009)
    Schutte1993Muscle_Deprecated BRD_l: max_isometric_force=261.33 optimal_fiber_length=0.1726
        tendon_slack_length=0.133 pennation_angle_at_optimal=0
      PathPoint P1: humerus_l (-0.0098 -0.19963 -0.00223)
      PathPoint P2: radius_l (0.03577 -0.12742 -0.02315)
      PathPoint P3: radius_l (0.0419 -0.221 -0.0224)
      PathWrap: wrap_object=Elbow_BIC_BRD_l method=hybrid
    Schutte1993Muscle_Deprecated ECRL_l: max_isometric_force=304.89 optimal_fiber_length=0.081
        tendon_slack_length=0.224 pennation_angle_at_optimal=0
      PathPoint P1: humerus_l (-0.0073 -0.2609 -0.0091)
      PathPoint P2: radius_l (0.03195 -0.13463 -0.02779)
      PathPoint P3: radius_l (0.04243 -0.23684 -0.0362)
      PathPoint P4: secondmc_l (0.00249 0.0164 -0.0008)
      PathWrap: wrap_object=Elbow_PT_ECRL_l method=hybrid
      PathWrap pathwrap_0: wrap_object=ECRL_l method=hybrid
    Schutte1993Muscle_Deprecated ECRB_l: max_isometric_force=100.52 optimal_fiber_length=0.0585
        tendon_slack_length=0.2223 pennation_angle_at_optimal=0.1553343
      PathPoint P1: humerus_l (0.01349 -0.29048 -0.01698)
      PathPoint P2: radius_l (0.02905 -0.13086 -0.02385)
      PathPoint P3: radius_l (0.03549 -0.22805 -0.03937)
      PathPoint P4: thirdmc_l (0.00452 0.02788 -0.00112)
      PathWrap: wrap_object=ECRB_l method=hybrid
    Schutte1993Muscle_Deprecated ECU_l: max_isometric_force=93.17 optimal_fiber_length=0.0622
        tendon_slack_length=0.2285 pennation_angle_at_optimal=0.06108652
      PathPoint P1: humerus_l (0.00083 -0.28955 -0.0188)
      PathPoint P2: ulna_l (-0.01391 -0.03201 -0.02947)
      PathPoint P3: ulna_l (-0.01705 -0.05428 -0.02868)
      PathPoint P4: ulna_l (-0.01793 -0.09573 -0.03278)
      PathPoint P5: radius_l (-0.01421 -0.22696 -0.03481)
      PathPoint P6: fifthmc_l (-0.00061 0.02067 -0.00294)
      PathWrap: wrap_object=ECU_l method=hybrid
    Schutte1993Muscle_Deprecated FCR_l: max_isometric_force=73.96 optimal_fiber_length=0.0628 tendon_slack_length=0.244
        pennation_angle_at_optimal=0.05410521
      PathPoint P1: humerus_l (0.00758 -0.27806 0.03705)
      PathPoint P2: radius_l (0.0211 -0.21943 -0.00127)
      PathPoint P3: secondmc_l (-0.00345 0.01918 0.00921)
      PathWrap: wrap_object=Elbow_PT_ECRL_l method=hybrid
      PathWrap pathwrap_0: wrap_object=FCR_l method=hybrid
    Schutte1993Muscle_Deprecated FCU_l: max_isometric_force=128.93 optimal_fiber_length=0.0509
        tendon_slack_length=0.265 pennation_angle_at_optimal=0.2111848
      PathPoint P1: humerus_l (0.00219 -0.2774 0.0388)
      PathPoint P2: FCUpt_l (0.00549 0 0)
      PathPoint P3: radius_l (0.01082 -0.22327 -0.00969)
      PathPoint P4: fifthmc_l (0.00154 0.01703 0.0033)
      PathWrap: wrap_object=FCU_l method=hybrid
      PathWrap pathwrap_0: wrap_object=Elbow_PT_ECRL_l method=hybrid
    Schutte1993Muscle_Deprecated PL_l: max_isometric_force=26.72 optimal_fiber_length=0.0638 tendon_slack_length=0.2694
        pennation_angle_at_optimal=0.06981317
      PathPoint P1: humerus_l (0.00457 -0.27519 0.03865)
      PathPoint P2: radius_l (0.02531 -0.23915 0.00276)
      PathPoint P3: capitate_l (0.00917 -0.01898 0.01754)
      PathPoint P4: thirdmc_l (0.00179 0.00828 0.00245)
      PathWrap: wrap_object=PL_l method=hybrid
      PathWrap pathwrap_0: wrap_object=Elbow_PT_ECRL_l method=hybrid
    Schutte1993Muscle_Deprecated PT_l: max_isometric_force=566.22 optimal_fiber_length=0.0492 tendon_slack_length=0.098
        pennation_angle_at_optimal=0.1745329
      PathPoint P1: humerus_l (0.0036 -0.2759 0.0365)
      PathPoint P2: ulna_l (0.00846 -0.03373 0.01432)
      PathPoint P3: ptpt_l (0.00464 -0.00026 0.00214)
      ConditionalPathPoint P4: radius_l (0.0236 -0.0934 -0.0094) socket_coordinate=/jointset/radioulnar_l/pro_sup_l
          range=(-1.5708 0.509636)
      PathPoint P5: radius_l (0.0254 -0.1088 -0.0198)
      PathWrap: wrap_object=Elbow_PT_ECRL_l method=hybrid
    Schutte1993Muscle_Deprecated PQ_l: max_isometric_force=75.48 optimal_fiber_length=0.0282 tendon_slack_length=0.005
        pennation_angle_at_optimal=0.1745329
      PathPoint P1: radius_l (0.03245 -0.19998 -0.01962)
      PathPoint P2: ulna_l (0.00193 -0.20972 -0.03632)
      PathWrap: wrap_object=PQ2_l method=hybrid
      PathWrap pathwrap_0: wrap_object=PQ1_l method=hybrid
    Schutte1993Muscle_Deprecated FDSL_l: max_isometric_force=16.55 optimal_fiber_length=0.0515
        tendon_slack_length=0.3383 pennation_angle_at_optimal=0.08726646
      PathPoint P1: humerus_l (0.00421 -0.27598 0.03864)
      PathPoint P2: radius_l (0.01377 -0.18718 -0.00205)
      PathPoint P3: capitate_l (-0.00235 -0.01393 0.01376)
      PathPoint P4: fourthmc_l (-0.00294 0.00846 0.01213)
      PathPoint P5: fifthmc_l (-0.00032 -0.01968 0.00757)
      PathPoint P6: 5proxph_l (-0.00323 -0.03568 0.00417)
      PathPoint P7: 5midph_l (-0.0026 -0.01983 0.0035)
      PathWrap: wrap_object=FDS_l method=hybrid
      PathWrap pathwrap_0: wrap_object=Elbow_PT_ECRL_l method=hybrid
    Schutte1993Muscle_Deprecated FDSR_l: max_isometric_force=57.9 optimal_fiber_length=0.0736 tendon_slack_length=0.328
        pennation_angle_at_optimal=0.06981317
      PathPoint P1: humerus_l (0.00479 -0.2788 0.03731)
      PathPoint P2: radius_l (0.01571 -0.18666 -0.00267)
      PathPoint P3: capitate_l (-0.00082 -0.01344 0.01359)
      PathPoint P4: thirdmc_l (-0.00914 0.00544 0.01085)
      PathPoint P5: fourthmc_l (-0.0029 -0.02334 0.00767)
      PathPoint P6: 4proxph_l (-0.00172 -0.03947 0.00102)
      PathPoint P7: 4midph_l (-2e-5 -0.02501 -0.00029)
      PathWrap: wrap_object=FDS_l method=hybrid
      PathWrap pathwrap_0: wrap_object=Elbow_PT_ECRL_l method=hybrid
    Schutte1993Muscle_Deprecated FDSM_l: max_isometric_force=91.03 optimal_fiber_length=0.0749
        tendon_slack_length=0.295 pennation_angle_at_optimal=0.122173
      PathPoint P1: ulna_l (-0.00669 -0.02713 0.00191)
      PathPoint P2: radius_l (0.01899 -0.18706 -0.00424)
      PathPoint P3: capitate_l (0.0068 -0.01377 0.01399)
      PathPoint P4: thirdmc_l (0.00128 0.00639 0.00952)
      PathPoint P5: thirdmc_l (0.00263 -0.02478 0.00183)
      PathPoint P6: 3proxph_l (0.00252 -0.04307 -0.00417)
      PathPoint P7: 3midph_l (0.00155 -0.02773 -0.00067)
      PathWrap: wrap_object=FDS_l method=hybrid
    Schutte1993Muscle_Deprecated FDSI_l: max_isometric_force=61.24 optimal_fiber_length=0.0835
        tendon_slack_length=0.275 pennation_angle_at_optimal=0.1047198
      PathPoint P1: ulna_l (-0.00676 -0.02819 0.00137)
      PathPoint P2: radius_l (0.02145 -0.18623 -0.00552)
      PathPoint P3: capitate_l (0.00889 -0.01366 0.01387)
      PathPoint P4: secondmc_l (-0.00407 -0.00025 0.00479)
      PathPoint P5: secondmc_l (0.00304 -0.02206 0.00579)
      PathPoint P6: 2proxph_l (0.00427 -0.03367 -0.00444)
      PathPoint P7: 2midph_l (0.00228 -0.02088 0.00029)
      PathWrap: wrap_object=FDS_l method=hybrid
      PathWrap pathwrap_0: wrap_object=2ndmcp_l method=hybrid
    Schutte1993Muscle_Deprecated FDPL_l: max_isometric_force=79.65 optimal_fiber_length=0.0749
        tendon_slack_length=0.2819 pennation_angle_at_optimal=0.1396263
      PathPoint P1: ulna_l (-0.00628 -0.03214 -0.00254)
      PathPoint P2: radius_l (0.01409 -0.18516 -0.00861)
      PathPoint P3: capitate_l (-0.00088 -0.01027 0.01188)
      PathPoint P4: fourthmc_l (-0.00686 0.0089 0.00619)
      PathPoint P5: fifthmc_l (-0.00185 -0.01878 0.00706)
      PathPoint P6: 5proxph_l (-0.0049 -0.03465 0.00598)
      PathPoint P7: 5distph_l (-0.00032 -0.00433 0.00165)
      PathWrap: wrap_object=FDP_l method=hybrid
    Schutte1993Muscle_Deprecated FDPR_l: max_isometric_force=64.08 optimal_fiber_length=0.0798
        tendon_slack_length=0.282 pennation_angle_at_optimal=0.122173
      PathPoint P1: ulna_l (-0.00502 -0.03374 -0.00273)
      PathPoint P2: radius_l (0.0158 -0.18629 -0.00803)
      PathPoint P3: capitate_l (0.00106 -0.01177 0.01184)
      PathPoint P4: thirdmc_l (-0.0104 0.00473 0.00804)
      PathPoint P5: fourthmc_l (-0.00289 -0.02297 0.00609)
      PathPoint P6: 4proxph_l (-0.00304 -0.04002 0.00075)
      PathPoint P7: 4distph_l (0.0001 -0.0066 0.00066)
      PathWrap: wrap_object=FDP_l method=hybrid
    Schutte1993Muscle_Deprecated FDPM_l: max_isometric_force=81.65 optimal_fiber_length=0.0835
        tendon_slack_length=0.293 pennation_angle_at_optimal=0.1047198
      PathPoint P1: ulna_l (-0.00522 -0.03327 -0.0021)
      PathPoint P2: radius_l (0.01906 -0.18644 -0.00785)
      PathPoint P3: capitate_l (0.00335 -0.0128 0.01144)
      PathPoint P4: thirdmc_l (-0.00128 0.00609 0.00838)
      PathPoint P5: thirdmc_l (0.00034 -0.02347 0.00303)
      PathPoint P6: 3proxph_l (0.00102 -0.04333 -0.00294)
      PathPoint P7: 3distph_l (0.00023 -0.00505 0.00226)
      PathWrap: wrap_object=FDP_l method=hybrid
    Schutte1993Muscle_Deprecated FDPI_l: max_isometric_force=68.27 optimal_fiber_length=0.0749
        tendon_slack_length=0.2935 pennation_angle_at_optimal=0.122173
      PathPoint P1: ulna_l (-0.00647 -0.03176 -0.0028)
      PathPoint P2: radius_l (0.0208 -0.1856 -0.00915)
      PathPoint P3: capitate_l (0.00896 -0.01168 0.01212)
      PathPoint P4: secondmc_l (-0.00432 0.00663 0.00248)
      PathPoint P5: secondmc_l (0.0042 -0.02262 0.00499)
      PathPoint P6: 2proxph_l (0.00581 -0.03555 -0.00306)
      PathPoint P7: 2distph_l (0.00046 -0.0046 0.00301)
      PathWrap: wrap_object=FDP_l method=hybrid
      PathWrap pathwrap_0: wrap_object=2ndmcp_l method=hybrid
    Schutte1993Muscle_Deprecated EDCL_l: max_isometric_force=13.11 optimal_fiber_length=0.065
        tendon_slack_length=0.2965 pennation_angle_at_optimal=0.03490659
      PathPoint P1: humerus_l (-0.0004 -0.28831 -0.0187)
      PathPoint P2: EDCpt_l (0.0013 -0.03888 -0.01405)
      PathPoint P3: radius_l (0.00993 -0.22304 -0.03618)
      PathPoint P4: fifthmc_l (-0.00478 -0.01915 -0.00447)
      PathPoint P5: 5proxph_l (-0.00716 -0.03302 0.00089)
      PathPoint P6: 5distph_l (-0.00142 0.00068 -0.00115)
      PathWrap: wrap_object=EDCL_l method=hybrid range=(3 4)
    Schutte1993Muscle_Deprecated EDCR_l: max_isometric_force=34.04 optimal_fiber_length=0.0626
        tendon_slack_length=0.327 pennation_angle_at_optimal=0.05235988
      PathPoint P1: humerus_l (-0.00156 -0.28936 -0.01782)
      PathPoint P2: EDCpt_l (0.0026 -0.03991 -0.01552)
      PathPoint P3: radius_l (0.00882 -0.22366 -0.04284)
      PathPoint P4: fourthmc_l (-0.00338 -0.0233 -0.00513)
      PathPoint P5: 4proxph_l (-0.00546 -0.03868 -0.00413)
      PathPoint P6: 4distph_l (-0.00171 -0.00375 -0.00241)
      PathWrap: wrap_object=EDCR_l method=hybrid
    Schutte1993Muscle_Deprecated EDCM_l: max_isometric_force=35.32 optimal_fiber_length=0.0724
        tendon_slack_length=0.335 pennation_angle_at_optimal=0.05235988
      PathPoint P1: humerus_l (0.00051 -0.28984 -0.01949)
      PathPoint P2: EDCpt_l (0.00316 -0.03948 -0.01528)
      PathPoint P3: radius_l (0.0144 -0.22323 -0.04223)
      PathPoint P4: thirdmc_l (0.00131 -0.02342 -0.00764)
      PathPoint P5: 3proxph_l (0.00179 -0.04239 -0.01003)
      PathPoint P6: 3distph_l (0.00077 -0.01111 -0.00201)
      PathWrap: wrap_object=EDCM_l method=hybrid
    Schutte1993Muscle_Deprecated EDCI_l: max_isometric_force=18.26 optimal_fiber_length=0.07 tendon_slack_length=0.322
        pennation_angle_at_optimal=0.05235988
      PathPoint P1: humerus_l (0.00065 -0.28898 -0.01869)
      PathPoint P2: EDCpt_l (0.00228 -0.03918 -0.01483)
      PathPoint P3: radius_l (0.01533 -0.22314 -0.04196)
      PathPoint P4: secondmc_l (0.00474 -0.02656 -0.01293)
      PathPoint P5: 2proxph_l (0.00192 -0.01101 -0.01021)
      PathPoint P6: 2proxph_l (0.00771 -0.04191 -0.01399)
      PathPoint P7: 2midph_l (0.00123 -0.00941 -0.00581)
      PathPoint P8: 2midph_l (0.0026 -0.01959 -0.00363)
      PathPoint P9: 2distph_l (0.00025 -0.0037 -0.00228)
      PathWrap: wrap_object=EDCI_l method=hybrid range=(3 4)
      PathWrap pathwrap_0: wrap_object=Secondpm_l method=hybrid range=(6 7)
      PathWrap pathwrap_1: wrap_object=Secondmd_l method=hybrid range=(8 9)
    Schutte1993Muscle_Deprecated EDM_l: max_isometric_force=25.25 optimal_fiber_length=0.0675 tendon_slack_length=0.322
        pennation_angle_at_optimal=0.05235988
      PathPoint P1: humerus_l (0.00089 -0.28919 -0.01847)
      PathPoint P2: ulna_l (-0.00977 -0.03907 -0.03085)
      PathPoint P3: ulna_l (-0.00755 -0.08267 -0.03646)
      PathPoint P4: radius_l (0.00454 -0.22641 -0.03678)
      PathPoint P5: fifthmc_l (0.00131 0.02436 -0.00794)
      PathPoint P6: fifthmc_l (-0.00537 -0.01848 -0.00316)
      PathPoint P7: 5proxph_l (-0.0054 -0.03237 -0.00015)
      PathPoint P8: 5distph_l (-0.00226 -0.00334 -0.00062)
      PathWrap: wrap_object=EDM_l method=hybrid range=(4 5)
    Schutte1993Muscle_Deprecated EIP_l: max_isometric_force=21.7 optimal_fiber_length=0.0589 tendon_slack_length=0.186
        pennation_angle_at_optimal=0.1047198
      PathPoint P1: ulna_l (-0.00394 -0.16652 -0.03682)
      PathPoint P2: ulna_l (0.00171 -0.17469 -0.04049)
      PathPoint P3: radius_l (0.01076 -0.22783 -0.03664)
      PathPoint P4: secondmc_l (-0.01081 0.01528 -0.00681)
      PathPoint P5: secondmc_l (0.00441 -0.02602 -0.01285)
      PathPoint P6: 2proxph_l (0.00171 -0.01033 -0.00947)
      PathPoint P7: 2proxph_l (0.00714 -0.04133 -0.01413)
      PathPoint P8: 2midph_l (0.00115 -0.00899 -0.00597)
      PathPoint P9: 2midph_l (0.00294 -0.02043 -0.00377)
      PathPoint P10: 2distph_l (0.00264 -0.01233 -0.00266)
      PathWrap: wrap_object=Extensor_ellipse_l method=hybrid
      PathWrap pathwrap_0: wrap_object=Secondpm_l method=hybrid range=(7 8)
      PathWrap pathwrap_1: wrap_object=Secondmd_l method=hybrid range=(9 10)
    Schutte1993Muscle_Deprecated EPL_l: max_isometric_force=39.46 optimal_fiber_length=0.054 tendon_slack_length=0.2205
        pennation_angle_at_optimal=0.1047198
      PathPoint P1: ulna_l (-0.01412 -0.09706 -0.02952)
      PathPoint P2: radius_l (0.00124 -0.13668 -0.0227)
      PathPoint P3: radius_l (0.02702 -0.21872 -0.03828)
      PathPoint P4: radius_l (0.03382 -0.22754 -0.04607)
      PathPoint P5: radius_l (0.04234 -0.23771 -0.04173)
      PathPoint P6: capitate_l (0.02428 0.00014 -0.00608)
      PathPoint P7: trapezium_l (0.00809 -0.0046 -0.00992)
      PathPoint P8: firstmc_l (0.00656 -0.0043 -0.00792)
      PathPoint P9: firstmc_l (0.02165 -0.0242 0.00533)
      PathPoint P10: proximal_thumb_l (0.01147 -0.00362 -0.00156)
      PathPoint P11: proximal_thumb_l (0.01921 -0.0265 0.01038)
      PathPoint P12: distal_thumb_l (0.00543 -0.00714 0.00464)
      PathWrap: wrap_object=MPthumb_l method=hybrid
    Schutte1993Muscle_Deprecated EPB_l: max_isometric_force=14.2 optimal_fiber_length=0.0675 tendon_slack_length=0.1155
        pennation_angle_at_optimal=0.1256637
      PathPoint P1: radius_l (0.01924 -0.14695 -0.02114)
      PathPoint P2: radius_l (0.02276 -0.15857 -0.02665)
      PathPoint P3: radius_l (0.03831 -0.19722 -0.03834)
      PathPoint P4: radius_l (0.05235 -0.23611 -0.02699)
      PathPoint P5: capitate_l (0.03123 0.00256 0.00327)
      PathPoint P6: firstmc1_l (0.01443 -0.00337 0.00405)
      PathPoint P7: firstmc_l (0.02173 -0.02303 0.01141)
      PathPoint P8: proximal_thumb_l (0.00927 -0.00618 0.00557)
      PathWrap: wrap_object=MPthumb_l method=hybrid
    Schutte1993Muscle_Deprecated FPL_l: max_isometric_force=77.2 optimal_fiber_length=0.0552 tendon_slack_length=0.1938
        pennation_angle_at_optimal=0.122173
      PathPoint P1: radius_l (0.00971 -0.09458 -0.01769)
      PathPoint P2: radius_l (0.01658 -0.13525 -0.01915)
      PathPoint P3: radius_l (0.01869 -0.17932 -0.01988)
      PathPoint P4: radius_l (0.038 -0.23171 -0.0158)
      PathPoint P5: FPLpt_l (0.01869 0.00882 0.01547)
      PathPoint P6: FPLpt2_l (0.01244 -0.02207 0.02089)
      PathPoint P7: firstmc_l (-0.00608 -0.01624 0.0094)
      PathPoint P8: firstmc_l (0.00208 -0.02297 0.00956)
      PathPoint P9: proximal_thumb_l (-0.0045 -0.01842 0.00508)
      PathPoint P10: proximal_thumb_l (0.0059 -0.02602 0.01114)
      PathPoint P11: distal_thumb_l (0.00242 -0.01127 0.00412)
      PathWrap: wrap_object=FPL_l method=hybrid
      PathWrap pathwrap_0: wrap_object=IPthumb_l method=hybrid
      PathWrap pathwrap_1: wrap_object=MPthumb_l method=hybrid
    Schutte1993Muscle_Deprecated APL_l: max_isometric_force=59.53 optimal_fiber_length=0.0713
        tendon_slack_length=0.1295 pennation_angle_at_optimal=0.1308997
      PathPoint P1: radius_l (0.01154 -0.09477 -0.01681)
      PathPoint P2: radius_l (0.0303 -0.1397 -0.03507)
      PathPoint P3: radius_l (0.03993 -0.16072 -0.034)
      PathPoint P4: radius_l (0.04397 -0.17845 -0.03134)
      PathPoint P5: radius_l (0.05505 -0.23084 -0.02368)
      PathPoint P6: APLpt_l (0.03385 0.00634 0.00745)
      PathPoint P7: firstmc1_l (0.01058 0.00662 0.00619)
      PathPoint P8: firstmc_l (0.00629 0.00323 0.00589)
      PathPoint P9: firstmc_l (0.00827 -0.00586 0.00604)
      PathWrap: wrap_object=APL_l method=hybrid range=(5 6)
    ObjectGroup R_hip_abd: members=(glut_max1_r glut_med1_r glut_med2_r glut_med3_r peri_r sar_r tfl_r)
    ObjectGroup R_hip_flex: members=(glut_med1_r grac_r iliacus_r pect_r psoas_r rect_fem_r sar_r tfl_r)
    ObjectGroup R_hip_inrot: members=(glut_med1_r iliacus_r psoas_r tfl_r)
    ObjectGroup R_hip_exrot: members=(gem_r glut_med3_r peri_r quad_fem_r)
    ObjectGroup R_hip_ext: members=(add_mag2_r bifemlh_r glut_max1_r glut_max2_r glut_max3_r glut_med3_r)
    ObjectGroup R_hip_add: members=(add_mag2_r bifemlh_r grac_r pect_r)
    ObjectGroup R_knee_bend: members=(bifemlh_r bifemsh_r grac_r med_gas_r sar_r)
    ObjectGroup R_knee_ext: members=(rect_fem_r vas_int_r)
    ObjectGroup R_ankle_pf: members=(med_gas_r soleus_r tib_post_r)
    ObjectGroup R_inverter: members=(tib_ant_r tib_post_r)
    ObjectGroup R_ankle_df: members=tib_ant_r
    ObjectGroup L_hip_abd: members=(glut_max1_l glut_med1_l glut_med2_l glut_med3_l peri_l sar_l tfl_l)
    ObjectGroup L_hip_flex: members=(glut_med1_l grac_l iliacus_l pect_l psoas_l rect_fem_l sar_l tfl_l)
    ObjectGroup L_hip_inrot: members=(glut_med1_l iliacus_l psoas_l tfl_l)
    ObjectGroup L_hip_exrot: members=(gem_l glut_med3_l peri_l quad_fem_l)
    ObjectGroup L_hip_ext: members=(add_mag2_l bifemlh_l glut_max1_l glut_max2_l glut_max3_l glut_med3_l)
    ObjectGroup L_hip_add: members=(add_mag2_l bifemlh_l grac_l pect_l)
    ObjectGroup L_knee_bend: members=(bifemlh_l bifemsh_l grac_l med_gas_l sar_l)
    ObjectGroup L_knee_ext: members=(rect_fem_l vas_int_l)
    ObjectGroup L_ankle_pf: members=(med_gas_l soleus_l tib_post_l)
    ObjectGroup L_inverter: members=(tib_ant_l tib_post_l)
    ObjectGroup L_ankle_df: members=tib_ant_l
    ObjectGroup back_ext: members=(ercspn_l ercspn_r)
    ObjectGroup back_rlb: members=(ercspn_r extobl_r intobl_r)
    ObjectGroup back_introt: members=(ercspn_r extobl_l intobl_r)
    ObjectGroup back_llb: members=(ercspn_l extobl_l intobl_l)
    ObjectGroup back_extrot: members=(ercspn_l extobl_r intobl_l)
    ObjectGroup back_flex: members=(extobl_l extobl_r intobl_l intobl_r)
    ObjectGroup shoulder: members=(CORB DELT1 DELT2 DELT3 INFSP LAT1 LAT2 LAT3 PECM1 PECM2 PECM3 SUBSC SUPSP TMAJ TMIN)
    ObjectGroup elbow: members=(ANC BIClong BICshort BRA BRD ECRL PT TRIlat TRIlong TRImed)
    ObjectGroup forearm: members=(APL ECRB ECU EDCI EDCL EDCM EDCR EDM EIP EPB EPL FCR FCU FDPI FDPL FDPM FDPR FDSI FDSL FDSM FDSR FPL PL PQ PT SUP)
    ObjectGroup extensor: members=(ECRB ECU EDCI EDCL EDCM EDCR EDM EIP EPL)
    ObjectGroup radial: members=(APL ECRB EDCI EDCM EIP EPB EPL FCR FDPI FDSI FDSM FPL PL)
    ObjectGroup wrist: members=(ECRB ECU FCR FCU)
    ObjectGroup ulnar: members=(ECU EDCL EDCR EDM FCU FDPL FDPM FDPR FDSL FDSR)
    ObjectGroup flexor: members=(APL EPB FCR FCU FDPI FDPL FDPM FDPR FDSI FDSL FDSM FDSR FPL PL)
    ObjectGroup hand: members=(APL EDCI EDCL EDCM EDCR EDM EIP EPB EPL FDPI FDPL FDPM FDPR FDSI FDSL FDSM FDSR FPL PL)
    ObjectGroup thumb: members=(APL EPB EPL FPL)
    ObjectGroup shoulder_l: members=(CORB_l DELT1_l DELT2_l DELT3_l INFSP_l LAT1_l LAT2_l LAT3_l PECM1_l PECM2_l PECM3_l SUBSC_l SUPSP_l TMAJ_l TMIN_l)
    ObjectGroup elbow_l: members=(ANC_l BIClong_l BICshort_l BRA_l BRD_l ECRL_l PT_l TRIlat_l TRIlong_l TRImed_l)
    ObjectGroup forearm_l: members=(APL_l ECRB_l ECU_l EDCI_l EDCL_l EDCM_l EDCR_l EDM_l EIP_l EPB_l EPL_l FCR_l FCU_l FDPI_l FDPL_l FDPM_l FDPR_l FDSI_l FDSL_l FDSM_l FDSR_l FPL_l PL_l PQ_l PT_l SUP_l)
    ObjectGroup extensor_l: members=(ECRB_l ECU_l EDCI_l EDCL_l EDCM_l EDCR_l EDM_l EIP_l EPL_l)
    ObjectGroup radial_l: members=(APL_l ECRB_l EDCI_l EDCM_l EIP_l EPB_l EPL_l FCR_l FDPI_l FDSI_l FDSM_l FPL_l PL_l)
    ObjectGroup wrist_l: members=(ECRB_l ECU_l FCR_l FCU_l)
    ObjectGroup ulnar_l: members=(ECU_l EDCL_l EDCR_l EDM_l FCU_l FDPL_l FDPM_l FDPR_l FDSL_l FDSR_l)
    ObjectGroup flexor_l: members=(APL_l EPB_l FCR_l FCU_l FDPI_l FDPL_l FDPM_l FDPR_l FDSI_l FDSL_l FDSM_l FDSR_l FPL_l PL_l)
    ObjectGroup hand_l: members=(APL_l EDCI_l EDCL_l EDCM_l EDCR_l EDM_l EIP_l EPB_l EPL_l FDPI_l FDPL_l FDPM_l FDPR_l FDSI_l FDSL_l FDSM_l FDSR_l FPL_l PL_l)
    ObjectGroup thumb_l: members=(APL_l EPB_l EPL_l FPL_l)
  MarkerSet:
    Marker LFHD: thorax (0.0352 0.2252124 0.06050378)
    Marker RFHD: thorax (0.0352 0.225212 -0.0605038)
    Marker LBHD: thorax (-0.0371092 0.205817 0.0776463)
    Marker RBHD: thorax (-0.0371092 0.205817 -0.0776463)
    Marker CLAV: clavicle (-5.778062e-8 2.549474e-8 -0.0253262)
    Marker LSHO: scapula (-0.02389594 0.02153035 -0.3423974)
    Marker RSHO: scapula (-0.02389562 0.02153099 0.02160821)
    Marker STRN: thorax (0.07356819 -0.1395057 0.0001812537)
    Marker RUPA: bicpt (-0.00772769 0.1508724 0.02043227)
    Marker RELB: bicpt2 (-0.02470818 0.04485278 0.03473507)
    Marker RMELB: bicpt2 (-0.02470831 0.02679883 -0.05934213)
    Marker RFRM: ulna (0.0129681 -0.1939092 0.07697925)
    Marker RWRA: lunate (-0.004061345 -0.01040276 0.01567954)
    Marker RFIN: lunate (0.005977077 -0.07822043 0.02746172)
    Marker RASI: pelvis (-0.01411916 -0.01202567 0.1024015)
    Marker RIC: pelvis (-0.0882567 -0.01007163 0.1401059)
    Marker RTHI: femur_r (0.009487104 -0.1615628 0.06721025)
    Marker RKNEE: femur_r (-0.008326282 -0.4171515 0.05242963)
    Marker RKNEE2: femur_r (-0.00832628 -0.4372441 -0.05558217)
    Marker RTIB: tibia_r (-0.0009723667 -0.3190057 0.04376265)
    Marker RANK: tibia_r (-0.004890228 -0.412411 0.05057521)
    Marker RMANK: talus_r (0.01404418 0.00597919 -0.02854032)
    Marker RTOE: calcn_r (0.1125251 0.03745679 -0.001180781)
    Marker C7: thorax (-0.0878523 0.05245939 0.003167266)
    Marker T10: thorax (-0.1108778 -0.1612953 0.0009845441)
    Marker RPSI: pelvis (-0.1469634 0.02282238 0.05961126)
    Marker RHEE: calcn_r (-0.01613353 0.03770077 -0.006405588)
    Marker RBAK: scapula (-0.09767842 -0.06525167 -0.0477526)
    Marker LTOE: calcn_l (0.112525 0.0374568 -0.00118078)
    Marker LMANK: talus_l (0.0140442 0.00597919 0.02891023)
    Marker LANK: tibia_l (-0.00489023 -0.412411 -0.05378294)
    Marker LTIB: tibia_l (-0.000972367 -0.2407301 -0.04230451)
    Marker LKNEE: femur_l (-0.00832628 -0.417151 -0.05162806)
    Marker LKNEE2: femur_l (-0.00832628 -0.437244 0.05704468)
    Marker LTHI: femur_l (0.0094871 -0.2777961 -0.06206673)
    Marker LASI: pelvis (-0.0141192 -0.0120257 -0.09892827)
    Marker LIC: pelvis (-0.0882567 -0.0100716 -0.1373002)
    Marker LFIN: lunate_l (0.005977065 -0.07822066 -0.02523378)
    Marker LWRA: lunate_l (-0.004061353 -0.01040311 -0.01831668)
    Marker LFRM: ulna_l (0.01296805 -0.1939103 -0.0710225)
    Marker LELB: bicpt2_l (-0.02470823 0.04485217 -0.0347906)
    Marker LMELB: bicpt2_l (-0.02470826 0.02679986 0.05753341)
    Marker LUPA: bicpt_l (-0.007727705 0.1508716 -0.019327)
    Marker LPSI: pelvis (-0.146963 0.0228224 -0.05412706)
    Marker LHEE: calcn_l (-0.0161335 0.0377008 0.01141311)
