# OpenSim document version 40000
# Markers in the model.
MarkerSet:
  Marker LFHD: thorax (0.0352 0.2252124 0.06050378)
  Marker RFHD: thorax (0.0352 0.225212 -0.0605038)
  Marker LBHD: thorax (-0.0371092 0.205817 0.0776463)
  Marker RBHD: thorax (-0.0371092 0.205817 -0.0776463)
  Marker CLAV: clavicle (-5.778062e-8 2.549474e-8 -0.0253262)
  Marker LSHO: scapula (-0.02389594 0.02153035 -0.3423974)
  Marker RSHO: scapula (-0.02389562 0.02153099 0.02160821)
  Marker STRN: thorax (0.07356819 -0.1395057 0.0001812537)
  Marker RUPA: bicpt (-0.00772769 0.1508724 0.02043227)
  Marker RELB: bicpt2 (-0.02470818 0.04485278 0.03473507)
  Marker RMELB: bicpt2 (-0.02470831 0.02679883 -0.05934213)
  Marker RFRM: ulna (0.0129681 -0.1939092 0.07697925)
  Marker RWRA: lunate (-0.004061345 -0.01040276 0.01567954)
  Marker RFIN: lunate (0.005977077 -0.07822043 0.02746172)
  Marker RASI: pelvis (-0.01411916 -0.01202567 0.1024015)
  Marker RIC: pelvis (-0.0882567 -0.01007163 0.1401059)
  Marker RTHI: femur_r (0.009487104 -0.1615628 0.06721025)
  Marker RKNEE: femur_r (-0.008326282 -0.4171515 0.05242963)
  Marker RKNEE2: femur_r (-0.00832628 -0.4372441 -0.05558217)
  Marker RTIB: tibia_r (-0.0009723667 -0.3190057 0.04376265)
  Marker RANK: tibia_r (-0.004890228 -0.412411 0.05057521)
  Marker RMANK: talus_r (0.01404418 0.00597919 -0.02854032)
  Marker RTOE: calcn_r (0.1125251 0.03745679 -0.001180781)
  Marker C7: thorax (-0.0878523 0.05245939 0.003167266)
  Marker T10: thorax (-0.1108778 -0.1612953 0.0009845441)
  Marker RPSI: pelvis (-0.1469634 0.02282238 0.05961126)
  Marker RHEE: calcn_r (-0.01613353 0.03770077 -0.006405588)
  Marker RBAK: scapula (-0.09767842 -0.06525167 -0.0477526)
  Marker LTOE: calcn_l (0.112525 0.0374568 -0.00118078)
  Marker LMANK: talus_l (0.0140442 0.00597919 0.02891023)
  Marker LANK: tibia_l (-0.00489023 -0.412411 -0.05378294)
  Marker LTIB: tibia_l (-0.000972367 -0.2407301 -0.04230451)
  Marker LKNEE: femur_l (-0.00832628 -0.417151 -0.05162806)
  Marker LKNEE2: femur_l (-0.00832628 -0.437244 0.05704468)
  Marker LTHI: femur_l (0.0094871 -0.2777961 -0.06206673)
  Marker LASI: pelvis (-0.0141192 -0.0120257 -0.09892827)
  Marker LIC: pelvis (-0.0882567 -0.0100716 -0.1373002)
  Marker LFIN: lunate_l (0.005977065 -0.07822066 -0.02523378)
  Marker LWRA: lunate_l (-0.004061353 -0.01040311 -0.01831668)
  Marker LFRM: ulna_l (0.01296805 -0.1939103 -0.0710225)
  Marker LELB: bicpt2_l (-0.02470823 0.04485217 -0.0347906)
  Marker LMELB: bicpt2_l (-0.02470826 0.02679986 0.05753341)
  Marker LUPA: bicpt_l (-0.007727705 0.1508716 -0.019327)
  Marker LPSI: pelvis (-0.146963 0.0228224 -0.05412706)
  Marker LHEE: calcn_l (-0.0161335 0.0377008 0.01141311)
